# OpenSim document version 40600
Model upper_limb_model:
  gravity: 0 -9.80665 0
  publications: Comp Meth Biomech Biomed Eng 2014
  length_units: meters
  force_units: N
  credits:
    Katherine R. Saul, Wendy M. Murray, Craig M. Goehler, Melissa Daly, Meghan E. Vidt, Dustin L. Crouch
  Ground
  BodySet:
    Body thorax: mass=1 [kg] mass_center=(0 0 0) inertia=(1 1 1 0 0 0) meshes=thorax.vtp
      WrapEllipsoid Thorax: xyz_body_rotation=(0.0434587 -0.331962 0.189892) translation=(-0.0386 -0.1273 0.0709)
          quadrant=all dimensions=(0.1 0.135 0.08)
    Body clavicle: mass=0.156 mass_center=(-0.011096 0.0063723 0.054168)
        inertia=(0.00024259 0.00025526 4.442e-5 -1.898e-5 -6.994e-5 5.371e-5) meshes=clavicle.vtp
    Body clavphant: mass=0.0001 mass_center=(0 0 0) inertia=(1 1 1 0 0 0)
    Body scapula: mass=0.70396 mass_center=(-0.054694 -0.035032 -0.043734)
        inertia=(0.0012429 0.0011504 0.0013651 0.0004494 0.00040922 0.0002411) meshes=scapula.vtp
      WrapEllipsoid Deltoid2: xyz_body_rotation=(3.13042 -1.54881 -1.31423) translation=(-0.0058 -0.0378 0.0096)
          quadrant=-y dimensions=(0.033 0.04 0.035)
      WrapTorus Delt3: xyz_body_rotation=(0.620988 0.32882 -0.560774) translation=(-0.0973 -0.0428 -0.037) quadrant=all
          inner_radius=0.04 outer_radius=0.06
      WrapTorus INFSP: xyz_body_rotation=(0.0253073 0.58835 0.151844) translation=(-0.0561 -0.0199 -0.0112)
          quadrant=all inner_radius=0.008 outer_radius=0.019
      WrapEllipsoid TMIN: xyz_body_rotation=(-2.09754 -0.280823 -1.76348) translation=(-0.0418 -0.0519 -0.0359)
          quadrant=x dimensions=(0.03 0.03 0.05)
      WrapCylinder TRIlongglen: xyz_body_rotation=(1.37532 -0.294612 2.43596) translation=(-0.0359 -0.0309 -0.0132)
          quadrant=x radius=0.003 length=0.03
    Body scapphant: mass=0.0001 mass_center=(0 0 0) inertia=(1 1 1 0 0 0)
    Body humphant: mass=0.0001 mass_center=(0 0 0) inertia=(1 1 1 0 0 0)
    Body humphant1: mass=0.0001 mass_center=(0 0 0) inertia=(1 1 1 0 0 0)
    Body humerus: mass=1.99757 mass_center=(0.018064 -0.140141 -0.012746)
        inertia=(0.0122776 0.00255133 0.0125789 -0.00034741 -0.0002325 0.0012293) meshes=humerus.vtp
      WrapEllipsoid DELT1hh: xyz_body_rotation=(0.0584685 1.00461 0.570374) translation=(-0.0139 -0.0127 -0.0262)
          quadrant=z dimensions=(0.03 0.1 0.05)
      WrapCylinder delt2hum: xyz_body_rotation=(1.55093 -0.0199582 0.0596618) translation=(0.0017 -0.0958 0.0011)
          quadrant=all radius=0.0109 length=0.12
      WrapEllipsoid delt3hum: xyz_body_rotation=(1.72735 0.0759218 -2.74313) translation=(0.0019 -0.0592 0.0011)
          quadrant=x dimensions=(0.01 0.01 0.05)
      WrapEllipsoid SUPSP: xyz_body_rotation=(0.0380482 0.00855211 -1.30673) translation=(0.0002 0.0077 0.0043)
          quadrant=all dimensions=(0.02 0.02 0.02)
      WrapEllipsoid INFSP_and_TMIN_hum_head: xyz_body_rotation=(-0.286583 -0.00907571 -0.0684169)
          translation=(-0.0003 0.0026 0.0038) quadrant=all dimensions=(0.02 0.025 0.02)
      WrapCylinder infsp_new: xyz_body_rotation=(1.52911 -0.345 -0.65966) translation=(-0.0019 -0.019 0.0022)
          quadrant=-x radius=0.0235 length=0.115
      WrapEllipsoid SUBSCAP: xyz_body_rotation=(-0.924501 0.288852 0.381529) translation=(-0.0025 0.0007 -0.0045)
          quadrant=all dimensions=(0.02 0.017 0.028)
      WrapEllipsoid LIGhh_s: xyz_body_rotation=(-0.785 0 0) translation=(-0.001 0.003 0.003) quadrant=all
          dimensions=(0.02 0.02 0.02)
      WrapEllipsoid LIGhh_mi: xyz_body_rotation=(-0.785 0 0) translation=(-0.001 0.004 0.001) quadrant=all
          dimensions=(0.0205 0.019 0.0205)
      WrapCylinder TMINhum: xyz_body_rotation=(1.47353 0.0229 3.21463) translation=(0.003 -0.0255 0.0013) quadrant=x
          radius=0.022 length=0.113
      WrapCylinder TMAJ_LAThum: xyz_body_rotation=(1.53641 -0.0637045 1.41424) translation=(0.0007 -0.0443 -0.0055)
          quadrant=-x radius=0.007 length=0.04
      WrapCylinder PEC12hum: xyz_body_rotation=(1.55928 -0.0774926 -0.925897) translation=(0.002 -0.0508 -0.0017)
          quadrant=x radius=0.009 length=0.07
      WrapSphere PEC23hh: translation=(-0.0086 0.0021 -0.0004) quadrant=all radius=0.02
      WrapEllipsoid PEC1hh: xyz_body_rotation=(-0.620465 -0.310494 0.363727) translation=(-0.0037 0.0005 -0.0025)
          quadrant=-z dimensions=(0.03 0.02 0.02)
      WrapCylinder PEC3hum: xyz_body_rotation=(1.44094 -0.0561996 1.75196) translation=(0.0009 -0.0551 -0.0004)
          quadrant=-x radius=0.008 length=0.1
      WrapCylinder LAT_TMAJhh: xyz_body_rotation=(-0.305084 -0.018326 -0.686613) translation=(-0.0224 0.0102 0.0094)
          quadrant=-y radius=0.007 length=0.045
      WrapSphere LAT_TMAJ2hh: xyz_body_rotation=(-0.127235 0.276111 0.0197222) translation=(-0.0016 0.0092 0.0052)
          quadrant=all radius=0.03
      WrapEllipsoid Elbow_BIC_BRD: xyz_body_rotation=(-0.128631 0.137532 0.0307178) translation=(0.0019 -0.289 -0.014)
          quadrant=x dimensions=(0.015 0.015 0.1)
      WrapEllipsoid TRIlonghh: xyz_body_rotation=(3.00162 -0.853466 2.57419) translation=(-0.0078 -0.0041 -0.0014)
          quadrant=z dimensions=(0.035 0.02 0.02)
      WrapCylinder TRI: xyz_body_rotation=(-0.14015 -0.00628319 0.154985) translation=(0.0028 -0.2919 -0.0119)
          quadrant=all radius=0.016 length=0.1
      WrapEllipsoid ANC: xyz_body_rotation=(0.00750492 -0.196699 1.04929) translation=(0.0134 -0.2861 -0.0008)
          quadrant=-x dimensions=(0.02 0.02 0.02)
      WrapEllipsoid BIClong: xyz_body_rotation=(-2.00434 -1.00164 0.975465) translation=(0.0033 0.005 0.0003)
          quadrant=-y dimensions=(0.025 0.02 0.02)
      WrapSphere TMAJ_LAT_PEC_CORBhh: translation=(0.0007 0 0.006) quadrant=all radius=0.03
      WrapSphere DELT_TMAJ_LAT_PEC_CORBhh: translation=(0.0007 0 0.006) quadrant=all radius=0.03
      WrapCylinder CORBhum: xyz_body_rotation=(-1.60832 0.0959931 0.875283) translation=(0.0027 -0.1202 -0.0059)
          quadrant=x radius=0.008 length=0.1
      WrapEllipsoid Elbow_PT_ECRL: xyz_body_rotation=(-0.161094 -0.110828 0.61453) translation=(0.003 -0.2872 -0.0069)
          quadrant=x dimensions=(0.018 0.025 0.035)
    Body ulna: mass=1.1053 mass_center=(0.00971783 -0.0959509 0.024286)
        inertia=(0.00541309 0.00115318 0.00494361 0.00031686 -7.615e-5 0.00109169) meshes=ulna.vtp
      WrapCylinder PQ2: xyz_body_rotation=(1.39138 0.0689405 1.52245) translation=(-0.0012 -0.2092 0.0428) quadrant=all
          radius=0.007 length=0.1
    Body radius: mass=0.23359 mass_center=(0.0336341 -0.181559 0.0156)
        inertia=(0.00043855 8.859e-5 0.00040258 3.014e-5 -4.24e-6 6.418e-5) meshes=radius.vtp
      WrapCylinder SUP: xyz_body_rotation=(1.44775 0.304036 -2.44102) translation=(0.0045 -0.0437 0.0059) quadrant=-x
          radius=0.008 length=0.04
      WrapTorus ECU: xyz_body_rotation=(-0.986635 -0.148877 0.222704) translation=(-0.0163 -0.2417 0.0349) quadrant=all
          inner_radius=0.006 outer_radius=0.009
      WrapCylinder PQ1: xyz_body_rotation=(-1.60762 -0.0127409 -2.69025) translation=(0.0281 -0.1986 0.0288)
          quadrant=all radius=0.01 length=0.1
    Body lunate: mass=0.1 mass_center=(0 0 0) inertia=(1 1 1 0 0 0) meshes=lunate.vtp
      WrapEllipsoid Extensor_ellipse: xyz_body_rotation=(-0.2508038 0.2855359 0.2328269)
          translation=(0.0007 -0.0135 0.0047) quadrant=z dimensions=(0.05 0.02 0.013)
      WrapTorus ECRL: xyz_body_rotation=(1.538333 0.2343977 0.7311184) translation=(0.0222 -0.0096 0.0208) quadrant=all
          inner_radius=0.008 outer_radius=0.016
      WrapTorus ECRB: xyz_body_rotation=(1.312662 -0.1178097 -0.1162389) translation=(0.0126 -0.0095 0.0186)
          quadrant=all inner_radius=0.008 outer_radius=0.01
      WrapTorus FCR: xyz_body_rotation=(-1.555961 -0.1532399 -0.1000074) translation=(0.0032 -0.0045 -0.019)
          quadrant=all inner_radius=0.001 outer_radius=0.0025
      WrapTorus FCU: xyz_body_rotation=(-1.573763 -0.07976155 0.39235) translation=(-0.0123 -0.0124 -0.0171)
          quadrant=all inner_radius=0.0068 outer_radius=0.008
      WrapEllipsoid PL: xyz_body_rotation=(-0.03159046 0.0996583 0.06335545) translation=(0.0057 -0.018 -0.0041)
          quadrant=-z dimensions=(0.025 0.014 0.012)
      WrapEllipsoid FDS: xyz_body_rotation=(0.00837758 -0.08168141 -0.01710423) translation=(0.0012 -0.0057 -0.0003)
          quadrant=-z dimensions=(0.025 0.013 0.012)
      WrapEllipsoid FDP: xyz_body_rotation=(-1.467473 -0.1946042 0.121824) translation=(-0.0022 -0.0069 0.0032)
          quadrant=y dimensions=(0.025 0.013 0.012)
      WrapTorus EDCL: xyz_body_rotation=(2.363176 0.1930334 -0.2691298) translation=(-0.0128 -0.0133 0.0148)
          quadrant=all inner_radius=0.008 outer_radius=0.012
      WrapTorus EDCR: xyz_body_rotation=(1.983916 0.100531 0.5230752) translation=(-0.0098 -0.0137 0.0166) quadrant=all
          inner_radius=0.009 outer_radius=0.011
      WrapTorus EDCM: xyz_body_rotation=(1.993166 0.1979203 0.3682645) translation=(-0.0007 -0.0117 0.0191)
          quadrant=all inner_radius=0.009 outer_radius=0.012
      WrapTorus EDCI: xyz_body_rotation=(1.697682 0.08970992 0.00767945) translation=(0.009 -0.0149 0.0211)
          quadrant=all inner_radius=0.009 outer_radius=0.012
      WrapEllipsoid EDM: xyz_body_rotation=(2.962696 0.1593486 0.1179843) translation=(-0.0167 -0.0022 0.0048)
          quadrant=-z dimensions=(0.018 0.014 0.008)
      WrapEllipsoid FPL: xyz_body_rotation=(-0.1663299 -0.08220501 -0.06597345) translation=(0.017 -0.025 -0.0033)
          quadrant=-z dimensions=(0.016 0.01 0.01)
    Body scaphoid: mass=0.1 mass_center=(0 0 0) inertia=(1 1 1 0 0 0) meshes=scaphoid.vtp
    Body pisiform: mass=0.1 mass_center=(0 0 0) inertia=(1 1 1 0 0 0) meshes=pisiform.vtp
    Body triquetrum: mass=0.1 mass_center=(0 0 0) inertia=(1 1 1 0 0 0) meshes=triquetrum.vtp
    Body capitate: mass=0.1 mass_center=(0 0 0) inertia=(1 1 1 0 0 0) meshes=capitate.vtp
    Body trapezium: mass=0.1 mass_center=(0 0 0) inertia=(1 1 1 0 0 0) meshes=trapezium.vtp
    Body trapezoid: mass=0.1 mass_center=(0 0 0) inertia=(1 1 1 0 0 0) meshes=trapezoid.vtp
    Body hamate: mass=0.1 mass_center=(0 0 0) inertia=(1 1 1 0 0 0) meshes=hamate.vtp
    Body firstmc1: mass=0.1 mass_center=(0 0 0) inertia=(1 1 1 0 0 0)
      WrapTorus APL: active=false xyz_body_rotation=(-1.609892 0.2478367 -0.0301942)
          translation=(0.0082 0.0023 -0.0101) quadrant=all inner_radius=0.004 outer_radius=0.008
    Body firstmc: mass=0.1 mass_center=(0 0 0) inertia=(1 1 1 0 0 0) meshes=1mc.vtp
      WrapCylinder MPthumb: xyz_body_rotation=(0.3213151 0.1101303 -0.834791) translation=(0.0177 -0.0305 -0.0143)
          quadrant=all radius=0.0085 length=0.02
    Body secondmc: mass=0.1 mass_center=(0 0 0) inertia=(1 1 1 0 0 0) meshes=2mc.vtp
      WrapEllipsoid 2ndmcp: xyz_body_rotation=(1.486671 -1.296605 2.43072) translation=(0.0059 -0.0304 -0.0006)
          quadrant=-x dimensions=(0.005 0.005 0.03)
    Body thirdmc: mass=0.1 mass_center=(0 0 0) inertia=(1 1 1 0 0 0) meshes=3mc.vtp
    Body fourthmc: mass=0.1 mass_center=(0 0 0) inertia=(1 1 1 0 0 0) meshes=4mc.vtp
    Body fifthmc: mass=0.1 mass_center=(0 0 0) inertia=(1 1 1 0 0 0) meshes=5mc.vtp
    Body proximal_thumb: mass=0.1 mass_center=(0 0 0) inertia=(1 1 1 0 0 0) meshes=thumbprox.vtp
      WrapCylinder IPthumb: xyz_body_rotation=(0.3047345 0.01291544 0.08796459) translation=(0.0121 -0.0302 -0.0096)
          quadrant=-x radius=0.0045 length=0.01
    Body distal_thumb: mass=0.1 mass_center=(0 0 0) inertia=(1 1 1 0 0 0) meshes=thumbdist.vtp
    Body 2proxph: mass=0.1 mass_center=(0 0 0) inertia=(1 1 1 0 0 0) meshes=2proxph.vtp
      WrapCylinder Secondpm: xyz_body_rotation=(0.7419395 -1.473931 0.7096509) translation=(0.0075 -0.0407 0.0061)
          quadrant=all radius=0.004 length=0.01
    Body 2midph: mass=0.1 mass_center=(0 0 0) inertia=(1 1 1 0 0 0) meshes=2midph.vtp
      WrapCylinder Secondmd: xyz_body_rotation=(0.5017822 -1.413019 0.6473426) translation=(0.0036 -0.0243 0.0003)
          quadrant=x radius=0.003 length=0.01
    Body 2distph: mass=0.1 mass_center=(0 0 0) inertia=(1 1 1 0 0 0) meshes=2distph.vtp
    Body 3proxph: mass=0.1 mass_center=(0 0 0) inertia=(1 1 1 0 0 0) meshes=3proxph.vtp
    Body 3midph: mass=0.1 mass_center=(0 0 0) inertia=(1 1 1 0 0 0) meshes=3midph.vtp
    Body 3distph: mass=0.1 mass_center=(0 0 0) inertia=(1 1 1 0 0 0) meshes=3distph.vtp
    Body 4proxph: mass=0.1 mass_center=(0 0 0) inertia=(1 1 1 0 0 0) meshes=4proxph.vtp
    Body 4midph: mass=0.1 mass_center=(0 0 0) inertia=(1 1 1 0 0 0) meshes=4midph.vtp
    Body 4distph: mass=0.1 mass_center=(0 0 0) inertia=(1 1 1 0 0 0) meshes=4distph.vtp
    Body 5proxph: mass=0.1 mass_center=(0 0 0) inertia=(1 1 1 0 0 0) meshes=5proxph.vtp
    Body 5midph: mass=0.1 mass_center=(0 0 0) inertia=(1 1 1 0 0 0) meshes=5midph.vtp
    Body 5distph: mass=0.1 mass_center=(0 0 0) inertia=(1 1 1 0 0 0) meshes=5distph.vtp
    Body APLpt: mass=0.1 mass_center=(0 0 0) inertia=(1 1 1 0 0 0)
    Body FPLpt: mass=0.1 mass_center=(0 0 0) inertia=(1 1 1 0 0 0)
    Body FPLpt2: mass=0.1 mass_center=(0 0 0) inertia=(1 1 1 0 0 0)
    Body table: mass=1 mass_center=(0 0 0) inertia=(1 1 1 0 0 0)
      Brick table_geom_1: half_lengths=(0.1 0.1 0.1)
    Body Bottle: mass=1 mass_center=(0 0 0) inertia=(1 1 1 0 0 0)
      Cylinder Bottle_geom_1: scale_factors=(0.3 0.8 0.3) radius=0.1 half_height=0.1
  JointSet:
    WeldJoint ground_thorax: socket_parent_frame=/ground socket_child_frame=physicaloffsetframe
      PhysicalOffsetFrame: socket_parent=/bodyset/thorax translation=(-0.060831 -1.028971 -0.554733) [meters]
          orientation=(0 -1.540965 0) [radians]
    CustomJoint sternoclavicular: socket_parent_frame=thorax_offset socket_child_frame=clavicle_offset
      Coordinate sternoclavicular_r2: default_value=-0.1267112 range=(-99999.9 99999.9) clamped=false
      Coordinate sternoclavicular_r3: default_value=0.05366888 range=(-99999.9 99999.9) clamped=false
      PhysicalOffsetFrame thorax_offset: socket_parent=/bodyset/thorax translation=(0.006325 0.00693 0.025465)
      PhysicalOffsetFrame clavicle_offset: socket_parent=/bodyset/clavicle translation=(0 0 0)
      SpatialTransform: axes_held_at_zero=(rotation3 translation1 translation2 translation3)
        TransformAxis rotation1: coordinates=sternoclavicular_r2 axis=(0.0153 0.9892987 -0.1451)
            LinearFunction(coefficients=1 0)
        TransformAxis rotation2: coordinates=sternoclavicular_r3 axis=(-0.9944725 0 -0.104997)
            LinearFunction(coefficients=1 0)
    CustomJoint unrotscap: socket_parent_frame=clavicle_offset socket_child_frame=clavphant_offset
      Coordinate unrotscap_r3: default_value=-0.05366888 range=(-99999.9 99999.9) clamped=false
      Coordinate unrotscap_r2: default_value=0.1267112 range=(-99999.9 99999.9) clamped=false
      PhysicalOffsetFrame clavicle_offset: socket_parent=/bodyset/clavicle translation=(-0.01433 0.02007 0.135535)
      PhysicalOffsetFrame clavphant_offset: socket_parent=/bodyset/clavphant translation=(0 0 0)
      SpatialTransform: axes_held_at_zero=(rotation3 translation1 translation2 translation3)
        TransformAxis rotation1: coordinates=unrotscap_r3 axis=(-0.9944725 0 -0.104997)
            LinearFunction(coefficients=1 0)
        TransformAxis rotation2: coordinates=unrotscap_r2 axis=(0.0153 0.9892987 -0.1451)
            LinearFunction(coefficients=1 0)
    CustomJoint acromioclavicular: socket_parent_frame=clavphant_offset socket_child_frame=scapula_offset
      Coordinate acromioclavicular_r2: default_value=-0.02565644 range=(-99999.9 99999.9) clamped=false
      Coordinate acromioclavicular_r3: default_value=0.2073463 range=(-99999.9 99999.9) clamped=false
      Coordinate acromioclavicular_r1: default_value=0.09320074 range=(-99999.9 99999.9) clamped=false
      PhysicalOffsetFrame clavphant_offset: socket_parent=/bodyset/clavphant translation=(0 0 0)
      PhysicalOffsetFrame scapula_offset: socket_parent=/bodyset/scapula translation=(0 0 0)
      SpatialTransform: axes_held_at_zero=(translation1 translation2 translation3)
        TransformAxis rotation1: coordinates=acromioclavicular_r2 axis=(0.1570949 0.9472686 -0.2792909)
            LinearFunction(coefficients=1 0)
        TransformAxis rotation2: coordinates=acromioclavicular_r3 axis=(-0.754084 0.297594 0.585487)
            LinearFunction(coefficients=1 0)
        TransformAxis rotation3: coordinates=acromioclavicular_r1 axis=(0.6376998 0.1186 0.7610998)
            LinearFunction(coefficients=1 0)
    CustomJoint unrothum: socket_parent_frame=scapula_offset socket_child_frame=scapphant_offset
      Coordinate unrothum_r1: default_value=-0.09320074 range=(-99999.9 99999.9) clamped=false
      Coordinate unrothum_r3: default_value=-0.2073463 range=(-99999.9 99999.9) clamped=false
      Coordinate unrothum_r2: default_value=0.02565644 range=(-99999.9 99999.9) clamped=false
      PhysicalOffsetFrame scapula_offset: socket_parent=/bodyset/scapula translation=(-0.00955 -0.034 0.009)
      PhysicalOffsetFrame scapphant_offset: socket_parent=/bodyset/scapphant translation=(0 0 0)
      SpatialTransform: axes_held_at_zero=(translation1 translation2 translation3)
        TransformAxis rotation1: coordinates=unrothum_r1 axis=(0.6376998 0.1186 0.7610998)
            LinearFunction(coefficients=1 0)
        TransformAxis rotation2: coordinates=unrothum_r3 axis=(-0.754084 0.297594 0.585487)
            LinearFunction(coefficients=1 0)
        TransformAxis rotation3: coordinates=unrothum_r2 axis=(0.1570949 0.9472686 -0.2792909)
            LinearFunction(coefficients=1 0)
    CustomJoint shoulder0: socket_parent_frame=scapphant_offset socket_child_frame=humphant_offset
      Coordinate elv_angle: default_value=0.7853982 range=(-1.658063 2.268928) clamped=true
      PhysicalOffsetFrame scapphant_offset: socket_parent=/bodyset/scapphant translation=(0 0 0)
      PhysicalOffsetFrame humphant_offset: socket_parent=/bodyset/humphant translation=(0 0 0)
      SpatialTransform: axes_held_at_zero=(rotation2 rotation3 translation1 translation2 translation3)
        TransformAxis rotation1: coordinates=elv_angle axis=(0.0048 0.9990892 0.04240001)
            LinearFunction(coefficients=1 0)
    CustomJoint shoulder1: socket_parent_frame=humphant_offset socket_child_frame=humphant1_offset
      Coordinate shoulder_elv: default_value=0.5235988 range=(0 3.141593) clamped=true
      Coordinate shoulder1_r2: default_value=-0.7853982 range=(-99999.9 99999.9) clamped=false
      PhysicalOffsetFrame humphant_offset: socket_parent=/bodyset/humphant translation=(0 0 0)
      PhysicalOffsetFrame humphant1_offset: socket_parent=/bodyset/humphant1 translation=(0 0 0)
      SpatialTransform: axes_held_at_zero=(rotation3 translation1 translation2 translation3)
        TransformAxis rotation1: coordinates=shoulder_elv axis=(-0.9982614 0.0023 0.05889802)
            LinearFunction(coefficients=1 0)
        TransformAxis rotation2: coordinates=shoulder1_r2 axis=(0.0048 0.9990892 0.04240001)
            LinearFunction(coefficients=1 0)
    CustomJoint shoulder2: socket_parent_frame=humphant1_offset socket_child_frame=humerus_offset
      Coordinate shoulder_rot: default_value=3.331383e-10 range=(-1.570796 2.094395) clamped=true
      PhysicalOffsetFrame humphant1_offset: socket_parent=/bodyset/humphant1 translation=(0 0 0)
      PhysicalOffsetFrame humerus_offset: socket_parent=/bodyset/humerus translation=(0 0 0)
      SpatialTransform: axes_held_at_zero=(rotation2 rotation3 translation1 translation2 translation3)
        TransformAxis rotation1: coordinates=shoulder_rot axis=(0.0048 0.9990892 0.04240001)
            LinearFunction(coefficients=1 0)
    CustomJoint elbow: socket_parent_frame=humerus_offset socket_child_frame=ulna_offset
      Coordinate elbow_flexion: default_value=6.90934e-5 range=(0 2.268928) clamped=true
      PhysicalOffsetFrame humerus_offset: socket_parent=/bodyset/humerus translation=(0.0061 -0.2904 -0.0123)
      PhysicalOffsetFrame ulna_offset: socket_parent=/bodyset/ulna translation=(0 0 0)
      SpatialTransform: axes_held_at_zero=(rotation2 rotation3 translation1 translation2 translation3)
        TransformAxis rotation1: coordinates=elbow_flexion axis=(0.04940001 0.03660001 0.9981083)
            LinearFunction(coefficients=1 0)
    CustomJoint radioulnar: socket_parent_frame=ulna_offset socket_child_frame=radius_offset
      Coordinate pro_sup: default_value=-2e-8 range=(-1.570796 1.570796) clamped=true
      PhysicalOffsetFrame ulna_offset: socket_parent=/bodyset/ulna translation=(0.0004 -0.011503 0.019999)
      PhysicalOffsetFrame radius_offset: socket_parent=/bodyset/radius translation=(0 0 0)
      SpatialTransform: axes_held_at_zero=(rotation2 rotation3 translation1 translation2 translation3)
        TransformAxis rotation1: coordinates=pro_sup axis=(-0.01716099 0.9926656 -0.119668)
            LinearFunction(coefficients=1 0)
    CustomJoint radiocarpal: socket_parent_frame=radius_offset socket_child_frame=lunate_offset
      Coordinate deviation: default_value=2.288033e-7 range=(-0.1745329 0.4363323) clamped=true
      Coordinate flexion: default_value=0.1552695 range=(-1.22173 1.22173) clamped=true
      PhysicalOffsetFrame radius_offset: socket_parent=/bodyset/radius translation=(0.018 -0.242 0.025)
      PhysicalOffsetFrame lunate_offset: socket_parent=/bodyset/lunate translation=(0 0 0)
      SpatialTransform: axes_held_at_zero=(rotation2 translation1 translation2 translation3)
        TransformAxis rotation1: coordinates=deviation axis=(-0.819064 -0.135611 -0.557444)
          SimmSpline: x=(-0.174533 0 0.436332) y=(-0.174533 0 0.436332)
        TransformAxis rotation3: coordinates=flexion axis=(0.9564267 -0.2522069 0.147104)
          SimmSpline: x=(-1.5708 1.5708) y=(-0.785398 0.785398)
    WeldJoint lun_scaph: socket_parent_frame=lunate_offset socket_child_frame=scaphoid_offset
      PhysicalOffsetFrame lunate_offset: socket_parent=/bodyset/lunate translation=(0.012345 -0.004464 -0.001254)
      PhysicalOffsetFrame scaphoid_offset: socket_parent=/bodyset/scaphoid translation=(0 0 0)
    WeldJoint lun_pis: socket_parent_frame=lunate_offset socket_child_frame=pisiform_offset
      PhysicalOffsetFrame lunate_offset: socket_parent=/bodyset/lunate translation=(-0.013388 -0.009886 -0.010593)
      PhysicalOffsetFrame pisiform_offset: socket_parent=/bodyset/pisiform translation=(0 0 0)
    WeldJoint lun_triq: socket_parent_frame=lunate_offset socket_child_frame=triquetrum_offset
      PhysicalOffsetFrame lunate_offset: socket_parent=/bodyset/lunate translation=(-0.010784 -0.007499 -0.001289)
      PhysicalOffsetFrame triquetrum_offset: socket_parent=/bodyset/triquetrum translation=(0 0 0)
    CustomJoint proximal_distal: socket_parent_frame=lunate_offset socket_child_frame=capitate_offset
      Coordinate proximal_distal_r1: default_value=3.105182e-7 range=(-99999.9 99999.9) clamped=false
      Coordinate proximal_distal_r3: default_value=0.07763475 range=(-99999.9 99999.9) clamped=false
      PhysicalOffsetFrame lunate_offset: socket_parent=/bodyset/lunate translation=(0.003992 -0.015054 0.002327)
      PhysicalOffsetFrame capitate_offset: socket_parent=/bodyset/capitate translation=(0 0 0)
      SpatialTransform: axes_held_at_zero=(rotation2 translation1 translation2 translation3)
        TransformAxis rotation1: coordinates=proximal_distal_r1 axis=(0.8991357 -0.3490529 -0.2640399)
            LinearFunction(coefficients=1 0)
        TransformAxis rotation3: coordinates=proximal_distal_r3 axis=(0.9971185 0.01069999 -0.07510096)
            LinearFunction(coefficients=1 0)
    WeldJoint cap_trpzm: socket_parent_frame=capitate_offset socket_child_frame=trapezium_offset
      PhysicalOffsetFrame capitate_offset: socket_parent=/bodyset/capitate translation=(0.015293 -0.004569 -0.010308)
      PhysicalOffsetFrame trapezium_offset: socket_parent=/bodyset/trapezium translation=(0 0 0)
    WeldJoint cap_trpzd: socket_parent_frame=capitate_offset socket_child_frame=trapezoid_offset
      PhysicalOffsetFrame capitate_offset: socket_parent=/bodyset/capitate translation=(0.009143 -0.004062 -0.002464)
      PhysicalOffsetFrame trapezoid_offset: socket_parent=/bodyset/trapezoid translation=(0 0 0)
    WeldJoint cap_ham: socket_parent_frame=capitate_offset socket_child_frame=hamate_offset
      PhysicalOffsetFrame capitate_offset: socket_parent=/bodyset/capitate translation=(-0.010969 -0.002495 -0.00075)
      PhysicalOffsetFrame hamate_offset: socket_parent=/bodyset/hamate translation=(0 0 0)
    CustomJoint CMC1a: socket_parent_frame=trapezium_offset socket_child_frame=firstmc1_offset
      Coordinate cmc_flexion: default_value=0.05876524 range=(-0.2617994 0.7853982) clamped=true locked=true
      PhysicalOffsetFrame trapezium_offset: socket_parent=/bodyset/trapezium translation=(0 0 0)
      PhysicalOffsetFrame firstmc1_offset: socket_parent=/bodyset/firstmc1 translation=(0 0 0)
      SpatialTransform: axes_held_at_zero=(rotation1 rotation2 translation1 translation2 translation3)
        TransformAxis rotation3: coordinates=cmc_flexion axis=(-0.04239899 -0.6652859 0.7453838)
            LinearFunction(coefficients=1 0)
    CustomJoint CMC1b: socket_parent_frame=firstmc1_offset socket_child_frame=firstmc_offset
      Coordinate cmc_abduction: default_value=0.3650879 range=(-0.4363323 0.4363323) clamped=true
      PhysicalOffsetFrame firstmc1_offset: socket_parent=/bodyset/firstmc1 translation=(0.0072 -0.0054 -0.0025)
      PhysicalOffsetFrame firstmc_offset: socket_parent=/bodyset/firstmc translation=(0 0 0)
      SpatialTransform: axes_held_at_zero=(rotation2 rotation3 translation1 translation2 translation3)
        TransformAxis rotation1: coordinates=cmc_abduction axis=(0.495557 0.731736 0.467959)
            LinearFunction(coefficients=1 0)
    WeldJoint CMC2: socket_parent_frame=capitate_offset socket_child_frame=secondmc_offset
      PhysicalOffsetFrame capitate_offset: socket_parent=/bodyset/capitate translation=(0.014685 -0.03762 0.005032)
      PhysicalOffsetFrame secondmc_offset: socket_parent=/bodyset/secondmc translation=(0 0 0)
    WeldJoint CMC3: socket_parent_frame=capitate_offset socket_child_frame=thirdmc_offset
      PhysicalOffsetFrame capitate_offset: socket_parent=/bodyset/capitate translation=(0.000477 -0.039239 0.007377)
      PhysicalOffsetFrame thirdmc_offset: socket_parent=/bodyset/thirdmc translation=(0 0 0)
    WeldJoint CMC4: socket_parent_frame=capitate_offset socket_child_frame=fourthmc_offset
      PhysicalOffsetFrame capitate_offset: socket_parent=/bodyset/capitate translation=(-0.012046 -0.040519 0.003513)
      PhysicalOffsetFrame fourthmc_offset: socket_parent=/bodyset/fourthmc translation=(0 0 0)
    WeldJoint CMC5: socket_parent_frame=capitate_offset socket_child_frame=fifthmc_offset
      PhysicalOffsetFrame capitate_offset: socket_parent=/bodyset/capitate translation=(-0.021896 -0.034683 -0.004218)
      PhysicalOffsetFrame fifthmc_offset: socket_parent=/bodyset/fifthmc translation=(0 0 0)
    CustomJoint MCP: socket_parent_frame=firstmc_offset socket_child_frame=proximal_thumb_offset
      Coordinate mp_flexion: default_value=-0.4826359 range=(-0.7853982 0.6981317) clamped=true locked=true
      PhysicalOffsetFrame firstmc_offset: socket_parent=/bodyset/firstmc translation=(0.0165 -0.0292 -0.0127)
      PhysicalOffsetFrame proximal_thumb_offset: socket_parent=/bodyset/proximal_thumb translation=(0 0 0)
      SpatialTransform: axes_held_at_zero=(rotation1 rotation2 translation1 translation2 translation3)
        TransformAxis rotation3: coordinates=mp_flexion axis=(-0.084295 -0.203488 0.9754419)
            LinearFunction(coefficients=1 0)
    CustomJoint IP: socket_parent_frame=proximal_thumb_offset socket_child_frame=distal_thumb_offset
      Coordinate ip_flexion: default_value=-0.5966234 range=(-1.308997 0.4363323) clamped=true locked=true
      PhysicalOffsetFrame proximal_thumb_offset: socket_parent=/bodyset/proximal_thumb
          translation=(0.014 -0.0259 -0.0101)
      PhysicalOffsetFrame distal_thumb_offset: socket_parent=/bodyset/distal_thumb translation=(0 0 0)
      SpatialTransform: axes_held_at_zero=(rotation1 rotation2 translation1 translation2 translation3)
        TransformAxis rotation3: coordinates=ip_flexion axis=(-0.05010201 -0.4796231 0.8760431)
            LinearFunction(coefficients=1 0)
    CustomJoint 2MCP: socket_parent_frame=secondmc_offset socket_child_frame=2proxph_offset
      Coordinate 2mcp_flexion: default_value=-0.2559525 range=(-0.8726646 1.570796) clamped=true
      Coordinate 2mcp_abduction: default_value=0.13357 range=(-0.2617994 0.2617994) clamped=true locked=true
      PhysicalOffsetFrame secondmc_offset: socket_parent=/bodyset/secondmc translation=(0.003501 -0.028243 0.00362)
      PhysicalOffsetFrame 2proxph_offset: socket_parent=/bodyset/2proxph translation=(0 0 0)
      SpatialTransform: axes_held_at_zero=(rotation2 translation1 translation2 translation3)
        TransformAxis rotation1: coordinates=2mcp_flexion axis=(0.9975061 -0.03949601 0.05849401)
            LinearFunction(coefficients=1 0)
        TransformAxis rotation3: coordinates=2mcp_abduction axis=(-0.05499898 0.08589897 0.9947846)
            LinearFunction(coefficients=1 0)
    CustomJoint 2prox-midph: socket_parent_frame=2proxph_offset socket_child_frame=2midph_offset
      Coordinate 2pm_flexion: default_value=0.4701742 range=(0 2.094395) clamped=true locked=true
      PhysicalOffsetFrame 2proxph_offset: socket_parent=/bodyset/2proxph translation=(0.007517 -0.041273 0.007326)
      PhysicalOffsetFrame 2midph_offset: socket_parent=/bodyset/2midph translation=(0 0 0)
      SpatialTransform: axes_held_at_zero=(rotation2 rotation3 translation1 translation2 translation3)
        TransformAxis rotation1: coordinates=2pm_flexion axis=(0.9603449 0.040998 -0.275784)
            LinearFunction(coefficients=1 0)
    CustomJoint 2mid-distph: socket_parent_frame=2midph_offset socket_child_frame=2distph_offset
      Coordinate 2md_flexion: default_value=0.609085 range=(0 1.570796) clamped=true locked=true
      PhysicalOffsetFrame 2midph_offset: socket_parent=/bodyset/2midph translation=(0.003333 -0.024888 0.00122)
      PhysicalOffsetFrame 2distph_offset: socket_parent=/bodyset/2distph translation=(0 0 0)
      SpatialTransform: axes_held_at_zero=(rotation2 rotation3 translation1 translation2 translation3)
        TransformAxis rotation1: coordinates=2md_flexion axis=(0.9789773 0.07690602 -0.1889151)
            LinearFunction(coefficients=1 0)
    WeldJoint 3MCP: socket_parent_frame=thirdmc_offset socket_child_frame=3proxph_offset
      PhysicalOffsetFrame thirdmc_offset: socket_parent=/bodyset/thirdmc translation=(0.00024 -0.02629 0.001778)
      PhysicalOffsetFrame 3proxph_offset: socket_parent=/bodyset/3proxph translation=(0 0 0)
    WeldJoint 3prox-midph: socket_parent_frame=3proxph_offset socket_child_frame=3midph_offset
      PhysicalOffsetFrame 3proxph_offset: socket_parent=/bodyset/3proxph translation=(0.00165 -0.044211 0.00623)
      PhysicalOffsetFrame 3midph_offset: socket_parent=/bodyset/3midph translation=(0 0 0)
    WeldJoint 3mid-distph: socket_parent_frame=3midph_offset socket_child_frame=3distph_offset
      PhysicalOffsetFrame 3midph_offset: socket_parent=/bodyset/3midph translation=(0.001365 -0.029047 0.001954)
      PhysicalOffsetFrame 3distph_offset: socket_parent=/bodyset/3distph translation=(0 0 0)
    WeldJoint 4MCP: socket_parent_frame=fourthmc_offset socket_child_frame=4proxph_offset
      PhysicalOffsetFrame fourthmc_offset: socket_parent=/bodyset/fourthmc translation=(-0.00183 -0.023689 -0.000173)
      PhysicalOffsetFrame 4proxph_offset: socket_parent=/bodyset/4proxph translation=(0 0 0)
    WeldJoint 4prox-midph: socket_parent_frame=4proxph_offset socket_child_frame=4midph_offset
      PhysicalOffsetFrame 4proxph_offset: socket_parent=/bodyset/4proxph translation=(-0.003528 -0.040255 0.001345)
      PhysicalOffsetFrame 4midph_offset: socket_parent=/bodyset/4midph translation=(0 0 0)
    WeldJoint 4mid-distph: socket_parent_frame=4midph_offset socket_child_frame=4distph_offset
      PhysicalOffsetFrame 4midph_offset: socket_parent=/bodyset/4midph translation=(-0.002317 -0.024789 0.000563)
      PhysicalOffsetFrame 4distph_offset: socket_parent=/bodyset/4distph translation=(0 0 0)
    WeldJoint 5MCP: socket_parent_frame=fifthmc_offset socket_child_frame=5proxph_offset
      PhysicalOffsetFrame fifthmc_offset: socket_parent=/bodyset/fifthmc translation=(-0.001597 -0.021431 -0.001496)
      PhysicalOffsetFrame 5proxph_offset: socket_parent=/bodyset/5proxph translation=(0 0 0)
    WeldJoint 5prox-midph: socket_parent_frame=5proxph_offset socket_child_frame=5midph_offset
      PhysicalOffsetFrame 5proxph_offset: socket_parent=/bodyset/5proxph translation=(-0.005279 -0.035563 -0.002879)
      PhysicalOffsetFrame 5midph_offset: socket_parent=/bodyset/5midph translation=(0 0 0)
    WeldJoint 5mid-distph: socket_parent_frame=5midph_offset socket_child_frame=5distph_offset
      PhysicalOffsetFrame 5midph_offset: socket_parent=/bodyset/5midph translation=(-0.002871 -0.020677 -0.002243)
      PhysicalOffsetFrame 5distph_offset: socket_parent=/bodyset/5distph translation=(0 0 0)
    CustomJoint APLpt: socket_parent_frame=capitate_offset socket_child_frame=APLpt_offset
      Coordinate APLpt_tx: default_value=-0.0001790521 range=(-0.005 0.005) clamped=false
      Coordinate APLpt_ty: default_value=-7.162085e-5 range=(-0.005 0.005) clamped=false
      Coordinate APLpt_tz: default_value=-0.0003581043 range=(-0.005 0.005) clamped=false
      PhysicalOffsetFrame capitate_offset: socket_parent=/bodyset/capitate translation=(0 0 0)
      PhysicalOffsetFrame APLpt_offset: socket_parent=/bodyset/APLpt translation=(0 0 0)
      SpatialTransform: axes_held_at_zero=(rotation1 rotation2 rotation3)
        TransformAxis translation1: coordinates=APLpt_tx axis=(1 0 0) LinearFunction(coefficients=1 0)
        TransformAxis translation2: coordinates=APLpt_ty axis=(0 1 0) LinearFunction(coefficients=1 0)
        TransformAxis translation3: coordinates=APLpt_tz axis=(0 0 1) LinearFunction(coefficients=1 0)
    CustomJoint FPLpt: socket_parent_frame=capitate_offset socket_child_frame=FPLpt_offset
      Coordinate FPLpt_tx: default_value=-0.0002291867 range=(-0.005 0.005) clamped=false
      Coordinate FPLpt_ty: default_value=-0.0006875602 range=(-0.005 0.005) clamped=false
      Coordinate FPLpt_tz: default_value=-0.0003867526 range=(-0.005 0.005) clamped=false
      PhysicalOffsetFrame capitate_offset: socket_parent=/bodyset/capitate translation=(0 0 0)
      PhysicalOffsetFrame FPLpt_offset: socket_parent=/bodyset/FPLpt translation=(0 0 0)
      SpatialTransform: axes_held_at_zero=(rotation1 rotation2 rotation3)
        TransformAxis translation1: coordinates=FPLpt_tx axis=(1 0 0) LinearFunction(coefficients=1 0)
        TransformAxis translation2: coordinates=FPLpt_ty axis=(0 1 0) LinearFunction(coefficients=1 0)
        TransformAxis translation3: coordinates=FPLpt_tz axis=(0 0 1) LinearFunction(coefficients=1 0)
    CustomJoint FPLpt2: socket_parent_frame=capitate_offset socket_child_frame=FPLpt2_offset
      Coordinate FPLpt2_tx: default_value=4.241136e-5 range=(-0.005 0.005) clamped=false
      Coordinate FPLpt2_ty: default_value=-7.787698e-5 range=(-0.005 0.005) clamped=false
      Coordinate FPLpt2_tz: default_value=-9.345237e-5 range=(-0.005 0.005) clamped=false
      PhysicalOffsetFrame capitate_offset: socket_parent=/bodyset/capitate translation=(0 0 0)
      PhysicalOffsetFrame FPLpt2_offset: socket_parent=/bodyset/FPLpt2 translation=(0 0 0)
      SpatialTransform: axes_held_at_zero=(rotation1 rotation2 rotation3)
        TransformAxis translation1: coordinates=FPLpt2_tx axis=(1 0 0) LinearFunction(coefficients=1 0)
        TransformAxis translation2: coordinates=FPLpt2_ty axis=(0 1 0) LinearFunction(coefficients=1 0)
        TransformAxis translation3: coordinates=FPLpt2_tz axis=(0 0 1) LinearFunction(coefficients=1 0)
    WeldJoint table_to_ground: socket_parent_frame=ground_offset socket_child_frame=table_offset
      PhysicalOffsetFrame ground_offset: socket_parent=/ground translation=(0.55 0.6 -0.4)
      PhysicalOffsetFrame table_offset: socket_parent=/bodyset/table
    FreeJoint bottle_to_ground: socket_parent_frame=ground_offset socket_child_frame=Bottle_offset
      Coordinate rx
      Coordinate ry
      Coordinate rz
      Coordinate tx: default_value=0.55
      Coordinate ty: default_value=0.8
      Coordinate tz: default_value=-0.4
      PhysicalOffsetFrame ground_offset: socket_parent=/ground translation=(0 -0.02 0)
      PhysicalOffsetFrame Bottle_offset: socket_parent=/bodyset/Bottle
  ConstraintSet:
    CoordinateCouplerConstraint sternoclavicular_r2_con: independent_coordinate_names=shoulder_elv
        dependent_coordinate_name=sternoclavicular_r2 scale_factor=1
      coupled_coordinates_function: SimmSpline: x=(0 2.61799) y=(0 -0.633555)
    CoordinateCouplerConstraint sternoclavicular_r3_con: independent_coordinate_names=shoulder_elv
        dependent_coordinate_name=sternoclavicular_r3 scale_factor=1
      coupled_coordinates_function: SimmSpline: x=(0 3.14159) y=(0 0.322013)
    CoordinateCouplerConstraint unrotscap_r2_con: independent_coordinate_names=shoulder_elv
        dependent_coordinate_name=unrotscap_r2 scale_factor=1
      coupled_coordinates_function: SimmSpline: x=(0 2.61799) y=(0 0.633555)
    CoordinateCouplerConstraint unrotscap_r3_con: independent_coordinate_names=shoulder_elv
        dependent_coordinate_name=unrotscap_r3 scale_factor=1
      coupled_coordinates_function: SimmSpline: x=(0 3.14159) y=(0 -0.322013)
    CoordinateCouplerConstraint acromioclavicular_r1_con: independent_coordinate_names=shoulder_elv
        dependent_coordinate_name=acromioclavicular_r1 scale_factor=1
      coupled_coordinates_function: SimmSpline: x=(0 2.61799) y=(0 0.466003)
    CoordinateCouplerConstraint acromioclavicular_r2_con: independent_coordinate_names=shoulder_elv
        dependent_coordinate_name=acromioclavicular_r2 scale_factor=1
      coupled_coordinates_function: SimmSpline: x=(0 2.61799) y=(0 -0.128282)
    CoordinateCouplerConstraint acromioclavicular_r3_con: independent_coordinate_names=shoulder_elv
        dependent_coordinate_name=acromioclavicular_r3 scale_factor=1
      coupled_coordinates_function: SimmSpline: x=(0 2.61799) y=(0 1.03673)
    CoordinateCouplerConstraint unrothum_r1_con: independent_coordinate_names=shoulder_elv
        dependent_coordinate_name=unrothum_r1 scale_factor=1
      coupled_coordinates_function: SimmSpline: x=(0 2.61799) y=(0 -0.466003)
    CoordinateCouplerConstraint unrothum_r2_con: independent_coordinate_names=shoulder_elv
        dependent_coordinate_name=unrothum_r2 scale_factor=1
      coupled_coordinates_function: SimmSpline: x=(0 2.61799) y=(0 0.128282)
    CoordinateCouplerConstraint unrothum_r3_con: independent_coordinate_names=shoulder_elv
        dependent_coordinate_name=unrothum_r3 scale_factor=1
      coupled_coordinates_function: SimmSpline: x=(0 2.61799) y=(0 -1.03673)
    CoordinateCouplerConstraint shoulder1_r2_con: independent_coordinate_names=elv_angle
        dependent_coordinate_name=shoulder1_r2 scale_factor=1
      coupled_coordinates_function: SimmSpline: x=(-1.5708 3.14159) y=(1.5708 -3.14159)
    CoordinateCouplerConstraint proximal_distal_r1_con: independent_coordinate_names=deviation
        dependent_coordinate_name=proximal_distal_r1
      coupled_coordinates_function: SimmSpline f18: x=(-0.174533 0 0.436332) y=(-0.261799 0 0.436332)
    CoordinateCouplerConstraint proximal_distal_r3_con: independent_coordinate_names=flexion
        dependent_coordinate_name=proximal_distal_r3
      coupled_coordinates_function: SimmSpline f19: x=(-1.22173 1.22173) y=(-0.610865 0.610865)
    CoordinateCouplerConstraint APLpt_tx_con: independent_coordinate_names=flexion dependent_coordinate_name=APLpt_tx
      coupled_coordinates_function: SimmSpline: x=(-1.22173 0 1.22173) y=(0 0 -0.0025)
    CoordinateCouplerConstraint APLpt_ty_con: independent_coordinate_names=flexion dependent_coordinate_name=APLpt_ty
      coupled_coordinates_function: SimmSpline: x=(-1.22173 0 1.22173) y=(0 0 -0.001)
    CoordinateCouplerConstraint APLpt_tz_con: independent_coordinate_names=flexion dependent_coordinate_name=APLpt_tz
      coupled_coordinates_function: SimmSpline: x=(-1.22173 0 1.22173) y=(0 0 -0.005)
    CoordinateCouplerConstraint FPLpt_tx_con: independent_coordinate_names=flexion dependent_coordinate_name=FPLpt_tx
      coupled_coordinates_function: SimmSpline: x=(-1.22173 0 1.22173) y=(0 0 -0.0032)
    CoordinateCouplerConstraint FPLpt_ty_con: independent_coordinate_names=flexion dependent_coordinate_name=FPLpt_ty
      coupled_coordinates_function: SimmSpline: x=(-1.22173 0 1.22173) y=(0 0 -0.0096)
    CoordinateCouplerConstraint FPLpt_tz_con: independent_coordinate_names=flexion dependent_coordinate_name=FPLpt_tz
      coupled_coordinates_function: SimmSpline: x=(-1.22173 0 1.22173) y=(0 0 -0.0054)
    CoordinateCouplerConstraint FPLpt2_tx_con: independent_coordinate_names=cmc_flexion
        dependent_coordinate_name=FPLpt2_tx
      coupled_coordinates_function: SimmSpline: x=(-0.261799 0 0.0872665 0.183675 0.376492 0.785303)
          y=(-0.0032 0 4e-5 3.2e-5 8e-6 0)
    CoordinateCouplerConstraint FPLpt2_ty_con: independent_coordinate_names=cmc_flexion
        dependent_coordinate_name=FPLpt2_ty
      coupled_coordinates_function: SimmSpline: x=(-0.261799 0 0.785398) y=(0.0005 0 0)
    CoordinateCouplerConstraint FPLpt2_tz_con: independent_coordinate_names=cmc_flexion
        dependent_coordinate_name=FPLpt2_tz
      coupled_coordinates_function: SimmSpline: x=(-0.261799 0 0.785398) y=(0.0006 0 0)
  ForceSet:
    Ligament s_glenohum: resting_length=0.0448 pcsa_force=566.11
      PathPoint P1: humerus (0.018 0.011 -0.009)
      PathPoint P2: scapula (-0.016 -0.023 -0.017)
      PathWrap: wrap_object=LIGhh_s method=midpoint
      force_length_curve: SimmSpline: x=(0 0.5 0.8 1 1.01 1.02 1.03 1.04 1.05 1.06 1.07 1.1 1.13 1.15 1.2 1.4 1.7 2)
          y=(0 0 0 0 0.00083333 0.00333333 0.0075 0.0133333 0.0208333 0.03 0.04 0.07 0.1 0.12 0.17 0.37 0.67 0.97)
    Ligament m_glenohum: resting_length=0.0452 pcsa_force=527.219
      PathPoint P1: humerus (0.016 0.003 -0.012)
      PathPoint P2: scapula (-0.014 -0.03 -0.019)
      PathWrap: wrap_object=LIGhh_mi method=midpoint
      force_length_curve: SimmSpline: x=(0 0.5 0.8 1 1.01 1.02 1.03 1.04 1.05 1.06 1.07 1.1 1.13 1.15 1.2 1.4 1.7 2)
          y=(0 0 0 0 0.00083333 0.00333333 0.0075 0.0133333 0.0208333 0.03 0.04 0.07 0.1 0.12 0.17 0.37 0.67 0.97)
    Ligament i_glenohum: resting_length=0.0421 pcsa_force=488.328
      PathPoint P1: humerus (0.009 -0.003 -0.018)
      PathPoint P2: scapula (-0.02 -0.036 -0.02)
      PathWrap: wrap_object=LIGhh_mi method=midpoint
      force_length_curve: SimmSpline: x=(0 0.5 0.8 1 1.01 1.02 1.03 1.04 1.05 1.06 1.07 1.1 1.13 1.15 1.2 1.4 1.7 2)
          y=(0 0 0 0 0.00083333 0.00333333 0.0075 0.0133333 0.0208333 0.03 0.04 0.07 0.1 0.12 0.17 0.37 0.67 0.97)
    Ligament coracohum: resting_length=0.0501 pcsa_force=1120.87
      PathPoint P1: humerus (0.02 0.011 -0.003)
      PathPoint P2: scapula (-0.006 -0.026 -0.025)
      PathWrap: wrap_object=LIGhh_s method=hybrid
      force_length_curve: SimmSpline: x=(0 0.5 0.8 1 1.01 1.02 1.03 1.04 1.05 1.06 1.07 1.1 1.13 1.15 1.2 1.4 1.7 2)
          y=(0 0 0 0 0.00083333 0.00333333 0.0075 0.0133333 0.0208333 0.03 0.04 0.07 0.1 0.12 0.17 0.37 0.67 0.97)
    CoordinateLimitForce shoulder_elv_ligaments: coordinate=shoulder_elv upper_stiffness=100 [N*m/degree]
        upper_limit=150 [degrees] lower_stiffness=100 [N*m/degree] lower_limit=30 [degrees] damping=0
        transition=542.8423 [degrees]
    CoordinateLimitForce shoulder_elv_damping: coordinate=shoulder_elv upper_stiffness=1e-8 upper_limit=190
        lower_stiffness=1e-8 lower_limit=190 damping=0.001745 transition=1
    CoordinateLimitForce elv_angle_ligaments: coordinate=elv_angle upper_stiffness=100 upper_limit=100
        lower_stiffness=100 lower_limit=-60 damping=0 transition=545.4471
    CoordinateLimitForce elv_angle_damping: coordinate=elv_angle upper_stiffness=1e-8 upper_limit=190
        lower_stiffness=1e-8 lower_limit=190 damping=0.001745 transition=1
    CoordinateLimitForce shoulder_rot_ligaments: coordinate=shoulder_rot upper_stiffness=100 upper_limit=90
        lower_stiffness=100 lower_limit=-60 damping=0 transition=485.466
    CoordinateLimitForce shoulder_rot_damping: coordinate=shoulder_rot upper_stiffness=1e-8 upper_limit=190
        lower_stiffness=1e-8 lower_limit=190 damping=0.001745 transition=1
    CoordinateLimitForce elbow_flexion_ligaments: coordinate=elbow_flexion upper_stiffness=0.3037 upper_limit=85
        lower_stiffness=100 lower_limit=14 damping=0 transition=139.5813
    CoordinateLimitForce elbow_flexion_damping: coordinate=elbow_flexion upper_stiffness=1e-8 upper_limit=190
        lower_stiffness=1e-8 lower_limit=190 damping=0.001745 transition=1
    CoordinateLimitForce pro_sup_ligaments: coordinate=pro_sup upper_stiffness=50 upper_limit=60 lower_stiffness=50
        lower_limit=-60 damping=0 transition=430.1186
    CoordinateLimitForce pro_sup_damping: coordinate=pro_sup upper_stiffness=1e-8 upper_limit=190 lower_stiffness=1e-8
        lower_limit=190 damping=0.001745 transition=1
    CoordinateLimitForce deviation_ligaments: coordinate=deviation upper_stiffness=3013.535 upper_limit=0.3490659
        lower_stiffness=27913.13 lower_limit=-0.1047198 damping=0 transition=0.6834465
    CoordinateLimitForce deviation_damping: coordinate=deviation upper_stiffness=5.729578e-7 upper_limit=3.316126
        lower_stiffness=5.729578e-7 lower_limit=3.316126 damping=0.09998114 transition=0.01745329
    CoordinateLimitForce flexion_ligaments: coordinate=flexion upper_stiffness=11459.16 upper_limit=1.047198
        lower_stiffness=7753.448 lower_limit=-1.047198 damping=0 transition=1.62169
    CoordinateLimitForce flexion_damping: coordinate=flexion upper_stiffness=5.729578e-7 upper_limit=3.316126
        lower_stiffness=5.729578e-7 lower_limit=3.316126 damping=0.02499987 transition=0.01745329
    Millard2012EquilibriumMuscle [values shared by the 50 below unless stated]: max_contraction_velocity=10
        default_activation=1 minimum_activation=0
      ActiveForceLengthCurve: min_norm_active_fiber_length=0.4327 transition_norm_fiber_length=0.728
          max_norm_active_fiber_length=1.595 shallow_ascending_slope=0.4613 minimum_value=0
      ForceVelocityCurve: concentric_slope_at_vmax=0 concentric_slope_near_vmax=0.25 isometric_slope=5
          eccentric_slope_at_vmax=0 eccentric_slope_near_vmax=0.15 max_eccentric_velocity_force_multiplier=1.4
      FiberForceLengthCurve: strain_at_zero_force=0 strain_at_one_norm_force=0.6405 stiffness_at_low_force=0.0751
          stiffness_at_one_norm_force=6.3163 curviness=0.6658
      TendonForceLengthCurve: strain_at_one_norm_force=0.033 stiffness_at_one_norm_force=37.393
          norm_force_at_toe_end=0.2255 curviness=0.4504
    Millard2012EquilibriumMuscle DELT1: max_isometric_force=1218.9 optimal_fiber_length=0.0976
        tendon_slack_length=0.093 pennation_angle_at_optimal=0.3839724 [radians]
      PathPoint P1: humerus (0.00896 -0.11883 0.00585)
      PathPoint P2: humerus (0.01623 -0.11033 0.00412)
      PathPoint P3: scapula (0.04347 -0.03202 0.00499)
      PathPoint P4: clavicle (-0.014 0.01106 0.08021)
      PathWrap: wrap_object=delt2hum method=hybrid
      PathWrap pathwrap_0: wrap_object=DELT1hh method=hybrid range=(2 3)
    Millard2012EquilibriumMuscle DELT2: max_isometric_force=1103.5 optimal_fiber_length=0.1078
        tendon_slack_length=0.1095 pennation_angle_at_optimal=0.2617994
      PathPoint P1: humerus (0.00461 -0.13611 0.0056)
      MovingPathPoint default: humerus socket_x_coordinate=/jointset/shoulder2/shoulder_rot
          socket_y_coordinate=/jointset/shoulder2/shoulder_rot socket_z_coordinate=/jointset/shoulder2/shoulder_rot
          x_location=PiecewiseLinearFunction(x=-1.5708 0.349066, y=0.03804 0)
        y_location: PiecewiseLinearFunction: x=(-1.5708 0.349066) y=(-0.0619 -0.06012)
        z_location: SimmSpline: x=(-1.5708 -0.851248 0.349066) y=(0.00208 0.0203027 0.02532)
      PathPoint P3: scapula (5e-5 0.00294 0.02233)
      PathPoint P4: scapula (-0.01078 -0.00034 0.0062)
      PathWrap: wrap_object=Deltoid2 method=hybrid
      PathWrap pathwrap_0: wrap_object=delt2hum method=hybrid
      PathWrap pathwrap_1: wrap_object=DELT_TMAJ_LAT_PEC_CORBhh method=hybrid
    Millard2012EquilibriumMuscle DELT3: max_isometric_force=201.6 optimal_fiber_length=0.1367 tendon_slack_length=0.038
        pennation_angle_at_optimal=0.3141593
      PathPoint P1: scapula (-0.05573 0.00122 -0.02512)
      PathPoint P2: scapula (-0.07247 -0.03285 0.01233)
      PathPoint P3: humerus (0.00206 -0.07602 0.01045)
      PathWrap: wrap_object=Delt3 method=hybrid range=(1 2)
      PathWrap pathwrap_0: wrap_object=delt3hum method=hybrid
      PathWrap pathwrap_1: wrap_object=DELT_TMAJ_LAT_PEC_CORBhh method=hybrid
    Millard2012EquilibriumMuscle SUPSP: max_isometric_force=499.2 optimal_fiber_length=0.0682
        tendon_slack_length=0.0395 pennation_angle_at_optimal=0.1221731
      PathPoint P1: humerus (0.00256 0.01063 0.02593)
      PathPoint P2: scapula (-0.01918 0.00127 -0.01271)
      PathPoint P3: scapula (-0.044 -0.01512 -0.05855)
      PathWrap: wrap_object=SUPSP method=hybrid
    Millard2012EquilibriumMuscle INFSP: max_isometric_force=1075.8 optimal_fiber_length=0.0755
        tendon_slack_length=0.0308 pennation_angle_at_optimal=0.3316126
      PathPoint P1: humerus (-0.00887 0.00484 0.02448)
      PathPoint P2: scapula (-0.07382 -0.05476 -0.04781)
      PathWrap: wrap_object=INFSP method=hybrid
      PathWrap pathwrap_0: wrap_object=infsp_new method=hybrid
    Millard2012EquilibriumMuscle SUBSC: max_isometric_force=1306.9 optimal_fiber_length=0.0873
        tendon_slack_length=0.033 pennation_angle_at_optimal=0.3490659
      PathPoint P1: humerus (0.01403 0.0084 -0.01331)
      PathPoint P2: scapula (-0.01831 -0.05223 -0.02457)
      PathPoint P3: scapula (-0.07246 -0.03943 -0.06475)
      PathWrap: wrap_object=SUBSCAP method=hybrid
    Millard2012EquilibriumMuscle TMIN: max_isometric_force=269.5 optimal_fiber_length=0.0741 tendon_slack_length=0.0713
        pennation_angle_at_optimal=0.418879
      PathPoint P1: humerus (-0.00127 -0.01259 0.022)
      PathPoint P2: scapula (-0.09473 -0.07991 -0.04737)
      PathPoint P3: scapula (-0.09643 -0.08121 -0.05298)
      PathWrap: wrap_object=TMIN method=hybrid range=(1 2)
      PathWrap pathwrap_0: wrap_object=INFSP_and_TMIN_hum_head method=hybrid range=(1 2)
      PathWrap pathwrap_1: wrap_object=TMINhum method=hybrid range=(1 2)
    Millard2012EquilibriumMuscle TMAJ: max_isometric_force=144 optimal_fiber_length=0.1624 tendon_slack_length=0.02
        pennation_angle_at_optimal=0.2792527
      PathPoint P1: humerus (0.00998 -0.05419 -0.00568)
      ConditionalPathPoint default: humerus (0.009 -0.054 -0.009) socket_coordinate=/jointset/shoulder2/shoulder_rot
          range=(0.261799 2.0944) [radians]
      ConditionalPathPoint default_0: humerus (0.009 -0.054 -0.009) socket_coordinate=/jointset/shoulder0/elv_angle
          range=(-1.65806 -0.174533)
      PathPoint P2: scapula (-0.10264 -0.10319 -0.05829)
      PathPoint P3: scapula (-0.10489 -0.10895 -0.07117)
      PathWrap: wrap_object=TMAJ_LAThum method=hybrid
      PathWrap pathwrap_0: wrap_object=LAT_TMAJhh method=hybrid range=(1 4)
      PathWrap pathwrap_1: wrap_object=LAT_TMAJ2hh method=hybrid
    Millard2012EquilibriumMuscle PECM1: max_isometric_force=444.3 optimal_fiber_length=0.1442
        tendon_slack_length=0.0028 pennation_angle_at_optimal=0.296706 ignore_tendon_compliance=true
      PathPoint P1: humerus (0.01169 -0.04191 0.0078)
      MovingPathPoint default: humerus socket_x_coordinate=/jointset/shoulder1/shoulder_elv
          socket_y_coordinate=/jointset/shoulder1/shoulder_elv socket_z_coordinate=/jointset/shoulder1/shoulder_elv
          x_location=PiecewiseLinearFunction(x=0 3.14159, y=0.01615 0.02205)
          y_location=PiecewiseLinearFunction(x=0 3.14159, y=-0.04045 -0.01975)
          z_location=PiecewiseLinearFunction(x=0 3.14159, y=-0.00577 0.00863)
      MovingPathPoint default_0: thorax socket_x_coordinate=/jointset/shoulder1/shoulder_elv
          socket_y_coordinate=/jointset/shoulder1/shoulder_elv socket_z_coordinate=/jointset/shoulder1/shoulder_elv
          x_location=PiecewiseLinearFunction(x=0 3.14159, y=0.00958 -0.00972)
          y_location=PiecewiseLinearFunction(x=0 3.14159, y=-0.01509 0.03151)
          z_location=PiecewiseLinearFunction(x=0 3.14159, y=0.12664 0.08244)
      PathPoint P2: clavicle (0.00321 -0.00013 0.05113)
      PathWrap: wrap_object=Thorax method=hybrid
      PathWrap pathwrap_0: wrap_object=PEC12hum method=hybrid range=(2 3)
      PathWrap pathwrap_1: wrap_object=PEC1hh method=hybrid
    Millard2012EquilibriumMuscle PECM2: max_isometric_force=658.3 optimal_fiber_length=0.1385 tendon_slack_length=0.089
        pennation_angle_at_optimal=0.4537856
      PathPoint P1: humerus (0.01274 -0.04289 0.00785)
      MovingPathPoint default: humerus socket_x_coordinate=/jointset/shoulder1/shoulder_elv
          socket_y_coordinate=/jointset/shoulder1/shoulder_elv socket_z_coordinate=/jointset/shoulder1/shoulder_elv
          x_location=PiecewiseLinearFunction(x=0 3.14159, y=0.01453 0.02043)
          y_location=PiecewiseLinearFunction(x=0 3.14159, y=-0.04568 -0.02498)
          z_location=PiecewiseLinearFunction(x=0 3.14159, y=-0.00687 0.00753)
      MovingPathPoint default_0: thorax socket_x_coordinate=/jointset/shoulder1/shoulder_elv
          socket_y_coordinate=/jointset/shoulder1/shoulder_elv socket_z_coordinate=/jointset/shoulder1/shoulder_elv
          x_location=PiecewiseLinearFunction(x=0 3.14159, y=0.02018 0.02148)
          y_location=PiecewiseLinearFunction(x=0 3.14159, y=-0.04165 0.00155)
          z_location=PiecewiseLinearFunction(x=0 3.14159, y=0.1269 0.1042)
      PathPoint P4: thorax (0.03091 -0.03922 0.09705)
      PathPoint P5: thorax (0.02769 -0.04498 0.02271)
      PathWrap: wrap_object=Thorax method=hybrid
      PathWrap pathwrap_0: wrap_object=PEC12hum method=hybrid range=(2 3)
      PathWrap pathwrap_1: wrap_object=TMAJ_LAT_PEC_CORBhh method=hybrid
      PathWrap pathwrap_2: wrap_object=PEC23hh method=hybrid
    Millard2012EquilibriumMuscle PECM3: max_isometric_force=498.1 optimal_fiber_length=0.1385 tendon_slack_length=0.132
        pennation_angle_at_optimal=0.4363323
      PathPoint P1: humerus (0.01269 -0.04375 0.0075)
      MovingPathPoint default: humerus socket_x_coordinate=/jointset/shoulder1/shoulder_elv
          socket_y_coordinate=/jointset/shoulder1/shoulder_elv socket_z_coordinate=/jointset/shoulder1/shoulder_elv
          y_location=PiecewiseLinearFunction(x=0 3.13149, y=-0.05157 -0.040096)
        x_location: SimmSpline: x=(0 0.747517 3.14159) y=(0.01243 0.014912 0.01833)
        z_location: SimmSpline: x=(0 0.623056 2.29124 3.12533) y=(-0.01807 -0.008102 0.000123 -0.000324)
      MovingPathPoint default_0: thorax socket_x_coordinate=/jointset/shoulder1/shoulder_elv
          socket_y_coordinate=/jointset/shoulder1/shoulder_elv socket_z_coordinate=/jointset/shoulder1/shoulder_elv
          x_location=PiecewiseLinearFunction(x=0 3.14159, y=0.02984 0.02984)
          z_location=PiecewiseLinearFunction(x=0 3.14159, y=0.1151 0.1151)
        y_location: SimmSpline: x=(0.0101016 1.59605 3.14159) y=(-0.070778 -0.059781 -0.0269)
      PathPoint P4: thorax (0.0525 -0.08417 0.08935)
      PathPoint P5: thorax (0.05724 -0.11654 0.03787)
      PathWrap: wrap_object=Thorax method=hybrid
      PathWrap pathwrap_0: wrap_object=PEC3hum method=hybrid range=(2 3)
      PathWrap pathwrap_1: wrap_object=PEC23hh method=hybrid
    Millard2012EquilibriumMuscle LAT1: max_isometric_force=290.5 optimal_fiber_length=0.254 tendon_slack_length=0.12
        pennation_angle_at_optimal=0.4363323
      PathPoint P1: humerus (0.0105 -0.03415 -0.00653)
      ConditionalPathPoint default: humerus (0.01 -0.035 -0.00889323)
          socket_coordinate=/jointset/shoulder2/shoulder_rot range=(0.523599 2.0944)
      ConditionalPathPoint default_0: humerus (0.01 -0.035 -0.009) socket_coordinate=/jointset/shoulder0/elv_angle
          range=(-1.65806 -0.174533)
      MovingPathPoint default_1: scapula socket_x_coordinate=/jointset/shoulder1/shoulder_elv
          socket_y_coordinate=/jointset/shoulder1/shoulder_elv socket_z_coordinate=/jointset/shoulder1/shoulder_elv
          x_location=PiecewiseLinearFunction(x=0 3.14159, y=-0.07947 -0.08157)
          y_location=PiecewiseLinearFunction(x=0 3.14159, y=-0.08581 -0.05061)
          z_location=PiecewiseLinearFunction(x=0 3.14159, y=-0.02188 -0.03628)
      MovingPathPoint default_2: scapula socket_x_coordinate=/jointset/shoulder1/shoulder_elv
          socket_y_coordinate=/jointset/shoulder1/shoulder_elv socket_z_coordinate=/jointset/shoulder1/shoulder_elv
          x_location=PiecewiseLinearFunction(x=0 3.14159, y=-0.11215 -0.10635)
          y_location=PiecewiseLinearFunction(x=0 3.14159, y=-0.09779 -0.04699)
          z_location=PiecewiseLinearFunction(x=0 3.14159, y=-0.05322 -0.09522)
      PathPoint P4: thorax (-0.11828 -0.10118 0.03316)
      PathPoint P5: thorax (-0.09578 -0.11724 0.00882)
      PathWrap: wrap_object=TMAJ_LAThum method=hybrid
      PathWrap pathwrap_0: wrap_object=LAT_TMAJhh method=hybrid range=(1 4)
      PathWrap pathwrap_1: wrap_object=LAT_TMAJ2hh method=hybrid
    Millard2012EquilibriumMuscle LAT2: max_isometric_force=317.5 optimal_fiber_length=0.2324 tendon_slack_length=0.1765
        pennation_angle_at_optimal=0.3316126
      PathPoint P1: humerus (0.00968 -0.04071 -0.00611)
      ConditionalPathPoint default: humerus (0.008 -0.043 -0.01) socket_coordinate=/jointset/shoulder2/shoulder_rot
          range=(0.349066 2.0944)
      ConditionalPathPoint default_0: humerus (0.00799949 -0.0433861 -0.0100971)
          socket_coordinate=/jointset/shoulder0/elv_angle range=(-1.65806 -0.174533)
      MovingPathPoint default_1: scapula socket_x_coordinate=/jointset/shoulder1/shoulder_elv
          socket_y_coordinate=/jointset/shoulder1/shoulder_elv socket_z_coordinate=/jointset/shoulder1/shoulder_elv
          x_location=PiecewiseLinearFunction(x=0 3.14159, y=-0.0764 -0.0905)
          y_location=PiecewiseLinearFunction(x=0 3.14159, y=-0.1022 -0.0717)
          z_location=PiecewiseLinearFunction(x=0 3.14159, y=-0.01808 -0.03098)
      MovingPathPoint default_2: scapula socket_x_coordinate=/jointset/shoulder1/shoulder_elv
          socket_y_coordinate=/jointset/shoulder1/shoulder_elv socket_z_coordinate=/jointset/shoulder1/shoulder_elv
          x_location=PiecewiseLinearFunction(x=0 3.14159, y=-0.10054 -0.12994)
          y_location=PiecewiseLinearFunction(x=0 3.14159, y=-0.13969 -0.07529)
          z_location=PiecewiseLinearFunction(x=0 3.14159, y=-0.05258 -0.12468)
      PathPoint P4: thorax (-0.10992 -0.16908 0.02878)
      PathPoint P5: thorax (-0.07186 -0.18818 0.00815)
      PathWrap: wrap_object=TMAJ_LAThum method=hybrid
      PathWrap pathwrap_0: wrap_object=LAT_TMAJhh method=hybrid range=(1 4)
      PathWrap pathwrap_1: wrap_object=LAT_TMAJ2hh method=hybrid
    Millard2012EquilibriumMuscle LAT3: max_isometric_force=189 optimal_fiber_length=0.2789 tendon_slack_length=0.1403
        pennation_angle_at_optimal=0.3665191
      PathPoint P1: humerus (0.01208 -0.03922 -0.00416)
      ConditionalPathPoint default: humerus (0.01 -0.041 -0.009) socket_coordinate=/jointset/shoulder2/shoulder_rot
          range=(0.174533 2.0944)
      ConditionalPathPoint default_0: humerus (0.01 -0.041 -0.009) socket_coordinate=/jointset/shoulder0/elv_angle
          range=(-1.65806 -0.0872665)
      MovingPathPoint default_1: scapula socket_x_coordinate=/jointset/shoulder1/shoulder_elv
          socket_y_coordinate=/jointset/shoulder1/shoulder_elv socket_z_coordinate=/jointset/shoulder1/shoulder_elv
          x_location=PiecewiseLinearFunction(x=0 3.14159, y=-0.05678 -0.11198)
          y_location=PiecewiseLinearFunction(x=0 3.14159, y=-0.13303 -0.09893)
          z_location=PiecewiseLinearFunction(x=0 3.14159, y=-0.0213 -0.0386)
      MovingPathPoint default_2: scapula socket_x_coordinate=/jointset/shoulder1/shoulder_elv
          socket_y_coordinate=/jointset/shoulder1/shoulder_elv socket_z_coordinate=/jointset/shoulder1/shoulder_elv
          x_location=PiecewiseLinearFunction(x=0 3.14159, y=-0.09449 -0.13109)
          y_location=PiecewiseLinearFunction(x=0 3.14159, y=-0.17553 -0.10113)
          z_location=PiecewiseLinearFunction(x=0 3.14159, y=-0.04406 -0.13416)
      PathPoint P4: thorax (-0.11157 -0.19387 0.05532)
      PathPoint P5: thorax (-0.07117 -0.24858 0.00907)
      PathWrap: wrap_object=TMAJ_LAThum method=hybrid
      PathWrap pathwrap_0: wrap_object=LAT_TMAJhh method=hybrid range=(1 4)
      PathWrap pathwrap_1: wrap_object=LAT_TMAJ2hh method=hybrid
    Millard2012EquilibriumMuscle CORB: max_isometric_force=208.2 optimal_fiber_length=0.0932 tendon_slack_length=0.097
        pennation_angle_at_optimal=0.4712389
      PathPoint P1: scapula (0.0125 -0.04127 -0.02652)
      PathPoint P2: scapula (0.00483 -0.06958 -0.01563)
      PathPoint P3: humerus (0.00743 -0.15048 -0.00782)
      PathWrap: wrap_object=CORBhum method=hybrid
      PathWrap pathwrap_0: wrap_object=TMAJ_LAT_PEC_CORBhh method=hybrid
    Millard2012EquilibriumMuscle TRIlong: max_isometric_force=771.8 optimal_fiber_length=0.134
        tendon_slack_length=0.143 pennation_angle_at_optimal=0.2094395
      PathPoint P1: scapula (-0.04565 -0.04073 -0.01377)
      PathPoint P2: humerus (-0.02714 -0.11441 -0.00664)
      PathPoint P3: humerus (-0.03184 -0.22637 -0.01217)
      PathPoint P4: humerus (-0.01743 -0.26757 -0.01208)
      PathPoint P5: ulna (-0.0219 0.01046 -0.00078)
      PathWrap: wrap_object=TRI method=hybrid
      PathWrap pathwrap_0: wrap_object=TRIlonghh method=hybrid
      PathWrap pathwrap_1: wrap_object=TRIlongglen method=hybrid range=(1 2)
    Millard2012EquilibriumMuscle TRIlat: max_isometric_force=717.5 optimal_fiber_length=0.1138
        tendon_slack_length=0.098 pennation_angle_at_optimal=0.1570796
      PathPoint P1: humerus (-0.00599 -0.12646 0.00428)
      PathPoint P2: humerus (-0.02344 -0.14528 0.00928)
      PathPoint P3: humerus (-0.03184 -0.22637 -0.01217)
      PathPoint P4: humerus (-0.01743 -0.26757 -0.01208)
      PathPoint P5: ulna (-0.0219 0.01046 -0.00078)
      PathWrap: wrap_object=TRI method=hybrid
    Millard2012EquilibriumMuscle TRImed: max_isometric_force=717.5 optimal_fiber_length=0.1138
        tendon_slack_length=0.0908 pennation_angle_at_optimal=0.1570796
      PathPoint P1: humerus (-0.00838 -0.13695 -0.00906)
      PathPoint P2: humerus (-0.02601 -0.15139 -0.0108)
      PathPoint P3: humerus (-0.03184 -0.22637 -0.01217)
      PathPoint P4: humerus (-0.01743 -0.26757 -0.01208)
      PathPoint P5: ulna (-0.0219 0.01046 -0.00078)
      PathWrap: wrap_object=TRI method=hybrid
    Millard2012EquilibriumMuscle ANC: max_isometric_force=283.2 optimal_fiber_length=0.027 tendon_slack_length=0.018
        pennation_angle_at_optimal=0
      PathPoint P1: humerus (-0.00744 -0.28359 0.00979)
      PathPoint P2: ulna (-0.02532 -0.00124 0.006)
      PathWrap: wrap_object=ANC method=hybrid
    Millard2012EquilibriumMuscle SUP: max_isometric_force=379.6 optimal_fiber_length=0.033 tendon_slack_length=0.028
        pennation_angle_at_optimal=0
      PathPoint P1: radius (0.00996 -0.06096 0.00075)
      PathPoint P2: radius (0.01201 -0.0517 -0.00107)
      PathPoint P3: ulna (-0.0136 -0.03384 0.02013)
      PathWrap: wrap_object=SUP method=hybrid
    Millard2012EquilibriumMuscle BIClong: max_isometric_force=525.1 optimal_fiber_length=0.1157
        tendon_slack_length=0.2723 pennation_angle_at_optimal=0
      PathPoint P1: scapula (-0.03123 -0.02353 -0.01305)
      PathPoint P2: scapula (-0.02094 -0.01309 -0.00461)
      PathPoint P3: humerus (0.02131 0.01793 0.01028)
      PathPoint P4: humerus (0.02378 -0.00511 0.01201)
      PathPoint P5: humerus (0.01345 -0.02827 0.00136)
      PathPoint P6: humerus (0.01068 -0.07736 -0.00165)
      PathPoint P7: humerus (0.01703 -0.12125 0.00024)
      PathPoint P8: humerus (0.0228 -0.1754 -0.0063)
      MovingPathPoint default: radius socket_x_coordinate=/jointset/radioulnar/pro_sup
          socket_y_coordinate=/jointset/radioulnar/pro_sup socket_z_coordinate=/jointset/radioulnar/pro_sup
        x_location: SimmSpline: x=(-1.57561 1.57823) y=(-0.0055 0.01096)
        y_location: PiecewiseLinearFunction: x=(-1.57561 0 1.57561) y=(-0.0282 -0.035 -0.0392)
        z_location: SimmSpline: x=(-1.57561 0.0866167 1.57561) y=(-0.01 -0.01358 -0.01083)
      PathPoint P11: radius (-0.002 -0.0375 -0.002)
      PathWrap: wrap_object=Elbow_BIC_BRD method=hybrid
      PathWrap pathwrap_0: wrap_object=BIClong method=hybrid range=(2 5)
    Millard2012EquilibriumMuscle BICshort: max_isometric_force=316.8 optimal_fiber_length=0.1321
        tendon_slack_length=0.1923 pennation_angle_at_optimal=0
      PathPoint P1: scapula (0.01268 -0.03931 -0.02625)
      PathPoint P2: scapula (0.00093 -0.06704 -0.01593)
      PathPoint P3: humerus (0.01117 -0.07576 -0.01101)
      PathPoint P4: humerus (0.01703 -0.12125 -0.01079)
      PathPoint P5: humerus (0.0228 -0.1754 -0.0063)
      MovingPathPoint default: radius socket_x_coordinate=/jointset/radioulnar/pro_sup
          socket_y_coordinate=/jointset/radioulnar/pro_sup socket_z_coordinate=/jointset/radioulnar/pro_sup
        x_location: SimmSpline: x=(-1.57561 1.57823) y=(-0.0055 0.01096)
        y_location: PiecewiseLinearFunction: x=(-1.57561 0 1.57561) y=(-0.0282 -0.035 -0.0392)
        z_location: SimmSpline: x=(-1.57561 0.0866167 1.57561) y=(-0.01 -0.01358 -0.01083)
      PathPoint P8: radius (-0.002 -0.0375 -0.002)
      PathWrap: wrap_object=Elbow_BIC_BRD method=hybrid
    Millard2012EquilibriumMuscle BRA: max_isometric_force=1177.37 optimal_fiber_length=0.0858
        tendon_slack_length=0.0535 pennation_angle_at_optimal=0
      PathPoint P1: humerus (0.0068 -0.1739 -0.0036)
      ConditionalPathPoint P2: humerus (0.01894 -0.28559 -0.01105) socket_coordinate=/jointset/elbow/elbow_flexion
          range=(0 0.813149)
      ConditionalPathPoint P3: ulna (0.00498 -0.01463 0.00128) socket_coordinate=/jointset/elbow/elbow_flexion
          range=(0 0.813149)
      PathPoint P4: ulna (-0.0032 -0.0239 0.0009)
    Millard2012EquilibriumMuscle BRD: max_isometric_force=276 optimal_fiber_length=0.1726 tendon_slack_length=0.133
        pennation_angle_at_optimal=0
      PathPoint P1: humerus (-0.0098 -0.19963 0.00223)
      PathPoint P2: radius (0.03577 -0.12742 0.02315)
      PathPoint P3: radius (0.0419 -0.221 0.0224)
      PathWrap: wrap_object=Elbow_BIC_BRD method=hybrid
    Millard2012EquilibriumMuscle ECRL: max_isometric_force=337.3 optimal_fiber_length=0.081 tendon_slack_length=0.244
        pennation_angle_at_optimal=0
      PathPoint P1: humerus (-0.0073 -0.2609 0.0091)
      PathPoint P2: radius (0.03195 -0.13463 0.02779)
      PathPoint P3: radius (0.04243 -0.23684 0.0362)
      PathPoint P4: secondmc (0.00249 0.0164 0.0008)
      PathWrap: wrap_object=Elbow_PT_ECRL method=hybrid
      PathWrap pathwrap_0: wrap_object=ECRL method=hybrid
    Millard2012EquilibriumMuscle ECRB: max_isometric_force=252.5 optimal_fiber_length=0.0585 tendon_slack_length=0.2223
        pennation_angle_at_optimal=0.1570796
      PathPoint P1: humerus (0.01349 -0.29048 0.01698)
      PathPoint P2: radius (0.02905 -0.13086 0.02385)
      PathPoint P3: radius (0.03549 -0.22805 0.03937)
      PathPoint P4: thirdmc (0.00452 0.02788 0.00112)
      PathWrap: wrap_object=ECRB method=hybrid
    Millard2012EquilibriumMuscle ECU: max_isometric_force=192.9 optimal_fiber_length=0.0622 tendon_slack_length=0.2285
        pennation_angle_at_optimal=0.0698132
      PathPoint P1: humerus (0.00083 -0.28955 0.0188)
      PathPoint P2: ulna (-0.01391 -0.03201 0.02947)
      PathPoint P3: ulna (-0.01705 -0.05428 0.02868)
      PathPoint P4: ulna (-0.01793 -0.09573 0.03278)
      PathPoint P5: radius (-0.01421 -0.22696 0.03481)
      PathPoint P6: fifthmc (-0.00061 0.02067 0.00294)
      PathWrap: wrap_object=ECU method=hybrid
    Millard2012EquilibriumMuscle FCR: max_isometric_force=407.9 optimal_fiber_length=0.0628 tendon_slack_length=0.244
        pennation_angle_at_optimal=0.0523599
      PathPoint P1: humerus (0.00758 -0.27806 -0.03705)
      PathPoint P2: radius (0.0211 -0.21943 0.00127)
      PathPoint P3: secondmc (-0.00345 0.01918 -0.00921)
      PathWrap: wrap_object=Elbow_PT_ECRL method=hybrid
      PathWrap pathwrap_0: wrap_object=FCR method=hybrid
    Millard2012EquilibriumMuscle FCU: max_isometric_force=479.8 optimal_fiber_length=0.0509 tendon_slack_length=0.265
        pennation_angle_at_optimal=0.2094395
      PathPoint P1: humerus (0.00219 -0.2774 -0.0388)
      MovingPathPoint P2: radius socket_x_coordinate=/jointset/radioulnar/pro_sup
          socket_y_coordinate=/jointset/radioulnar/pro_sup socket_z_coordinate=/jointset/radioulnar/pro_sup
        x_location: SimmSpline: x=(-1.5708 0 1.5708) y=(0.00279 0.00949 0.01869)
        y_location: SimmSpline: x=(-1.5708 0 1.5708) y=(-0.1838 -0.1841 -0.1821)
        z_location: SimmSpline: x=(-1.5708 0 1.5708) y=(0.0069 0.0005 0.0002)
      PathPoint P3: radius (0.01082 -0.22327 0.00969)
      PathPoint P4: fifthmc (0.00154 0.01703 -0.0033)
      PathWrap: wrap_object=FCU method=hybrid
      PathWrap pathwrap_0: wrap_object=Elbow_PT_ECRL method=hybrid
    Millard2012EquilibriumMuscle PL: max_isometric_force=101 optimal_fiber_length=0.0638 tendon_slack_length=0.2694
        pennation_angle_at_optimal=0.06981317
      PathPoint P1: humerus (0.00457 -0.27519 -0.03865)
      PathPoint P2: radius (0.02531 -0.23915 -0.00276)
      PathPoint P3: capitate (0.00917 -0.01898 -0.01754)
      PathPoint P4: thirdmc (0.00179 0.00828 -0.00245)
      PathWrap: wrap_object=PL method=hybrid
      PathWrap pathwrap_0: wrap_object=Elbow_PT_ECRL method=hybrid
    Millard2012EquilibriumMuscle PT: max_isometric_force=557.2 optimal_fiber_length=0.0492 tendon_slack_length=0.098
        pennation_angle_at_optimal=0.1745329
      PathPoint P1: humerus (0.0036 -0.2759 -0.0365)
      PathPoint P2: ulna (0.00846 -0.03373 -0.01432)
      MovingPathPoint P3: ulna socket_x_coordinate=/jointset/radioulnar/pro_sup
          socket_y_coordinate=/jointset/radioulnar/pro_sup socket_z_coordinate=/jointset/radioulnar/pro_sup
        x_location: PiecewiseLinearFunction: x=(-1.5708 1.5708) y=(0.01884 0.00554)
        y_location: SimmSpline: x=(-1.5708 1.5708) y=(-0.06086 -0.06946)
        z_location: SimmSpline: x=(-1.5708 1.5708) y=(0.00506 -0.00944)
      ConditionalPathPoint P4: radius (0.0236 -0.0934 0.0094) socket_coordinate=/jointset/radioulnar/pro_sup
          range=(-1.5708 0.509636)
      PathPoint P5: radius (0.0254 -0.1088 0.0198)
      PathWrap: wrap_object=Elbow_PT_ECRL method=hybrid
    Millard2012EquilibriumMuscle PQ: max_isometric_force=284.7 optimal_fiber_length=0.0282 tendon_slack_length=0.005
        pennation_angle_at_optimal=0.1745329
      PathPoint P1: radius (0.03245 -0.19998 0.01962)
      PathPoint P2: ulna (0.00193 -0.20972 0.03632)
      PathWrap: wrap_object=PQ2 method=hybrid
      PathWrap pathwrap_0: wrap_object=PQ1 method=hybrid
    Millard2012EquilibriumMuscle FDSL: appliesForce=false max_isometric_force=75.3 optimal_fiber_length=0.0515
        tendon_slack_length=0.3386 pennation_angle_at_optimal=0.08726646
      PathPoint P1: humerus (0.00421 -0.27598 -0.03864)
      PathPoint P2: radius (0.01377 -0.18718 0.00205)
      PathPoint P3: capitate (-0.00235 -0.01393 -0.01376)
      PathPoint P4: fourthmc (-0.00294 0.00846 -0.01213)
      PathPoint P5: fifthmc (-0.00032 -0.01968 -0.00757)
      PathPoint P6: 5proxph (-0.00323 -0.03568 -0.00417)
      PathPoint P7: 5midph (-0.0026 -0.01983 -0.0035)
      PathWrap: wrap_object=FDS method=hybrid
      PathWrap pathwrap_0: wrap_object=Elbow_PT_ECRL method=hybrid
    Millard2012EquilibriumMuscle FDSR: appliesForce=false max_isometric_force=171.2 optimal_fiber_length=0.0736
        tendon_slack_length=0.328 pennation_angle_at_optimal=0.06981317
      PathPoint P1: humerus (0.00479 -0.2788 -0.03731)
      PathPoint P2: radius (0.01571 -0.18666 0.00267)
      PathPoint P3: capitate (-0.00082 -0.01344 -0.01359)
      PathPoint P4: thirdmc (-0.00914 0.00544 -0.01085)
      PathPoint P5: fourthmc (-0.0029 -0.02334 -0.00767)
      PathPoint P6: 4proxph (-0.00172 -0.03947 -0.00102)
      PathPoint P7: 4midph (-2e-5 -0.02501 0.00029)
      PathWrap: wrap_object=FDS method=hybrid
      PathWrap pathwrap_0: wrap_object=Elbow_PT_ECRL method=hybrid
    Millard2012EquilibriumMuscle FDSM: appliesForce=false max_isometric_force=258.8 optimal_fiber_length=0.0749
        tendon_slack_length=0.295 pennation_angle_at_optimal=0.1221731
      PathPoint P1: ulna (-0.00669 -0.02713 -0.00191)
      PathPoint P2: radius (0.01899 -0.18706 0.00424)
      PathPoint P3: capitate (0.0068 -0.01377 -0.01399)
      PathPoint P4: thirdmc (0.00128 0.00639 -0.00952)
      PathPoint P5: thirdmc (0.00263 -0.02478 -0.00183)
      PathPoint P6: 3proxph (0.00252 -0.04307 0.00417)
      PathPoint P7: 3midph (0.00155 -0.02773 0.00067)
      PathWrap: wrap_object=FDS method=hybrid
    Millard2012EquilibriumMuscle FDSI: appliesForce=false max_isometric_force=162.5 optimal_fiber_length=0.0835
        tendon_slack_length=0.275 pennation_angle_at_optimal=0.1047198
      PathPoint P1: ulna (-0.00676 -0.02819 -0.00137)
      PathPoint P2: radius (0.02145 -0.18623 0.00552)
      PathPoint P3: capitate (0.00889 -0.01366 -0.01387)
      PathPoint P4: secondmc (-0.00407 -0.00025 -0.00479)
      PathPoint P5: secondmc (0.00304 -0.02206 -0.00579)
      PathPoint P6: 2proxph (0.00427 -0.03367 0.00444)
      PathPoint P7: 2midph (0.00228 -0.02088 -0.00029)
      PathWrap: wrap_object=FDS method=hybrid
      PathWrap pathwrap_0: wrap_object=2ndmcp method=hybrid range=(5 6)
    Millard2012EquilibriumMuscle FDPL: appliesForce=false max_isometric_force=236.8 optimal_fiber_length=0.0749
        tendon_slack_length=0.2819 pennation_angle_at_optimal=0.1396263
      PathPoint P1: ulna (-0.00628 -0.03214 0.00254)
      PathPoint P2: radius (0.01409 -0.18516 0.00861)
      PathPoint P3: capitate (-0.00088 -0.01027 -0.01188)
      PathPoint P4: fourthmc (-0.00686 0.0089 -0.00619)
      PathPoint P5: fifthmc (-0.00185 -0.01878 -0.00706)
      PathPoint P6: 5proxph (-0.0049 -0.03465 -0.00598)
      PathPoint P7: 5distph (-0.00032 -0.00433 -0.00165)
      PathWrap: wrap_object=FDP method=hybrid
    Millard2012EquilibriumMuscle FDPR: appliesForce=false max_isometric_force=172.9 optimal_fiber_length=0.0798
        tendon_slack_length=0.2915 pennation_angle_at_optimal=0.1221731
      PathPoint P1: ulna (-0.00502 -0.03374 0.00273)
      PathPoint P2: radius (0.0158 -0.18629 0.00803)
      PathPoint P3: capitate (0.00106 -0.01177 -0.01184)
      PathPoint P4: thirdmc (-0.0104 0.00473 -0.00804)
      PathPoint P5: fourthmc (-0.00289 -0.02297 -0.00609)
      PathPoint P6: 4proxph (-0.00304 -0.04002 -0.00075)
      PathPoint P7: 4distph (0.0001 -0.0066 -0.00066)
      PathWrap: wrap_object=FDP method=hybrid
    Millard2012EquilibriumMuscle FDPM: appliesForce=false max_isometric_force=212.4 optimal_fiber_length=0.0835
        tendon_slack_length=0.303 pennation_angle_at_optimal=0.1047198
      PathPoint P1: ulna (-0.00522 -0.03327 0.0021)
      PathPoint P2: radius (0.01906 -0.18644 0.00785)
      PathPoint P3: capitate (0.00335 -0.0128 -0.01144)
      PathPoint P4: thirdmc (-0.00128 0.00609 -0.00838)
      PathPoint P5: thirdmc (0.00034 -0.02347 -0.00303)
      PathPoint P6: 3proxph (0.00102 -0.04333 0.00294)
      PathPoint P7: 3distph (0.00023 -0.00505 -0.00226)
      PathWrap: wrap_object=FDP method=hybrid
    Millard2012EquilibriumMuscle FDPI: appliesForce=false max_isometric_force=197.3 optimal_fiber_length=0.0749
        tendon_slack_length=0.3015 pennation_angle_at_optimal=0.1221731
      PathPoint P1: ulna (-0.00647 -0.03176 0.0028)
      PathPoint P2: radius (0.0208 -0.1856 0.00915)
      PathPoint P3: capitate (0.00896 -0.01168 -0.01212)
      PathPoint P4: secondmc (-0.00432 0.00663 -0.00248)
      PathPoint P5: secondmc (0.0042 -0.02262 -0.00499)
      PathPoint P6: 2proxph (0.00581 -0.03555 0.00306)
      PathPoint P7: 2distph (0.00046 -0.0046 -0.00301)
      PathWrap: wrap_object=FDP method=hybrid
      PathWrap pathwrap_0: wrap_object=2ndmcp method=hybrid range=(4 5)
    Millard2012EquilibriumMuscle EDCL: appliesForce=false max_isometric_force=39.4 optimal_fiber_length=0.065
        tendon_slack_length=0.335 pennation_angle_at_optimal=0.03490659
      PathPoint P1: humerus (-0.0004 -0.28831 0.0187)
      MovingPathPoint P2: radius socket_x_coordinate=/jointset/radioulnar/pro_sup
          socket_y_coordinate=/jointset/radioulnar/pro_sup socket_z_coordinate=/jointset/radioulnar/pro_sup
        x_location: SimmSpline: x=(-1.5708 0 1.5708) y=(0.0121 0.0013 -0.0095)
        y_location: SimmSpline: x=(-1.5708 0 1.5708) y=(-0.04018 -0.03888 -0.03508)
        z_location: SimmSpline: x=(-1.5708 0 1.5708) y=(0.01055 0.01405 0.01316)
      PathPoint P3: radius (0.00993 -0.22304 0.03618)
      PathPoint P4: fifthmc (-0.00478 -0.01915 0.00447)
      PathPoint P5: 5proxph (-0.00716 -0.03302 -0.00089)
      PathPoint P6: 5distph (-0.00142 0.00068 0.00115)
      PathWrap: wrap_object=EDCL method=hybrid range=(3 4)
    Millard2012EquilibriumMuscle EDCR: appliesForce=false max_isometric_force=109.2 optimal_fiber_length=0.0626
        tendon_slack_length=0.365 pennation_angle_at_optimal=0.05235988
      PathPoint P1: humerus (-0.00156 -0.28936 0.01782)
      MovingPathPoint P2: radius socket_x_coordinate=/jointset/radioulnar/pro_sup
          socket_y_coordinate=/jointset/radioulnar/pro_sup socket_z_coordinate=/jointset/radioulnar/pro_sup
        x_location: SimmSpline: x=(-1.5708 0 1.5708) y=(0.0134 0.0026 -0.0082)
        y_location: SimmSpline: x=(-1.5708 0 1.5708) y=(-0.04121 -0.03991 -0.03611)
        z_location: SimmSpline: x=(-1.5708 0 1.5708) y=(0.01202 0.01552 0.01463)
      PathPoint P3: radius (0.00882 -0.22366 0.04284)
      PathPoint P4: fourthmc (-0.00338 -0.0233 0.00513)
      PathPoint P5: 4proxph (-0.00546 -0.03868 0.00413)
      PathPoint P6: 4distph (-0.00171 -0.00375 0.00241)
      PathWrap: wrap_object=EDCR method=hybrid
    Millard2012EquilibriumMuscle EDCM: appliesForce=false max_isometric_force=94.4 optimal_fiber_length=0.0724
        tendon_slack_length=0.365 pennation_angle_at_optimal=0.05235988
      PathPoint P1: humerus (0.00051 -0.28984 0.01949)
      MovingPathPoint P2: radius socket_x_coordinate=/jointset/radioulnar/pro_sup
          socket_y_coordinate=/jointset/radioulnar/pro_sup socket_z_coordinate=/jointset/radioulnar/pro_sup
        x_location: SimmSpline: x=(-1.5708 0 1.5708) y=(0.01396 0.00316 -0.00764)
        y_location: SimmSpline: x=(-1.5708 0 1.5708) y=(-0.04078 -0.03948 -0.03568)
        z_location: SimmSpline: x=(-1.5708 0 1.5708) y=(0.01178 0.01528 0.01439)
      PathPoint P3: radius (0.0144 -0.22323 0.04223)
      PathPoint P4: thirdmc (0.00131 -0.02342 0.00764)
      PathPoint P5: 3proxph (0.00179 -0.04239 0.01003)
      PathPoint P6: 3distph (0.00077 -0.01111 0.00201)
      PathWrap: wrap_object=EDCM method=hybrid range=(1 4)
    Millard2012EquilibriumMuscle EDCI: appliesForce=false max_isometric_force=48.8 optimal_fiber_length=0.07
        tendon_slack_length=0.365 pennation_angle_at_optimal=0.05235988
      PathPoint P1: humerus (0.00065 -0.28898 0.01869)
      MovingPathPoint P2: radius socket_x_coordinate=/jointset/radioulnar/pro_sup
          socket_y_coordinate=/jointset/radioulnar/pro_sup socket_z_coordinate=/jointset/radioulnar/pro_sup
        x_location: SimmSpline: x=(-1.5708 0 1.5708) y=(0.01308 0.00228 -0.00852)
        y_location: SimmSpline: x=(-1.5708 0 1.5708) y=(-0.04048 -0.03918 -0.03538)
        z_location: SimmSpline: x=(-1.5708 0 1.5708) y=(0.01133 0.01483 0.01394)
      PathPoint P3: radius (0.01533 -0.22314 0.04196)
      PathPoint P4: secondmc (0.00474 -0.02656 0.01293)
      PathPoint P5: 2proxph (0.00192 -0.01101 0.01021)
      PathPoint P6: 2proxph (0.00771 -0.04191 0.01399)
      PathPoint P7: 2midph (0.00123 -0.00941 0.00581)
      PathPoint P8: 2midph (0.0026 -0.01959 0.00363)
      PathPoint P9: 2distph (0.00025 -0.0037 0.00228)
      PathWrap: wrap_object=EDCI method=hybrid range=(3 4)
      PathWrap pathwrap_0: wrap_object=Secondpm method=hybrid range=(5 6)
      PathWrap pathwrap_1: wrap_object=Secondmd method=hybrid range=(7 8)
    Millard2012EquilibriumMuscle EDM: appliesForce=false max_isometric_force=72.4 optimal_fiber_length=0.0675
        tendon_slack_length=0.335 pennation_angle_at_optimal=0.05235988
      PathPoint P1: humerus (0.00089 -0.28919 0.01847)
      PathPoint P2: ulna (-0.00977 -0.03907 0.03085)
      PathPoint P3: ulna (-0.00755 -0.08267 0.03646)
      PathPoint P4: radius (0.00454 -0.22641 0.03678)
      PathPoint P5: fifthmc (0.00131 0.02436 0.00794)
      PathPoint P6: fifthmc (-0.00537 -0.01848 0.00316)
      PathPoint P7: 5proxph (-0.0054 -0.03237 0.00015)
      PathPoint P8: 5distph (-0.00226 -0.00334 0.00062)
      PathWrap: wrap_object=EDM method=hybrid range=(4 5)
    Millard2012EquilibriumMuscle EIP: max_isometric_force=47.3 optimal_fiber_length=0.0589 tendon_slack_length=0.21
        pennation_angle_at_optimal=0.1047198
      PathPoint P1: ulna (-0.00394 -0.16652 0.03682)
      PathPoint P2: ulna (0.00171 -0.17469 0.04049)
      PathPoint P3: radius (0.01076 -0.22783 0.03664)
      PathPoint P4: secondmc (-0.01081 0.01528 0.00681)
      PathPoint P5: secondmc (0.00441 -0.02602 0.01285)
      PathPoint P6: 2proxph (0.00171 -0.01033 0.00947)
      PathPoint P7: 2proxph (0.00714 -0.04133 0.01413)
      PathPoint P8: 2midph (0.00115 -0.00899 0.00597)
      PathPoint P9: 2midph (0.00294 -0.02043 0.00377)
      PathPoint P10: 2distph (0.00264 -0.01233 0.00266)
      PathWrap: wrap_object=Extensor_ellipse method=hybrid
      PathWrap pathwrap_0: wrap_object=Secondpm method=hybrid range=(5 6)
      PathWrap pathwrap_1: wrap_object=Secondmd method=hybrid range=(7 8)
    Millard2012EquilibriumMuscle EPL: appliesForce=false max_isometric_force=88.3 optimal_fiber_length=0.054
        tendon_slack_length=0.2305 pennation_angle_at_optimal=0.1047198
      PathPoint P1: ulna (-0.01412 -0.09706 0.02952)
      PathPoint P2: radius (0.00124 -0.13668 0.0227)
      PathPoint P3: radius (0.02702 -0.21872 0.03828)
      PathPoint P4: radius (0.03382 -0.22754 0.04607)
      PathPoint P5: radius (0.04234 -0.23771 0.04173)
      PathPoint P6: capitate (0.02428 0.00014 0.00608)
      PathPoint P7: trapezium (0.00809 -0.0046 0.00992)
      PathPoint P8: firstmc (0.00656 -0.0043 0.00792)
      PathPoint P9: firstmc (0.02165 -0.0242 -0.00533)
      PathPoint P10: proximal_thumb (0.01147 -0.00362 0.00156)
      PathPoint P11: proximal_thumb (0.01921 -0.0265 -0.01038)
      PathPoint P12: distal_thumb (0.00543 -0.00714 -0.00464)
      PathWrap: wrap_object=MPthumb method=hybrid
    Millard2012EquilibriumMuscle EPB: max_isometric_force=46 optimal_fiber_length=0.0675 tendon_slack_length=0.1155
        pennation_angle_at_optimal=0.122173
      PathPoint P1: radius (0.01924 -0.14695 0.02114)
      PathPoint P2: radius (0.02276 -0.15857 0.02665)
      PathPoint P3: radius (0.03831 -0.19722 0.03834)
      PathPoint P4: radius (0.05235 -0.23611 0.02699)
      PathPoint P5: capitate (0.03123 0.00256 -0.00327)
      PathPoint P6: firstmc1 (0.01443 -0.00337 -0.00405)
      PathPoint P7: firstmc (0.02173 -0.02303 -0.01141)
      PathPoint P8: proximal_thumb (0.00927 -0.00618 -0.00557)
      PathWrap: wrap_object=MPthumb method=hybrid
    Millard2012EquilibriumMuscle FPL: appliesForce=false max_isometric_force=201 optimal_fiber_length=0.0552
        tendon_slack_length=0.197 pennation_angle_at_optimal=0.1221731
      PathPoint: radius (0.00971 -0.09458 0.01769)
      PathPoint pathpoint_0: radius (0.01658 -0.13525 0.01915)
      PathPoint pathpoint_1: radius (0.01869 -0.17932 0.01988)
      PathPoint pathpoint_2: radius (0.038 -0.23171 0.0158)
      PathPoint pathpoint_3: FPLpt (0.01869 0.00882 -0.01547)
      PathPoint pathpoint_4: FPLpt2 (0.01244 -0.02207 -0.02089)
      PathPoint pathpoint_5: firstmc (-0.00608 -0.01624 -0.0094)
      PathPoint pathpoint_6: firstmc (0.002051812 -0.02307458 -0.0117827)
      PathPoint pathpoint_7: proximal_thumb (-0.0045 -0.01842 -0.00508)
      PathPoint pathpoint_8: proximal_thumb (0.0059 -0.02602 -0.01114)
      PathPoint pathpoint_9: distal_thumb (0.00242 -0.01127 -0.00412)
      PathWrap: wrap_object=FPL method=hybrid
      PathWrap pathwrap_0: wrap_object=IPthumb method=hybrid range=(10 11)
      PathWrap pathwrap_1: wrap_object=MPthumb method=hybrid
    Millard2012EquilibriumMuscle APL: appliesForce=false max_isometric_force=116.7 optimal_fiber_length=0.0713
        tendon_slack_length=0.1295 pennation_angle_at_optimal=0.1396263
      PathPoint P1: radius (0.01154 -0.09477 0.01681)
      PathPoint P2: radius (0.0303 -0.1397001 0.04079264)
      PathPoint P3: radius (0.03993 -0.16072 0.034)
      PathPoint P4: radius (0.04397 -0.17845 0.03134)
      PathPoint P5: radius (0.05505 -0.23084 0.02368)
      MovingPathPoint P6: APLpt socket_x_coordinate=/jointset/radiocarpal/flexion
          socket_y_coordinate=/jointset/radiocarpal/flexion socket_z_coordinate=/jointset/radiocarpal/flexion
        x_location: SimmSpline: x=(-1.22173 0 1.22173) y=(0.03385 0.03385 0.03135)
        y_location: SimmSpline: x=(-1.22173 0 1.22173) y=(0.00634 0.00634 0.00534)
        z_location: SimmSpline: x=(-1.22173 0 1.22173) y=(-0.00745 -0.00745 -0.01245)
      PathPoint P7: firstmc1 (0.01058 0.00662 -0.00619)
      PathPoint P8: firstmc (0.00629 0.00323 -0.00589)
      PathPoint P9: firstmc (0.00827 -0.00586 -0.00604)
    HuntCrossleyForce Bottle_Table:
      ContactParametersSet contact_parameters:
        ContactParameters: geometry=(ContactHalfSpace Bottle_Contact Bottle_Contact2 Bottle_Contact3 Bottle_Contact4 Bottle_Contact5 Bottom_Table Bottle_Contact6 Bottle_Contact7 Bottle_Contact8 Bottle_Contact9 Bottle_Contact10 Bottle_Contact11 Bottle_Contact12 Bottle_Contact13 Bottle_Contact14 Bottle_Contact15 Bottle_Contact16 Bottle_Contact17 Bottle_Contact18 Bottle_Contact19 Bottle_Contact20 Bottle_Contact21 Bottle_Contact23 Bottle_Contact24 Bottle_Contact25 Bottle_Contact26 Bottle_Contact27 Bottle_Contact22)
            stiffness=100000000 dissipation=0.5 static_friction=0.9 dynamic_friction=0.9 viscous_friction=0.6
    HuntCrossleyForce Hand_Bottle:
      ContactParametersSet contact_parameters:
        ContactParameters: geometry=(indexFinger_contact_1 indexFinger_contact_2 indexFinger_contact_3 indexFinger_contact_0 thumb_contact_0 thumb_contact_1 thumb_contact_2 Bottle_Contact Bottle_Contact2 Bottle_Contact3 Bottle_Contact4 Bottle_Contact5 Bottle_Contact6 Bottle_Contact7 Bottle_Contact8 Bottle_Contact9 Bottle_Contact10 Bottle_Contact11 Bottle_Contact12 Bottle_Contact13 Bottle_Contact14 Bottle_Contact15 Bottle_Contact16 Bottle_Contact17 Bottle_Contact18 Bottle_Contact19 Bottle_Contact20 Bottle_Contact21 Bottle_Contact22 Bottle_Contact23 Bottle_Contact24 Bottle_Contact25 Bottle_Contact26 Bottle_Contact27)
            stiffness=100000000 dissipation=0.5 static_friction=0.9 dynamic_friction=0.9 viscous_friction=0.6
    HuntCrossleyForce Hand_Table:
      ContactParametersSet contact_parameters:
        ContactParameters: geometry=(indexFinger_contact_1 indexFinger_contact_2 indexFinger_contact_3 indexFinger_contact_0 thumb_contact_0 thumb_contact_1 thumb_contact_2 ContactHalfSpace Bottom_Table)
            stiffness=100000000 dissipation=0.5 static_friction=0.9 dynamic_friction=0.9 viscous_friction=0.6
  MarkerSet:
    Marker Marker_30: fourthmc (-0.005350847 0.01717484 0.01374722) fixed=true
    Marker Marker_32: thirdmc (0.004562116 0.01549636 0.01811985) fixed=true
    Marker Marker_28: fourthmc (-0.007462842 -0.004447802 0.01677336) fixed=true
    Marker Marker_31: thirdmc (0.005823194 -0.00801654 0.01634874) fixed=true
    Marker Marker_44: secondmc (0.004997476 -0.02414242 0.01571623) fixed=true
    Marker Marker_42: 2proxph (0.005917362 -0.02682876 0.01662423) fixed=true
    Marker Marker_43: 2midph (0.002619603 -0.009322923 0.007777674) fixed=true
    Marker Marker_41: 2distph (0.002546143 -0.008265426 0.006176977) fixed=true
    Marker Marker_35: firstmc1 (0.01140538 0.00986368 0.00558834) fixed=true
    Marker Marker_29: firstmc (0.02091569 -0.01554455 -0.001977676) fixed=true
    Marker Marker_34: proximal_thumb (0.0183507 -0.01474185 -0.001916091) fixed=true
    Marker Marker_33: distal_thumb (0.008384954 -0.01011392 -0.002263044) fixed=true
    Marker Marker_21: ulna (-0.009000436 -0.1103429 0.06163133)
    Marker Marker_23: radius (0.009686687 -0.09055916 0.0335787)
    Marker Marker_16: ulna (-0.009882957 -0.1634482 0.05969204)
    Marker Marker_20: radius (0.01116824 -0.1399242 0.03713337)
    Marker Marker_17: ulna (-0.002131868 -0.217828 0.06286258)
    Marker Marker_18: radius (0.02337916 -0.198245 0.04582157)
    Marker Marker_10: humerus (0.005726745 -0.1455462 0.03259328)
    Marker Marker_8: humerus (-0.04643179 -0.1483636 0.02405132)
    Marker Marker_5: humerus (0.006702526 -0.09067662 0.03310394)
    Marker Marker_6: humerus (-0.04340814 -0.09309987 0.02538203)
    Marker Marker_19: humerus (0.002292286 -0.1990013 0.0341119)
    Marker Marker_22: humerus (-0.04442945 -0.2020627 0.02354271)
    Marker Marker_9: thorax (0.1137726 -0.1726498 -0.002039592) fixed=true
    Marker Marker_4: thorax (0.08121894 -0.1454899 -0.002023933) fixed=true
    Marker Marker_11: thorax (0.08354563 -0.1533685 0.01753464) fixed=true
    Marker Marker_7: thorax (0.08147598 -0.1393223 -0.02346834) fixed=true
  ContactGeometrySet:
    ContactSphere [values shared by the 34 below unless stated]: socket_frame=/jointset/bottle_to_ground/Bottle_offset
    ContactSphere indexFinger_contact_1: socket_frame=/bodyset/2proxph radius=0.009000001
    ContactSphere indexFinger_contact_2: socket_frame=/bodyset/2midph radius=0.009
    ContactSphere indexFinger_contact_3: socket_frame=/bodyset/2distph radius=0.009
    ContactSphere indexFinger_contact_0: socket_frame=/bodyset/secondmc radius=0.009
    ContactSphere thumb_contact_0: socket_frame=/bodyset/firstmc radius=0.009
    ContactSphere thumb_contact_1: socket_frame=/bodyset/proximal_thumb radius=0.009
    ContactSphere thumb_contact_2: socket_frame=/bodyset/distal_thumb radius=0.009
    ContactHalfSpace ground_contact: socket_frame=/ground location=(0.5111952 0.006079603 0) orientation=(0 0 1.570796)
    ContactHalfSpace: socket_frame=/jointset/table_to_ground/table_offset location=(-0.4 0.1 -0.4)
        orientation=(0 0 -1.570796)
    ContactSphere Bottle_Contact: location=(0 0.05 0) radius=0.03
    ContactSphere Bottle_Contact2: location=(0 0.04 0) radius=0.03
    ContactSphere Bottle_Contact3: location=(0 0.03 0) radius=0.03
    ContactSphere Bottle_Contact4: location=(0 0.02 0) radius=0.03
    ContactSphere Bottle_Contact5: location=(0 0.01 0) radius=0.03
    ContactHalfSpace Bottom_Table: socket_frame=/jointset/table_to_ground/table_offset location=(-0.4 0.1 -0.4)
        orientation=(0 0 1.570796)
    ContactSphere Bottle_Contact6: radius=0.03
    ContactSphere Bottle_Contact7: location=(0 -0.01 0) radius=0.03
    ContactSphere Bottle_Contact8: location=(0 -0.02 0) radius=0.03
    ContactSphere Bottle_Contact9: location=(0 -0.03 0) radius=0.03
    ContactSphere Bottle_Contact10: location=(0 -0.04 0) radius=0.03
    ContactSphere Bottle_Contact11: location=(0 -0.05 0) radius=0.03
    ContactSphere Bottle_Contact12: location=(0.03 0.08 0) radius=0.001
    ContactSphere Bottle_Contact13: location=(-0.03 0.08 0) radius=0.001
    ContactSphere Bottle_Contact14: location=(0 0.08 0.03) radius=0.001
    ContactSphere Bottle_Contact15: location=(0 0.08 -0.03) radius=0.001
    ContactSphere Bottle_Contact16: location=(0.03 -0.08 0) radius=0.001
    ContactSphere Bottle_Contact17: location=(-0.03 -0.08 0) radius=0.001
    ContactSphere Bottle_Contact18: location=(0 -0.08 0.03) radius=0.001
    ContactSphere Bottle_Contact19: location=(0 -0.08 -0.03) radius=0.001
    ContactSphere Bottle_Contact20: location=(0.021 0.08 0.021) radius=0.001
    ContactSphere Bottle_Contact21: location=(-0.021 0.08 0.021) radius=0.001
    ContactSphere Bottle_Contact22: location=(0.021 0.08 -0.021) radius=0.001
    ContactSphere Bottle_Contact23: location=(-0.021 0.08 -0.021) radius=0.001
    ContactSphere Bottle_Contact24: location=(0.021 -0.08 0.021) radius=0.001
    ContactSphere Bottle_Contact25: location=(-0.021 -0.08 0.021) radius=0.001
    ContactSphere Bottle_Contact26: location=(0.021 -0.08 -0.021) radius=0.001
    ContactSphere Bottle_Contact27: location=(-0.021 -0.08 -0.021) radius=0.001
