# OpenSim document version 40000
Model Robert_2nd_model-scaled:
  gravity: 0 -9.80665 0
  Ground
  BodySet:
    Body thorax: mass=1 [kg] mass_center=(0 0 0) inertia=(1 1 1 0 0 0) meshes=thorax.vtp
      WrapEllipsoid Thorax: xyz_body_rotation=(0.0434587 -0.3319616 0.1898918) translation=(-0.0386 -0.1273 0.0709)
          quadrant=all dimensions=(0.1 0.135 0.08)
    Body clavicle: mass=0 mass_center=(0 0 0) inertia=(0 0 0 0 0 0) meshes=clavicle.vtp
    Body clavphant: mass=0 mass_center=(0 0 0) inertia=(0 0 0 0 0 0)
    Body scapula: mass=0 mass_center=(0 0 0) inertia=(0 0 0 0 0 0) meshes=scapula.vtp
      WrapEllipsoid Deltoid2: active=false xyz_body_rotation=(3.130423 -1.548805 -1.314233)
          translation=(-0.0058 -0.0378 0.0096) quadrant=-y dimensions=(0.03 0.04 0.035)
      WrapTorus Delt3: active=false xyz_body_rotation=(0.6209881 0.32882 -0.5607743)
          translation=(-0.0973 -0.0428 -0.037) quadrant=all inner_radius=0.04 outer_radius=0.06
      WrapTorus INFSP: xyz_body_rotation=(0.02530727 0.5883505 0.1518436) translation=(-0.0561 -0.0199 -0.0112)
          quadrant=all inner_radius=0.008 outer_radius=0.019
      WrapEllipsoid TMIN: xyz_body_rotation=(-2.097537 -0.2808235 -1.763481) translation=(-0.0418 -0.0519 -0.0359)
          quadrant=x dimensions=(0.03 0.03 0.05)
      WrapCylinder TRIlongglen: xyz_body_rotation=(1.375319 -0.2946116 2.435956) translation=(-0.0359 -0.0309 -0.0132)
          quadrant=x radius=0.003 length=0.03
    Body scapphant: mass=0 mass_center=(0 0 0) inertia=(0 0 0 0 0 0)
    Body humphant: mass=0 mass_center=(0 0 0) inertia=(0 0 0 0 0 0)
    Body humphant1: mass=0 mass_center=(0 0 0) inertia=(0 0 0 0 0 0)
    Body humerus: mass=0 mass_center=(0 0 0) inertia=(0 0 0 0 0 0) meshes=humerus.vtp
      WrapEllipsoid DELT1hh: xyz_body_rotation=(0.05846853 1.004612 0.5703736) translation=(-0.0139 -0.0127 -0.0262)
          quadrant=z dimensions=(0.03 0.1 0.05)
      WrapCylinder delt2hum: xyz_body_rotation=(1.680927 -0.02495821 0.05166175) translation=(0.0017 -0.0958 0.0011)
          quadrant=all radius=0.0094 length=0.05
      WrapEllipsoid delt3hum: xyz_body_rotation=(1.727352 0.07592182 -2.743134) translation=(0.0019 -0.0592 0.0011)
          quadrant=x dimensions=(0.01 0.01 0.05)
      WrapEllipsoid SUPSP: xyz_body_rotation=(0.03804818 0.00855211 -1.306728) translation=(0.0002 0.0077 0.0043)
          quadrant=all dimensions=(0.02 0.02 0.02)
      WrapEllipsoid INFSP_and_TMIN_hum_head: xyz_body_rotation=(-0.2865831 -0.00907571 -0.06841691)
          translation=(-0.0003 0.0026 0.0038) quadrant=all dimensions=(0.02 0.025 0.02)
      WrapEllipsoid SUBSCAP: xyz_body_rotation=(-0.9245009 0.288852 0.381529) translation=(-0.0025 0.0007 -0.0045)
          quadrant=all dimensions=(0.02 0.017 0.028)
      WrapCylinder TMINhum: xyz_body_rotation=(1.753532 0.06928957 2.746276) translation=(-0.0014 -0.0455 0) quadrant=x
          radius=0.007 length=0.07
      WrapSphere TMAJ_LAT_PEC_CORBhh: translation=(0.0007 0 0.006) quadrant=all radius=0.03
      WrapCylinder TMAJ_LAThum: xyz_body_rotation=(1.536413 -0.06370452 1.41424) translation=(0.0007 -0.0443 -0.0055)
          quadrant=-x radius=0.007 length=0.04
      WrapEllipsoid PEC1hh: xyz_body_rotation=(-0.6204646 -0.3104941 0.3637266) translation=(-0.0037 0.0005 -0.0025)
          quadrant=-z dimensions=(0.03 0.02 0.02)
      WrapCylinder PEC12hum: xyz_body_rotation=(1.559277 -0.07749262 -0.9258972) translation=(0.002 -0.0508 -0.0017)
          quadrant=x radius=0.009 length=0.07
      WrapSphere PEC23hh: translation=(-0.0086 0.0021 -0.0004) quadrant=all radius=0.02
      WrapCylinder PEC3hum: xyz_body_rotation=(1.440944 -0.0561996 1.751961) translation=(0.0009 -0.0551 -0.0004)
          quadrant=-x radius=0.008 length=0.07
      WrapCylinder LAT_TMAJhh: xyz_body_rotation=(-0.3050835 -0.01832596 -0.6866125)
          translation=(-0.0224 0.0102 0.0094) quadrant=-y radius=0.007 length=0.045
      WrapSphere LAT_TMAJ2hh: xyz_body_rotation=(-0.1272345 0.2761111 0.01972222) translation=(-0.0016 0.0092 0.0052)
          quadrant=-z radius=0.03
      WrapCylinder CORBhum: xyz_body_rotation=(-1.608321 0.09599311 0.8752826) translation=(0.0027 -0.1202 -0.0059)
          quadrant=x radius=0.008 length=0.05
      WrapEllipsoid TRIlonghh: xyz_body_rotation=(3.001617 -0.853466 2.574186) translation=(-0.0078 -0.0041 -0.0014)
          quadrant=z dimensions=(0.035 0.02 0.02)
      WrapCylinder TRI: xyz_body_rotation=(-0.1401499 -0.00628319 0.1549852) translation=(0.0028 -0.2919 -0.0119)
          quadrant=all radius=0.016 length=0.04
      WrapEllipsoid ANC: xyz_body_rotation=(0.00750492 -0.1966986 1.049292) translation=(0.0134 -0.2861 -0.0008)
          quadrant=-x dimensions=(0.02 0.02 0.02)
      WrapEllipsoid BIClong: xyz_body_rotation=(-2.004336 -1.001644 0.9754645) translation=(0.0033 0.0073 0.0003)
          quadrant=-y dimensions=(0.025 0.02 0.02)
      WrapEllipsoid Elbow_BIC_BRD: xyz_body_rotation=(-0.1286308 0.1375319 0.03071779)
          translation=(0.0019 -0.289 -0.014) quadrant=x dimensions=(0.015 0.015 0.1)
      WrapEllipsoid Elbow_PT_ECRL: xyz_body_rotation=(-0.1610939 -0.1108284 0.6145304)
          translation=(0.003 -0.2872 -0.0069) quadrant=x dimensions=(0.018 0.025 0.035)
    Body ulna: mass=0 mass_center=(0 0 0) inertia=(0 0 0 0 0 0) meshes=ulna.vtp
      WrapCylinder PQ2: xyz_body_rotation=(1.391376 0.06894051 1.522451) translation=(-0.0012 -0.2092 0.0428)
          quadrant=all radius=0.007 length=0.01
    Body radius: mass=0 mass_center=(0 0 0) inertia=(0 0 0 0 0 0) meshes=radius.vtp
      WrapCylinder SUP: xyz_body_rotation=(1.447751 0.3040364 -2.441017) translation=(0.0045 -0.0437 0.0059)
          quadrant=-x radius=0.008 length=0.04
      WrapTorus ECU: xyz_body_rotation=(-0.9866346 -0.1488766 0.222704) translation=(-0.0163 -0.2417 0.0349)
          quadrant=all inner_radius=0.006 outer_radius=0.009
      WrapCylinder PQ1: xyz_body_rotation=(-1.607623 -0.0127409 -2.690251) translation=(0.0281 -0.1986 0.0288)
          quadrant=all radius=0.01 length=0.01
    Body lunate: mass=0 mass_center=(0 0 0) inertia=(0 0 0 0 0 0) meshes=lunate.vtp
      WrapEllipsoid Extensor_ellipse: xyz_body_rotation=(-0.2508038 0.2855359 0.2328269)
          translation=(0.0007 -0.0135 0.0047) quadrant=z dimensions=(0.05 0.02 0.013)
      WrapTorus ECRL: xyz_body_rotation=(1.538333 0.2343977 0.7311184) translation=(0.0222 -0.0096 0.0208) quadrant=all
          inner_radius=0.008 outer_radius=0.016
      WrapTorus ECRB: xyz_body_rotation=(1.312662 -0.1178097 -0.1162389) translation=(0.0126 -0.0095 0.0186)
          quadrant=all inner_radius=0.008 outer_radius=0.01
      WrapTorus FCR: xyz_body_rotation=(-1.555961 -0.1532399 -0.1000074) translation=(0.0032 -0.0045 -0.019)
          quadrant=all inner_radius=0.001 outer_radius=0.0025
      WrapTorus FCU: xyz_body_rotation=(-1.573763 -0.07976155 0.39235) translation=(-0.0123 -0.0124 -0.0171)
          quadrant=all inner_radius=0.0068 outer_radius=0.008
      WrapEllipsoid PL: xyz_body_rotation=(-0.03159046 0.0996583 0.06335545) translation=(0.0057 -0.018 -0.0041)
          quadrant=-z dimensions=(0.025 0.014 0.012)
      WrapEllipsoid FDS: xyz_body_rotation=(0.00837758 -0.08168141 -0.01710423) translation=(0.0012 -0.0057 -0.0003)
          quadrant=-z dimensions=(0.025 0.013 0.012)
      WrapEllipsoid FDP: xyz_body_rotation=(-1.467473 -0.1946042 0.121824) translation=(-0.0022 -0.0069 0.0032)
          quadrant=y dimensions=(0.025 0.013 0.012)
      WrapTorus EDCL: xyz_body_rotation=(2.363176 0.1930334 -0.2691298) translation=(-0.0128 -0.0133 0.0148)
          quadrant=all inner_radius=0.008 outer_radius=0.012
      WrapTorus EDCR: xyz_body_rotation=(1.983916 0.100531 0.5230752) translation=(-0.0098 -0.0137 0.0166) quadrant=all
          inner_radius=0.009 outer_radius=0.011
      WrapTorus EDCM: xyz_body_rotation=(1.993166 0.1979203 0.3682645) translation=(-0.0007 -0.0117 0.0191)
          quadrant=all inner_radius=0.009 outer_radius=0.012
      WrapTorus EDCI: xyz_body_rotation=(1.697682 0.08970992 0.00767945) translation=(0.009 -0.0149 0.0211)
          quadrant=all inner_radius=0.009 outer_radius=0.012
      WrapEllipsoid EDM: xyz_body_rotation=(2.962696 0.1593486 0.1179843) translation=(-0.0167 -0.0022 0.0048)
          quadrant=-z dimensions=(0.018 0.014 0.008)
      WrapEllipsoid FPL: xyz_body_rotation=(-0.1663299 -0.08220501 -0.06597345) translation=(0.017 -0.025 -0.0033)
          quadrant=-z dimensions=(0.016 0.01 0.01)
    Body scaphoid: mass=0 mass_center=(0 0 0) inertia=(0 0 0 0 0 0) meshes=scaphoid.vtp
    Body pisiform: mass=0 mass_center=(0 0 0) inertia=(0 0 0 0 0 0) meshes=pisiform.vtp
    Body triquetrum: mass=0 mass_center=(0 0 0) inertia=(0 0 0 0 0 0) meshes=triquetrum.vtp
    Body capitate: mass=0 mass_center=(0 0 0) inertia=(0 0 0 0 0 0) meshes=capitate.vtp
    Body trapezium: mass=0 mass_center=(0 0 0) inertia=(0 0 0 0 0 0) meshes=trapezium.vtp
    Body trapezoid: mass=0 mass_center=(0 0 0) inertia=(0 0 0 0 0 0) meshes=trapezoid.vtp
    Body hamate: mass=0 mass_center=(0 0 0) inertia=(0 0 0 0 0 0) meshes=hamate.vtp
    Body firstmc1: mass=0 mass_center=(0 0 0) inertia=(0 0 0 0 0 0)
      WrapTorus APL: active=false xyz_body_rotation=(-1.609892 0.2478367 -0.0301942)
          translation=(0.0082 0.0023 -0.0101) quadrant=all inner_radius=0.004 outer_radius=0.008
    Body firstmc: mass=0 mass_center=(0 0 0) inertia=(0 0 0 0 0 0) meshes=1mc.vtp
      WrapCylinder MPthumb: xyz_body_rotation=(0.3213151 0.1101303 -0.834791) translation=(0.0177 -0.0305 -0.0143)
          quadrant=all radius=0.0085 length=0.02
    Body secondmc: mass=0 mass_center=(0 0 0) inertia=(0 0 0 0 0 0) meshes=2mc.vtp
      WrapEllipsoid 2ndmcp: xyz_body_rotation=(1.486671 -1.296605 2.43072) translation=(0.0059 -0.0304 -0.0006)
          quadrant=-x dimensions=(0.005 0.005 0.03)
    Body thirdmc: mass=0 mass_center=(0 0 0) inertia=(0 0 0 0 0 0) meshes=3mc.vtp
    Body fourthmc: mass=0 mass_center=(0 0 0) inertia=(0 0 0 0 0 0) meshes=4mc.vtp
    Body fifthmc: mass=0 mass_center=(0 0 0) inertia=(0 0 0 0 0 0) meshes=5mc.vtp
    Body proximal_thumb: mass=0 mass_center=(0 0 0) inertia=(0 0 0 0 0 0) meshes=thumbprox.vtp
      WrapCylinder IPthumb: xyz_body_rotation=(0.3047345 0.01291544 0.08796459) translation=(0.0121 -0.0302 -0.0096)
          quadrant=-x radius=0.0045 length=0.01
    Body distal_thumb: mass=0 mass_center=(0 0 0) inertia=(0 0 0 0 0 0) meshes=thumbdist.vtp
    Body 2proxph: mass=0 mass_center=(0 0 0) inertia=(0 0 0 0 0 0) meshes=2proxph.vtp
      WrapCylinder Secondpm: xyz_body_rotation=(0.7419395 -1.473931 0.7096509) translation=(0.0075 -0.0407 0.0061)
          quadrant=all radius=0.004 length=0.01
    Body 2midph: mass=0 mass_center=(0 0 0) inertia=(0 0 0 0 0 0) meshes=2midph.vtp
      WrapCylinder Secondmd: xyz_body_rotation=(0.5017822 -1.413019 0.6473426) translation=(0.0036 -0.0243 0.0003)
          quadrant=x radius=0.003 length=0.01
    Body 2distph: mass=0 mass_center=(0 0 0) inertia=(0 0 0 0 0 0) meshes=2distph.vtp
    Body 3proxph: mass=0 mass_center=(0 0 0) inertia=(0 0 0 0 0 0) meshes=3proxph.vtp
    Body 3midph: mass=0 mass_center=(0 0 0) inertia=(0 0 0 0 0 0) meshes=3midph.vtp
    Body 3distph: mass=0 mass_center=(0 0 0) inertia=(0 0 0 0 0 0) meshes=3distph.vtp
    Body 4proxph: mass=0 mass_center=(0 0 0) inertia=(0 0 0 0 0 0) meshes=4proxph.vtp
    Body 4midph: mass=0 mass_center=(0 0 0) inertia=(0 0 0 0 0 0) meshes=4midph.vtp
    Body 4distph: mass=0 mass_center=(0 0 0) inertia=(0 0 0 0 0 0) meshes=4distph.vtp
    Body 5proxph: mass=0 mass_center=(0 0 0) inertia=(0 0 0 0 0 0) meshes=5proxph.vtp
    Body 5midph: mass=0 mass_center=(0 0 0) inertia=(0 0 0 0 0 0) meshes=5midph.vtp
    Body 5distph: mass=0 mass_center=(0 0 0) inertia=(0 0 0 0 0 0) meshes=5distph.vtp
    Body bicpt: mass=0 mass_center=(0 0 0) inertia=(0 0 0 0 0 0)
    Body bicpt2: mass=0 mass_center=(0 0 0) inertia=(0 0 0 0 0 0)
    Body ptpt: mass=0 mass_center=(0 0 0) inertia=(0 0 0 0 0 0)
    Body FCUpt: mass=0 mass_center=(0 0 0) inertia=(0 0 0 0 0 0)
    Body EDCpt: mass=0 mass_center=(0 0 0) inertia=(0 0 0 0 0 0)
    Body APLpt: mass=0 mass_center=(0 0 0) inertia=(0 0 0 0 0 0)
    Body FPLpt: mass=0 mass_center=(0 0 0) inertia=(0 0 0 0 0 0)
    Body FPLpt2: mass=0 mass_center=(0 0 0) inertia=(0 0 0 0 0 0)
    Body PEC1pt2: mass=0 mass_center=(0 0 0) inertia=(0 0 0 0 0 0)
    Body PEC1pt3: mass=0 mass_center=(0 0 0) inertia=(0 0 0 0 0 0)
    Body PEC2pt2: mass=0 mass_center=(0 0 0) inertia=(0 0 0 0 0 0)
    Body PEC2pt3: mass=0 mass_center=(0 0 0) inertia=(0 0 0 0 0 0)
    Body PEC3pt2: mass=0 mass_center=(0 0 0) inertia=(0 0 0 0 0 0)
    Body PEC3pt3: mass=0 mass_center=(0 0 0) inertia=(0 0 0 0 0 0)
    Body DELT2pt2a: mass=0 mass_center=(0 0 0) inertia=(0 0 0 0 0 0)
    Body DELT2pt2: mass=0 mass_center=(0 0 0) inertia=(0 0 0 0 0 0)
    Body LAT1pt2: mass=0 mass_center=(0 0 0) inertia=(0 0 0 0 0 0)
    Body LAT1pt3: mass=0 mass_center=(0 0 0) inertia=(0 0 0 0 0 0)
    Body LAT2pt2: mass=0 mass_center=(0 0 0) inertia=(0 0 0 0 0 0)
    Body LAT2pt3: mass=0 mass_center=(0 0 0) inertia=(0 0 0 0 0 0)
    Body LAT3pt2: mass=0 mass_center=(0 0 0) inertia=(0 0 0 0 0 0)
    Body LAT3pt3: mass=0 mass_center=(0 0 0) inertia=(0 0 0 0 0 0)
  JointSet:
    FreeJoint ground_thorax: socket_parent_frame=/ground socket_child_frame=/bodyset/thorax
      Coordinate _coord_0: default_value=1.38031e-11 locked=true
      Coordinate _coord_1: default_value=1.540965 locked=true
      Coordinate _coord_2: default_value=-4.541298e-11 locked=true
      Coordinate _coord_3: default_value=0.5547331 locked=true
      Coordinate _coord_4: default_value=1.028971 locked=true
      Coordinate _coord_5: default_value=0.06083143 locked=true
    CustomJoint sternoclavicular: socket_parent_frame=thorax_offset socket_child_frame=clavicle_offset
      Coordinate sternoclavicular_r2: default_value=-2.270958e-5 range=(-99999.9 99999.9) clamped=false
      Coordinate sternoclavicular_r3: default_value=9.618708e-6 range=(-99999.9 99999.9) clamped=false
      PhysicalOffsetFrame thorax_offset: socket_parent=/bodyset/thorax translation=(0.006325 0.00693 0.025465) [meters]
      PhysicalOffsetFrame clavicle_offset: socket_parent=/bodyset/clavicle translation=(0 0 0)
      SpatialTransform: axes_held_at_zero=(rotation3 translation1 translation2 translation3)
        TransformAxis rotation1: coordinates=sternoclavicular_r2 axis=(0.0153 0.9892987 -0.1451)
        TransformAxis rotation2: coordinates=sternoclavicular_r3 axis=(-0.9944725 0 -0.104997)
    CustomJoint unrotscap: socket_parent_frame=clavicle_offset socket_child_frame=clavphant_offset
      Coordinate unrotscap_r3: default_value=-9.618708e-6 range=(-99999.9 99999.9) clamped=false
      Coordinate unrotscap_r2: default_value=2.270958e-5 range=(-99999.9 99999.9) clamped=false
      PhysicalOffsetFrame clavicle_offset: socket_parent=/bodyset/clavicle translation=(-0.01433 0.02007 0.135535)
      PhysicalOffsetFrame clavphant_offset: socket_parent=/bodyset/clavphant translation=(0 0 0)
      SpatialTransform: axes_held_at_zero=(rotation3 translation1 translation2 translation3)
        TransformAxis rotation1: coordinates=unrotscap_r3 axis=(-0.9944725 0 -0.104997)
        TransformAxis rotation2: coordinates=unrotscap_r2 axis=(0.0153 0.9892987 -0.1451)
    CustomJoint acromioclavicular: socket_parent_frame=clavphant_offset socket_child_frame=scapula_offset
      Coordinate acromioclavicular_r2: default_value=-4.598229e-6 range=(-99999.9 99999.9) clamped=false
      Coordinate acromioclavicular_r3: default_value=3.716127e-5 range=(-99999.9 99999.9) clamped=false
      Coordinate acromioclavicular_r1: default_value=1.670373e-5 range=(-99999.9 99999.9) clamped=false
      PhysicalOffsetFrame clavphant_offset: socket_parent=/bodyset/clavphant translation=(0 0 0)
      PhysicalOffsetFrame scapula_offset: socket_parent=/bodyset/scapula translation=(0 0 0)
      SpatialTransform: axes_held_at_zero=(translation1 translation2 translation3)
        TransformAxis rotation1: coordinates=acromioclavicular_r2 axis=(0.1570949 0.9472686 -0.2792909)
        TransformAxis rotation2: coordinates=acromioclavicular_r3 axis=(-0.754084 0.297594 0.585487)
        TransformAxis rotation3: coordinates=acromioclavicular_r1 axis=(0.6376999 0.1186 0.7610998)
    CustomJoint unrothum: socket_parent_frame=scapula_offset socket_child_frame=scapphant_offset
      Coordinate unrothum_r1: default_value=-1.670373e-5 range=(-99999.9 99999.9) clamped=false
      Coordinate unrothum_r3: default_value=-3.716127e-5 range=(-99999.9 99999.9) clamped=false
      Coordinate unrothum_r2: default_value=4.598229e-6 range=(-99999.9 99999.9) clamped=false
      PhysicalOffsetFrame scapula_offset: socket_parent=/bodyset/scapula translation=(-0.00955 -0.034 0.009)
      PhysicalOffsetFrame scapphant_offset: socket_parent=/bodyset/scapphant translation=(0 0 0)
      SpatialTransform: axes_held_at_zero=(translation1 translation2 translation3)
        TransformAxis rotation1: coordinates=unrothum_r1 axis=(0.6376999 0.1186 0.7610998)
        TransformAxis rotation2: coordinates=unrothum_r3 axis=(-0.754084 0.297594 0.585487)
        TransformAxis rotation3: coordinates=unrothum_r2 axis=(0.1570949 0.9472686 -0.2792909)
    CustomJoint shoulder0: socket_parent_frame=scapphant_offset socket_child_frame=humphant_offset
      Coordinate elv_angle: default_value=9.898317e-9 range=(-1.570796 2.268928) clamped=true
      PhysicalOffsetFrame scapphant_offset: socket_parent=/bodyset/scapphant translation=(0 0 0)
      PhysicalOffsetFrame humphant_offset: socket_parent=/bodyset/humphant translation=(0 0 0)
      SpatialTransform: axes_held_at_zero=(rotation1 rotation3 translation1 translation2 translation3)
        TransformAxis rotation2: coordinates=elv_angle axis=(0.004800001 0.9990892 0.04240001)
            LinearFunction(coefficients=1 0)
    CustomJoint shoulder1: socket_parent_frame=humphant_offset socket_child_frame=humphant1_offset
      Coordinate shoulder_elv: default_value=9.384105e-5 range=(0 3.141593) clamped=true
      Coordinate shoulder1_r2: default_value=-9.898317e-9 range=(-99999.9 99999.9) clamped=false
      PhysicalOffsetFrame humphant_offset: socket_parent=/bodyset/humphant translation=(0 0 0)
      PhysicalOffsetFrame humphant1_offset: socket_parent=/bodyset/humphant1 translation=(0 0 0)
      SpatialTransform: axes_held_at_zero=(rotation1 translation1 translation2 translation3)
        TransformAxis rotation2: coordinates=shoulder_elv axis=(-0.9982614 0.002300001 0.05889802)
            LinearFunction(coefficients=1 0)
        TransformAxis rotation3: coordinates=shoulder1_r2 axis=(0.004800001 0.9990892 0.04240001)
    CustomJoint shoulder2: socket_parent_frame=humphant1_offset socket_child_frame=humerus_offset
      Coordinate shoulder_rot: default_value=-7.51578e-9 range=(-1.570796 0.3490659) clamped=true
      PhysicalOffsetFrame humphant1_offset: socket_parent=/bodyset/humphant1 translation=(0 0 0)
      PhysicalOffsetFrame humerus_offset: socket_parent=/bodyset/humerus translation=(0 0 0)
      SpatialTransform: axes_held_at_zero=(rotation1 rotation3 translation1 translation2 translation3)
        TransformAxis rotation2: coordinates=shoulder_rot axis=(0.004800001 0.9990892 0.04240001)
            LinearFunction(coefficients=1 0)
    CustomJoint elbow: socket_parent_frame=humerus_offset socket_child_frame=ulna_offset
      Coordinate elbow_flexion: default_value=0.0001993018 range=(0 2.268928) clamped=true
      PhysicalOffsetFrame humerus_offset: socket_parent=/bodyset/humerus translation=(0.0061 -0.2904 -0.0123)
      PhysicalOffsetFrame ulna_offset: socket_parent=/bodyset/ulna translation=(0 0 0)
      SpatialTransform: axes_held_at_zero=(rotation1 rotation2 translation1 translation2 translation3)
        TransformAxis rotation3: coordinates=elbow_flexion axis=(0.04940001 0.03660001 0.9981082)
            LinearFunction(coefficients=1 0)
    CustomJoint radioulnar: socket_parent_frame=ulna_offset socket_child_frame=radius_offset
      Coordinate pro_sup: default_value=-3.194605e-20 range=(-1.570796 1.570796) clamped=true
      PhysicalOffsetFrame ulna_offset: socket_parent=/bodyset/ulna translation=(0.0004 -0.011503 0.019999)
      PhysicalOffsetFrame radius_offset: socket_parent=/bodyset/radius translation=(0 0 0)
      SpatialTransform: axes_held_at_zero=(rotation1 rotation3 translation1 translation2 translation3)
        TransformAxis rotation2: coordinates=pro_sup axis=(-0.01716099 0.9926656 -0.119668)
            LinearFunction(coefficients=1 0)
    CustomJoint radiocarpal: socket_parent_frame=radius_offset socket_child_frame=lunate_offset
      Coordinate deviation: default_value=2.419766e-8 range=(-0.1745329 0.4363323) clamped=true
      Coordinate flexion: default_value=0.1552695 range=(-1.22173 1.22173) clamped=true
      PhysicalOffsetFrame radius_offset: socket_parent=/bodyset/radius translation=(0.018 -0.242 0.025)
      PhysicalOffsetFrame lunate_offset: socket_parent=/bodyset/lunate translation=(0 0 0)
      SpatialTransform: axes_held_at_zero=(rotation2 translation1 translation2 translation3)
        TransformAxis rotation1: coordinates=deviation axis=(-0.819064 -0.135611 -0.557444)
          SimmSpline: x=(-0.174533 0 0.436332) y=(-0.174533 0 0.436332)
        TransformAxis rotation3: coordinates=flexion axis=(0.9564267 -0.2522069 0.147104)
          SimmSpline: x=(-1.5708 1.5708) y=(-0.785398 0.785398)
    WeldJoint lun_scaph: socket_parent_frame=lunate_offset socket_child_frame=scaphoid_offset
      PhysicalOffsetFrame lunate_offset: socket_parent=/bodyset/lunate translation=(0.012345 -0.004464 -0.001254)
      PhysicalOffsetFrame scaphoid_offset: socket_parent=/bodyset/scaphoid translation=(0 0 0)
    WeldJoint lun_pis: socket_parent_frame=lunate_offset socket_child_frame=pisiform_offset
      PhysicalOffsetFrame lunate_offset: socket_parent=/bodyset/lunate translation=(-0.013388 -0.009886 -0.010593)
      PhysicalOffsetFrame pisiform_offset: socket_parent=/bodyset/pisiform translation=(0 0 0)
    WeldJoint lun_triq: socket_parent_frame=lunate_offset socket_child_frame=triquetrum_offset
      PhysicalOffsetFrame lunate_offset: socket_parent=/bodyset/lunate translation=(-0.010784 -0.007499 -0.001289)
      PhysicalOffsetFrame triquetrum_offset: socket_parent=/bodyset/triquetrum translation=(0 0 0)
    CustomJoint proximal_distal: socket_parent_frame=lunate_offset socket_child_frame=capitate_offset
      Coordinate proximal_distal_r1: default_value=3.283964e-8 range=(-99999.9 99999.9) clamped=false
      Coordinate proximal_distal_r3: default_value=0.07763476 range=(-99999.9 99999.9) clamped=false
      PhysicalOffsetFrame lunate_offset: socket_parent=/bodyset/lunate translation=(0.003992 -0.015054 0.002327)
      PhysicalOffsetFrame capitate_offset: socket_parent=/bodyset/capitate translation=(0 0 0)
      SpatialTransform: axes_held_at_zero=(rotation2 translation1 translation2 translation3)
        TransformAxis rotation1: coordinates=proximal_distal_r1 axis=(0.8991357 -0.3490529 -0.2640399)
        TransformAxis rotation3: coordinates=proximal_distal_r3 axis=(0.9971185 0.01069999 -0.07510096)
    WeldJoint cap_trpzm: socket_parent_frame=capitate_offset socket_child_frame=trapezium_offset
      PhysicalOffsetFrame capitate_offset: socket_parent=/bodyset/capitate translation=(0.015293 -0.004569 -0.010308)
      PhysicalOffsetFrame trapezium_offset: socket_parent=/bodyset/trapezium translation=(0 0 0)
    WeldJoint cap_trpzd: socket_parent_frame=capitate_offset socket_child_frame=trapezoid_offset
      PhysicalOffsetFrame capitate_offset: socket_parent=/bodyset/capitate translation=(0.009143 -0.004062 -0.002464)
      PhysicalOffsetFrame trapezoid_offset: socket_parent=/bodyset/trapezoid translation=(0 0 0)
    WeldJoint cap_ham: socket_parent_frame=capitate_offset socket_child_frame=hamate_offset
      PhysicalOffsetFrame capitate_offset: socket_parent=/bodyset/capitate translation=(-0.010969 -0.002495 -0.00075)
      PhysicalOffsetFrame hamate_offset: socket_parent=/bodyset/hamate translation=(0 0 0)
    CustomJoint CMC1a: socket_parent_frame=trapezium_offset socket_child_frame=firstmc1_offset
      Coordinate cmc_flexion: default_value=0.05876524 range=(-0.2617994 0.7853982) clamped=true locked=true
      PhysicalOffsetFrame trapezium_offset: socket_parent=/bodyset/trapezium translation=(0 0 0)
      PhysicalOffsetFrame firstmc1_offset: socket_parent=/bodyset/firstmc1 translation=(0 0 0)
      SpatialTransform: axes_held_at_zero=(rotation1 rotation2 translation1 translation2 translation3)
        TransformAxis rotation3: coordinates=cmc_flexion axis=(-0.04239899 -0.6652859 0.7453838)
            LinearFunction(coefficients=1 0)
    CustomJoint CMC1b: socket_parent_frame=firstmc1_offset socket_child_frame=firstmc_offset
      Coordinate cmc_abduction: default_value=0.365088 range=(-0.4363323 0.4363323) clamped=true
      PhysicalOffsetFrame firstmc1_offset: socket_parent=/bodyset/firstmc1 translation=(0.0072 -0.0054 -0.0025)
      PhysicalOffsetFrame firstmc_offset: socket_parent=/bodyset/firstmc translation=(0 0 0)
      SpatialTransform: axes_held_at_zero=(rotation2 rotation3 translation1 translation2 translation3)
        TransformAxis rotation1: coordinates=cmc_abduction axis=(0.495557 0.731736 0.467959)
            LinearFunction(coefficients=1 0)
    WeldJoint CMC2: socket_parent_frame=capitate_offset socket_child_frame=secondmc_offset
      PhysicalOffsetFrame capitate_offset: socket_parent=/bodyset/capitate translation=(0.014685 -0.03762 0.005032)
      PhysicalOffsetFrame secondmc_offset: socket_parent=/bodyset/secondmc translation=(0 0 0)
    WeldJoint CMC3: socket_parent_frame=capitate_offset socket_child_frame=thirdmc_offset
      PhysicalOffsetFrame capitate_offset: socket_parent=/bodyset/capitate translation=(0.000477 -0.039239 0.007377)
      PhysicalOffsetFrame thirdmc_offset: socket_parent=/bodyset/thirdmc translation=(0 0 0)
    WeldJoint CMC4: socket_parent_frame=capitate_offset socket_child_frame=fourthmc_offset
      PhysicalOffsetFrame capitate_offset: socket_parent=/bodyset/capitate translation=(-0.012046 -0.040519 0.003513)
      PhysicalOffsetFrame fourthmc_offset: socket_parent=/bodyset/fourthmc translation=(0 0 0)
    WeldJoint CMC5: socket_parent_frame=capitate_offset socket_child_frame=fifthmc_offset
      PhysicalOffsetFrame capitate_offset: socket_parent=/bodyset/capitate translation=(-0.021896 -0.034683 -0.004218)
      PhysicalOffsetFrame fifthmc_offset: socket_parent=/bodyset/fifthmc translation=(0 0 0)
    CustomJoint MCP: socket_parent_frame=firstmc_offset socket_child_frame=proximal_thumb_offset
      Coordinate mp_flexion: default_value=-0.4826359 range=(-0.7853982 0.6981317) clamped=true locked=true
      PhysicalOffsetFrame firstmc_offset: socket_parent=/bodyset/firstmc translation=(0.0165 -0.0292 -0.0127)
      PhysicalOffsetFrame proximal_thumb_offset: socket_parent=/bodyset/proximal_thumb translation=(0 0 0)
      SpatialTransform: axes_held_at_zero=(rotation1 rotation2 translation1 translation2 translation3)
        TransformAxis rotation3: coordinates=mp_flexion axis=(-0.084295 -0.203488 0.9754419)
            LinearFunction(coefficients=1 0)
    CustomJoint IP: socket_parent_frame=proximal_thumb_offset socket_child_frame=distal_thumb_offset
      Coordinate ip_flexion: default_value=-0.5966234 range=(-1.308997 0.4363323) clamped=true locked=true
      PhysicalOffsetFrame proximal_thumb_offset: socket_parent=/bodyset/proximal_thumb
          translation=(0.014 -0.0259 -0.0101)
      PhysicalOffsetFrame distal_thumb_offset: socket_parent=/bodyset/distal_thumb translation=(0 0 0)
      SpatialTransform: axes_held_at_zero=(rotation1 rotation2 translation1 translation2 translation3)
        TransformAxis rotation3: coordinates=ip_flexion axis=(-0.05010201 -0.4796231 0.8760431)
            LinearFunction(coefficients=1 0)
    CustomJoint 2MCP: socket_parent_frame=secondmc_offset socket_child_frame=2proxph_offset
      Coordinate 2mcp_flexion: default_value=1.321459 range=(-0.8726646 1.570796) clamped=true
      Coordinate 2mcp_abduction: default_value=0.13357 range=(-0.2617994 0.2617994) clamped=true locked=true
      PhysicalOffsetFrame secondmc_offset: socket_parent=/bodyset/secondmc translation=(0.003501 -0.028243 0.00362)
      PhysicalOffsetFrame 2proxph_offset: socket_parent=/bodyset/2proxph translation=(0 0 0)
      SpatialTransform: axes_held_at_zero=(rotation2 translation1 translation2 translation3)
        TransformAxis rotation1: coordinates=2mcp_flexion axis=(0.9975061 -0.03949601 0.05849401)
            LinearFunction(coefficients=1 0)
        TransformAxis rotation3: coordinates=2mcp_abduction axis=(-0.05499898 0.08589897 0.9947846)
            LinearFunction(coefficients=1 0)
    CustomJoint 2prox-midph: socket_parent_frame=2proxph_offset socket_child_frame=2midph_offset
      Coordinate 2pm_flexion: default_value=0.4701742 range=(0 2.094395) clamped=true locked=true
      PhysicalOffsetFrame 2proxph_offset: socket_parent=/bodyset/2proxph translation=(0.007517 -0.041273 0.007326)
      PhysicalOffsetFrame 2midph_offset: socket_parent=/bodyset/2midph translation=(0 0 0)
      SpatialTransform: axes_held_at_zero=(rotation2 rotation3 translation1 translation2 translation3)
        TransformAxis rotation1: coordinates=2pm_flexion axis=(0.9603449 0.040998 -0.275784)
            LinearFunction(coefficients=1 0)
    CustomJoint 2mid-distph: socket_parent_frame=2midph_offset socket_child_frame=2distph_offset
      Coordinate 2md_flexion: default_value=0.609085 range=(0 1.570796) clamped=true locked=true
      PhysicalOffsetFrame 2midph_offset: socket_parent=/bodyset/2midph translation=(0.003333 -0.024888 0.00122)
      PhysicalOffsetFrame 2distph_offset: socket_parent=/bodyset/2distph translation=(0 0 0)
      SpatialTransform: axes_held_at_zero=(rotation2 rotation3 translation1 translation2 translation3)
        TransformAxis rotation1: coordinates=2md_flexion axis=(0.9789773 0.07690602 -0.1889151)
            LinearFunction(coefficients=1 0)
    WeldJoint 3MCP: socket_parent_frame=thirdmc_offset socket_child_frame=3proxph_offset
      PhysicalOffsetFrame thirdmc_offset: socket_parent=/bodyset/thirdmc translation=(0.00024 -0.02629 0.001778)
      PhysicalOffsetFrame 3proxph_offset: socket_parent=/bodyset/3proxph translation=(0 0 0)
    WeldJoint 3prox-midph: socket_parent_frame=3proxph_offset socket_child_frame=3midph_offset
      PhysicalOffsetFrame 3proxph_offset: socket_parent=/bodyset/3proxph translation=(0.00165 -0.044211 0.00623)
      PhysicalOffsetFrame 3midph_offset: socket_parent=/bodyset/3midph translation=(0 0 0)
    WeldJoint 3mid-distph: socket_parent_frame=3midph_offset socket_child_frame=3distph_offset
      PhysicalOffsetFrame 3midph_offset: socket_parent=/bodyset/3midph translation=(0.001365 -0.029047 0.001954)
      PhysicalOffsetFrame 3distph_offset: socket_parent=/bodyset/3distph translation=(0 0 0)
    WeldJoint 4MCP: socket_parent_frame=fourthmc_offset socket_child_frame=4proxph_offset
      PhysicalOffsetFrame fourthmc_offset: socket_parent=/bodyset/fourthmc translation=(-0.00183 -0.023689 -0.000173)
      PhysicalOffsetFrame 4proxph_offset: socket_parent=/bodyset/4proxph translation=(0 0 0)
    WeldJoint 4prox-midph: socket_parent_frame=4proxph_offset socket_child_frame=4midph_offset
      PhysicalOffsetFrame 4proxph_offset: socket_parent=/bodyset/4proxph translation=(-0.003528 -0.040255 0.001345)
      PhysicalOffsetFrame 4midph_offset: socket_parent=/bodyset/4midph translation=(0 0 0)
    WeldJoint 4mid-distph: socket_parent_frame=4midph_offset socket_child_frame=4distph_offset
      PhysicalOffsetFrame 4midph_offset: socket_parent=/bodyset/4midph translation=(-0.002317 -0.024789 0.000563)
      PhysicalOffsetFrame 4distph_offset: socket_parent=/bodyset/4distph translation=(0 0 0)
    WeldJoint 5MCP: socket_parent_frame=fifthmc_offset socket_child_frame=5proxph_offset
      PhysicalOffsetFrame fifthmc_offset: socket_parent=/bodyset/fifthmc translation=(-0.001597 -0.021431 -0.001496)
      PhysicalOffsetFrame 5proxph_offset: socket_parent=/bodyset/5proxph translation=(0 0 0)
    WeldJoint 5prox-midph: socket_parent_frame=5proxph_offset socket_child_frame=5midph_offset
      PhysicalOffsetFrame 5proxph_offset: socket_parent=/bodyset/5proxph translation=(-0.005279 -0.035563 -0.002879)
      PhysicalOffsetFrame 5midph_offset: socket_parent=/bodyset/5midph translation=(0 0 0)
    WeldJoint 5mid-distph: socket_parent_frame=5midph_offset socket_child_frame=5distph_offset
      PhysicalOffsetFrame 5midph_offset: socket_parent=/bodyset/5midph translation=(-0.002871 -0.020677 -0.002243)
      PhysicalOffsetFrame 5distph_offset: socket_parent=/bodyset/5distph translation=(0 0 0)
    CustomJoint bicpt: socket_parent_frame=radius_offset socket_child_frame=bicpt_offset
      Coordinate bicpt_tx: default_value=-9.962229e-5 range=(-99999.9 99999.9) clamped=false
      Coordinate bicpt_ty: default_value=-0.02760131 range=(-99999.9 99999.9) clamped=false
      Coordinate bicpt_tz: default_value=-0.004300211 range=(-99999.9 99999.9) clamped=false
      PhysicalOffsetFrame radius_offset: socket_parent=/bodyset/radius translation=(0 0 0)
      PhysicalOffsetFrame bicpt_offset: socket_parent=/bodyset/bicpt translation=(0 0 0)
      SpatialTransform: axes_held_at_zero=(rotation1 rotation2 rotation3)
        TransformAxis translation1: coordinates=bicpt_tx axis=(1 0 0) MultiplierFunction(scale=1, Constant(value=0))
        TransformAxis translation2: coordinates=bicpt_ty axis=(0 1 0) MultiplierFunction(scale=1, Constant(value=0))
        TransformAxis translation3: coordinates=bicpt_tz axis=(0 0 1) MultiplierFunction(scale=1, Constant(value=0))
    CustomJoint bicpt2: socket_parent_frame=radius_offset socket_child_frame=bicpt2_offset
      Coordinate bicpt2_tx: default_value=0.01466948 range=(-99999.9 99999.9) clamped=false
      Coordinate bicpt2_ty: default_value=-0.0102031 range=(-99999.9 99999.9) clamped=false
      Coordinate bicpt2_tz: default_value=-0.01061841 range=(-99999.9 99999.9) clamped=false
      PhysicalOffsetFrame radius_offset: socket_parent=/bodyset/radius translation=(0 0 0)
      PhysicalOffsetFrame bicpt2_offset: socket_parent=/bodyset/bicpt2 translation=(0 0 0)
      SpatialTransform: axes_held_at_zero=(rotation1 rotation2 rotation3)
        TransformAxis translation1: coordinates=bicpt2_tx axis=(1 0 0) MultiplierFunction(scale=1, Constant(value=0))
        TransformAxis translation2: coordinates=bicpt2_ty axis=(0 1 0) MultiplierFunction(scale=1, Constant(value=0))
        TransformAxis translation3: coordinates=bicpt2_tz axis=(0 0 1) MultiplierFunction(scale=1, Constant(value=0))
    CustomJoint ptpt: socket_parent_frame=ulna_offset socket_child_frame=ptpt_offset
      Coordinate ptpt_tx: default_value=0.00755 range=(-99999.9 99999.9) clamped=false
      Coordinate ptpt_ty: default_value=-0.0649 range=(-99999.9 99999.9) clamped=false
      Coordinate ptpt_tz: default_value=-5e-5 range=(-99999.9 99999.9) clamped=false
      PhysicalOffsetFrame ulna_offset: socket_parent=/bodyset/ulna translation=(0 0 0)
      PhysicalOffsetFrame ptpt_offset: socket_parent=/bodyset/ptpt translation=(0 0 0)
      SpatialTransform: axes_held_at_zero=(rotation1 rotation2 rotation3)
        TransformAxis translation1: coordinates=ptpt_tx axis=(1 0 0) MultiplierFunction(scale=1, Constant(value=0))
        TransformAxis translation2: coordinates=ptpt_ty axis=(0 1 0) MultiplierFunction(scale=1, Constant(value=0))
        TransformAxis translation3: coordinates=ptpt_tz axis=(0 0 1) MultiplierFunction(scale=1, Constant(value=0))
    CustomJoint FCUpt: socket_parent_frame=radius_offset socket_child_frame=FCUpt_offset
      Coordinate FCUpt_tx: default_value=0.004 range=(-99999.9 99999.9) clamped=false
      Coordinate FCUpt_ty: default_value=-0.1841 range=(-99999.9 99999.9) clamped=false
      Coordinate FCUpt_tz: default_value=0.0005 range=(-99999.9 99999.9) clamped=false
      PhysicalOffsetFrame radius_offset: socket_parent=/bodyset/radius translation=(0 0 0)
      PhysicalOffsetFrame FCUpt_offset: socket_parent=/bodyset/FCUpt translation=(0 0 0)
      SpatialTransform: axes_held_at_zero=(rotation1 rotation2 rotation3)
        TransformAxis translation1: coordinates=FCUpt_tx axis=(1 0 0) MultiplierFunction(scale=1, Constant(value=0))
        TransformAxis translation2: coordinates=FCUpt_ty axis=(0 1 0) MultiplierFunction(scale=1, Constant(value=0))
        TransformAxis translation3: coordinates=FCUpt_tz axis=(0 0 1) MultiplierFunction(scale=1, Constant(value=0))
    CustomJoint EDCpt: socket_parent_frame=radius_offset socket_child_frame=EDCpt_offset
      Coordinate EDCpt_tx: default_value=2.801301e-26 range=(-99999.9 99999.9) clamped=false
      Coordinate EDCpt_ty: default_value=-6.614183e-27 range=(-99999.9 99999.9) clamped=false
      Coordinate EDCpt_tz: default_value=-3.384905e-27 range=(-99999.9 99999.9) clamped=false
      PhysicalOffsetFrame radius_offset: socket_parent=/bodyset/radius translation=(0 0 0)
      PhysicalOffsetFrame EDCpt_offset: socket_parent=/bodyset/EDCpt translation=(0 0 0)
      SpatialTransform: axes_held_at_zero=(rotation1 rotation2 rotation3)
        TransformAxis translation1: coordinates=EDCpt_tx axis=(1 0 0) MultiplierFunction(scale=1, Constant(value=0))
        TransformAxis translation2: coordinates=EDCpt_ty axis=(0 1 0) MultiplierFunction(scale=1, Constant(value=0))
        TransformAxis translation3: coordinates=EDCpt_tz axis=(0 0 1) MultiplierFunction(scale=1, Constant(value=0))
    CustomJoint APLpt: socket_parent_frame=capitate_offset socket_child_frame=APLpt_offset
      Coordinate APLpt_tx: default_value=-0.0001790522 range=(-99999.9 99999.9) clamped=false
      Coordinate APLpt_ty: default_value=-7.162086e-5 range=(-99999.9 99999.9) clamped=false
      Coordinate APLpt_tz: default_value=-0.0003581043 range=(-99999.9 99999.9) clamped=false
      PhysicalOffsetFrame capitate_offset: socket_parent=/bodyset/capitate translation=(0 0 0)
      PhysicalOffsetFrame APLpt_offset: socket_parent=/bodyset/APLpt translation=(0 0 0)
      SpatialTransform: axes_held_at_zero=(rotation1 rotation2 rotation3)
        TransformAxis translation1: coordinates=APLpt_tx axis=(1 0 0) MultiplierFunction(scale=1, Constant(value=0))
        TransformAxis translation2: coordinates=APLpt_ty axis=(0 1 0) MultiplierFunction(scale=1, Constant(value=0))
        TransformAxis translation3: coordinates=APLpt_tz axis=(0 0 1) MultiplierFunction(scale=1, Constant(value=0))
    CustomJoint FPLpt: socket_parent_frame=capitate_offset socket_child_frame=FPLpt_offset
      Coordinate FPLpt_tx: default_value=-0.0002291868 range=(-99999.9 99999.9) clamped=false
      Coordinate FPLpt_ty: default_value=-0.0006875603 range=(-99999.9 99999.9) clamped=false
      Coordinate FPLpt_tz: default_value=-0.0003867526 range=(-99999.9 99999.9) clamped=false
      PhysicalOffsetFrame capitate_offset: socket_parent=/bodyset/capitate translation=(0 0 0)
      PhysicalOffsetFrame FPLpt_offset: socket_parent=/bodyset/FPLpt translation=(0 0 0)
      SpatialTransform: axes_held_at_zero=(rotation1 rotation2 rotation3)
        TransformAxis translation1: coordinates=FPLpt_tx axis=(1 0 0) MultiplierFunction(scale=1, Constant(value=0))
        TransformAxis translation2: coordinates=FPLpt_ty axis=(0 1 0) MultiplierFunction(scale=1, Constant(value=0))
        TransformAxis translation3: coordinates=FPLpt_tz axis=(0 0 1) MultiplierFunction(scale=1, Constant(value=0))
    CustomJoint FPLpt2: socket_parent_frame=capitate_offset socket_child_frame=FPLpt2_offset
      Coordinate FPLpt2_tx: default_value=4.241136e-5 range=(-99999.9 99999.9) clamped=false
      Coordinate FPLpt2_ty: default_value=-7.787698e-5 range=(-99999.9 99999.9) clamped=false
      Coordinate FPLpt2_tz: default_value=-9.345237e-5 range=(-99999.9 99999.9) clamped=false
      PhysicalOffsetFrame capitate_offset: socket_parent=/bodyset/capitate translation=(0 0 0)
      PhysicalOffsetFrame FPLpt2_offset: socket_parent=/bodyset/FPLpt2 translation=(0 0 0)
      SpatialTransform: axes_held_at_zero=(rotation1 rotation2 rotation3)
        TransformAxis translation1: coordinates=FPLpt2_tx axis=(1 0 0) MultiplierFunction(scale=1, Constant(value=0))
        TransformAxis translation2: coordinates=FPLpt2_ty axis=(0 1 0) MultiplierFunction(scale=1, Constant(value=0))
        TransformAxis translation3: coordinates=FPLpt2_tz axis=(0 0 1) MultiplierFunction(scale=1, Constant(value=0))
    CustomJoint PEC1pt2: socket_parent_frame=humerus_offset socket_child_frame=PEC1pt2_offset
      Coordinate PEC1pt2_tx: default_value=1.762363e-7 range=(-99999.9 99999.9) clamped=false
      Coordinate PEC1pt2_ty: default_value=6.183206e-7 range=(-99999.9 99999.9) clamped=false
      Coordinate PEC1pt2_tz: default_value=4.30136e-7 range=(-99999.9 99999.9) clamped=false
      PhysicalOffsetFrame humerus_offset: socket_parent=/bodyset/humerus translation=(0 0 0)
      PhysicalOffsetFrame PEC1pt2_offset: socket_parent=/bodyset/PEC1pt2 translation=(0 0 0)
      SpatialTransform: axes_held_at_zero=(rotation1 rotation2 rotation3)
        TransformAxis translation1: coordinates=PEC1pt2_tx axis=(1 0 0) MultiplierFunction(scale=1, Constant(value=0))
        TransformAxis translation2: coordinates=PEC1pt2_ty axis=(0 1 0) MultiplierFunction(scale=1, Constant(value=0))
        TransformAxis translation3: coordinates=PEC1pt2_tz axis=(0 0 1) MultiplierFunction(scale=1, Constant(value=0))
    CustomJoint PEC1pt3: socket_parent_frame=thorax_offset socket_child_frame=PEC1pt3_offset
      Coordinate PEC1pt3_tx: default_value=-5.765018e-7 range=(-99999.9 99999.9) clamped=false
      Coordinate PEC1pt3_ty: default_value=1.391968e-6 range=(-99999.9 99999.9) clamped=false
      Coordinate PEC1pt3_tz: default_value=-1.320279e-6 range=(-99999.9 99999.9) clamped=false
      PhysicalOffsetFrame thorax_offset: socket_parent=/bodyset/thorax translation=(0 0 0)
      PhysicalOffsetFrame PEC1pt3_offset: socket_parent=/bodyset/PEC1pt3 translation=(0 0 0)
      SpatialTransform: axes_held_at_zero=(rotation1 rotation2 rotation3)
        TransformAxis translation1: coordinates=PEC1pt3_tx axis=(1 0 0) MultiplierFunction(scale=1, Constant(value=0))
        TransformAxis translation2: coordinates=PEC1pt3_ty axis=(0 1 0) MultiplierFunction(scale=1, Constant(value=0))
        TransformAxis translation3: coordinates=PEC1pt3_tz axis=(0 0 1) MultiplierFunction(scale=1, Constant(value=0))
    CustomJoint PEC2pt2: socket_parent_frame=humerus_offset socket_child_frame=PEC2pt2_offset
      Coordinate PEC2pt2_tx: default_value=1.762363e-7 range=(-99999.9 99999.9) clamped=false
      Coordinate PEC2pt2_ty: default_value=6.183206e-7 range=(-99999.9 99999.9) clamped=false
      Coordinate PEC2pt2_tz: default_value=4.30136e-7 range=(-99999.9 99999.9) clamped=false
      PhysicalOffsetFrame humerus_offset: socket_parent=/bodyset/humerus translation=(0 0 0)
      PhysicalOffsetFrame PEC2pt2_offset: socket_parent=/bodyset/PEC2pt2 translation=(0 0 0)
      SpatialTransform: axes_held_at_zero=(rotation1 rotation2 rotation3)
        TransformAxis translation1: coordinates=PEC2pt2_tx axis=(1 0 0) MultiplierFunction(scale=1, Constant(value=0))
        TransformAxis translation2: coordinates=PEC2pt2_ty axis=(0 1 0) MultiplierFunction(scale=1, Constant(value=0))
        TransformAxis translation3: coordinates=PEC2pt2_tz axis=(0 0 1) MultiplierFunction(scale=1, Constant(value=0))
    CustomJoint PEC2pt3: socket_parent_frame=thorax_offset socket_child_frame=PEC2pt3_offset
      Coordinate PEC2pt3_tx: default_value=3.883173e-8 range=(-99999.9 99999.9) clamped=false
      Coordinate PEC2pt3_ty: default_value=1.290408e-6 range=(-99999.9 99999.9) clamped=false
      Coordinate PEC2pt3_tz: default_value=-6.780617e-7 range=(-99999.9 99999.9) clamped=false
      PhysicalOffsetFrame thorax_offset: socket_parent=/bodyset/thorax translation=(0 0 0)
      PhysicalOffsetFrame PEC2pt3_offset: socket_parent=/bodyset/PEC2pt3 translation=(0 0 0)
      SpatialTransform: axes_held_at_zero=(rotation1 rotation2 rotation3)
        TransformAxis translation1: coordinates=PEC2pt3_tx axis=(1 0 0) MultiplierFunction(scale=1, Constant(value=0))
        TransformAxis translation2: coordinates=PEC2pt3_ty axis=(0 1 0) MultiplierFunction(scale=1, Constant(value=0))
        TransformAxis translation3: coordinates=PEC2pt3_tz axis=(0 0 1) MultiplierFunction(scale=1, Constant(value=0))
    CustomJoint PEC3pt2: socket_parent_frame=humerus_offset socket_child_frame=PEC3pt2_offset
      Coordinate PEC3pt2_tx: default_value=3.538377e-7 range=(-99999.9 99999.9) clamped=false
      Coordinate PEC3pt2_ty: default_value=3.438402e-7 range=(-99999.9 99999.9) clamped=false
      Coordinate PEC3pt2_tz: default_value=1.897113e-6 range=(-99999.9 99999.9) clamped=false
      PhysicalOffsetFrame humerus_offset: socket_parent=/bodyset/humerus translation=(0 0 0)
      PhysicalOffsetFrame PEC3pt2_offset: socket_parent=/bodyset/PEC3pt2 translation=(0 0 0)
      SpatialTransform: axes_held_at_zero=(rotation1 rotation2 rotation3)
        TransformAxis translation1: coordinates=PEC3pt2_tx axis=(1 0 0) MultiplierFunction(scale=1, Constant(value=0))
        TransformAxis translation2: coordinates=PEC3pt2_ty axis=(0 1 0) MultiplierFunction(scale=1, Constant(value=0))
        TransformAxis translation3: coordinates=PEC3pt2_tz axis=(0 0 1) MultiplierFunction(scale=1, Constant(value=0))
    CustomJoint PEC3pt3: socket_parent_frame=thorax_offset socket_child_frame=PEC3pt3_offset
      Coordinate PEC3pt3_tx: default_value=0 range=(-99999.9 99999.9) clamped=false
      Coordinate PEC3pt3_ty: default_value=0.0002252913 range=(-99999.9 99999.9) clamped=false
      Coordinate PEC3pt3_tz: default_value=0 range=(-99999.9 99999.9) clamped=false
      PhysicalOffsetFrame thorax_offset: socket_parent=/bodyset/thorax translation=(0 0 0)
      PhysicalOffsetFrame PEC3pt3_offset: socket_parent=/bodyset/PEC3pt3 translation=(0 0 0)
      SpatialTransform: axes_held_at_zero=(rotation1 rotation2 rotation3)
        TransformAxis translation1: coordinates=PEC3pt3_tx axis=(1 0 0) MultiplierFunction(scale=1, Constant(value=0))
        TransformAxis translation2: coordinates=PEC3pt3_ty axis=(0 1 0) MultiplierFunction(scale=1, Constant(value=0))
        TransformAxis translation3: coordinates=PEC3pt3_tz axis=(0 0 1) MultiplierFunction(scale=1, Constant(value=0))
    CustomJoint DELT2pt2a: socket_parent_frame=humerus_offset socket_child_frame=DELT2pt2a_offset
      Coordinate DELT2pt2a_tx: default_value=-5.048124e-7 range=(-99999.9 99999.9) clamped=false
      Coordinate DELT2pt2a_ty: default_value=-2.332891e-6 range=(-99999.9 99999.9) clamped=false
      Coordinate DELT2pt2a_tz: default_value=1.251566e-8 range=(-99999.9 99999.9) clamped=false
      PhysicalOffsetFrame humerus_offset: socket_parent=/bodyset/humerus translation=(0 0 0)
      PhysicalOffsetFrame DELT2pt2a_offset: socket_parent=/bodyset/DELT2pt2a translation=(0 0 0)
      SpatialTransform: axes_held_at_zero=(rotation1 rotation2 rotation3)
        TransformAxis translation1: coordinates=DELT2pt2a_tx axis=(1 0 0)
            MultiplierFunction(scale=1, Constant(value=0))
        TransformAxis translation2: coordinates=DELT2pt2a_ty axis=(0 1 0)
            MultiplierFunction(scale=1, Constant(value=0))
        TransformAxis translation3: coordinates=DELT2pt2a_tz axis=(0 0 1)
            MultiplierFunction(scale=1, Constant(value=0))
    CustomJoint DELT2pt2: socket_parent_frame=DELT2pt2a_offset socket_child_frame=DELT2pt2_offset
      Coordinate DELT2pt2_tx: default_value=-0.0004399096 range=(-99999.9 99999.9) clamped=false
      Coordinate DELT2pt2_ty: default_value=2.853271e-12 range=(-99999.9 99999.9) clamped=false
      Coordinate DELT2pt2_tz: default_value=1.790581e-11 range=(-99999.9 99999.9) clamped=false
      PhysicalOffsetFrame DELT2pt2a_offset: socket_parent=/bodyset/DELT2pt2a translation=(0 0 0)
      PhysicalOffsetFrame DELT2pt2_offset: socket_parent=/bodyset/DELT2pt2 translation=(0 0 0)
      SpatialTransform: axes_held_at_zero=(rotation1 rotation2 rotation3)
        TransformAxis translation1: coordinates=DELT2pt2_tx axis=(1 0 0) MultiplierFunction(scale=1, Constant(value=0))
        TransformAxis translation2: coordinates=DELT2pt2_ty axis=(0 1 0) MultiplierFunction(scale=1, Constant(value=0))
        TransformAxis translation3: coordinates=DELT2pt2_tz axis=(0 0 1) MultiplierFunction(scale=1, Constant(value=0))
    CustomJoint LAT1pt2: socket_parent_frame=scapula_offset socket_child_frame=LAT1pt2_offset
      Coordinate LAT1pt2_tx: default_value=-6.272817e-8 range=(-99999.9 99999.9) clamped=false
      Coordinate LAT1pt2_ty: default_value=1.051444e-6 range=(-99999.9 99999.9) clamped=false
      Coordinate LAT1pt2_tz: default_value=-4.30136e-7 range=(-99999.9 99999.9) clamped=false
      PhysicalOffsetFrame scapula_offset: socket_parent=/bodyset/scapula translation=(0 0 0)
      PhysicalOffsetFrame LAT1pt2_offset: socket_parent=/bodyset/LAT1pt2 translation=(0 0 0)
      SpatialTransform: axes_held_at_zero=(rotation1 rotation2 rotation3)
        TransformAxis translation1: coordinates=LAT1pt2_tx axis=(1 0 0) MultiplierFunction(scale=1, Constant(value=0))
        TransformAxis translation2: coordinates=LAT1pt2_ty axis=(0 1 0) MultiplierFunction(scale=1, Constant(value=0))
        TransformAxis translation3: coordinates=LAT1pt2_tz axis=(0 0 1) MultiplierFunction(scale=1, Constant(value=0))
    CustomJoint LAT1pt3: socket_parent_frame=scapula_offset socket_child_frame=LAT1pt3_offset
      Coordinate LAT1pt3_tx: default_value=1.732492e-7 range=(-99999.9 99999.9) clamped=false
      Coordinate LAT1pt3_ty: default_value=1.517424e-6 range=(-99999.9 99999.9) clamped=false
      Coordinate LAT1pt3_tz: default_value=-1.254563e-6 range=(-99999.9 99999.9) clamped=false
      PhysicalOffsetFrame scapula_offset: socket_parent=/bodyset/scapula translation=(0 0 0)
      PhysicalOffsetFrame LAT1pt3_offset: socket_parent=/bodyset/LAT1pt3 translation=(0 0 0)
      SpatialTransform: axes_held_at_zero=(rotation1 rotation2 rotation3)
        TransformAxis translation1: coordinates=LAT1pt3_tx axis=(1 0 0) MultiplierFunction(scale=1, Constant(value=0))
        TransformAxis translation2: coordinates=LAT1pt3_ty axis=(0 1 0) MultiplierFunction(scale=1, Constant(value=0))
        TransformAxis translation3: coordinates=LAT1pt3_tz axis=(0 0 1) MultiplierFunction(scale=1, Constant(value=0))
    CustomJoint LAT2pt2: socket_parent_frame=scapula_offset socket_child_frame=LAT2pt2_offset
      Coordinate LAT2pt2_tx: default_value=-4.211749e-7 range=(-99999.9 99999.9) clamped=false
      Coordinate LAT2pt2_ty: default_value=9.11052e-7 range=(-99999.9 99999.9) clamped=false
      Coordinate LAT2pt2_tz: default_value=-3.853302e-7 range=(-99999.9 99999.9) clamped=false
      PhysicalOffsetFrame scapula_offset: socket_parent=/bodyset/scapula translation=(0 0 0)
      PhysicalOffsetFrame LAT2pt2_offset: socket_parent=/bodyset/LAT2pt2 translation=(0 0 0)
      SpatialTransform: axes_held_at_zero=(rotation1 rotation2 rotation3)
        TransformAxis translation1: coordinates=LAT2pt2_tx axis=(1 0 0) MultiplierFunction(scale=1, Constant(value=0))
        TransformAxis translation2: coordinates=LAT2pt2_ty axis=(0 1 0) MultiplierFunction(scale=1, Constant(value=0))
        TransformAxis translation3: coordinates=LAT2pt2_tz axis=(0 0 1) MultiplierFunction(scale=1, Constant(value=0))
    CustomJoint LAT2pt3: socket_parent_frame=scapula_offset socket_child_frame=LAT2pt3_offset
      Coordinate LAT2pt3_tx: default_value=-8.781944e-7 range=(-99999.9 99999.9) clamped=false
      Coordinate LAT2pt3_ty: default_value=1.923664e-6 range=(-99999.9 99999.9) clamped=false
      Coordinate LAT2pt3_tz: default_value=-2.153667e-6 range=(-99999.9 99999.9) clamped=false
      PhysicalOffsetFrame scapula_offset: socket_parent=/bodyset/scapula translation=(0 0 0)
      PhysicalOffsetFrame LAT2pt3_offset: socket_parent=/bodyset/LAT2pt3 translation=(0 0 0)
      SpatialTransform: axes_held_at_zero=(rotation1 rotation2 rotation3)
        TransformAxis translation1: coordinates=LAT2pt3_tx axis=(1 0 0) MultiplierFunction(scale=1, Constant(value=0))
        TransformAxis translation2: coordinates=LAT2pt3_ty axis=(0 1 0) MultiplierFunction(scale=1, Constant(value=0))
        TransformAxis translation3: coordinates=LAT2pt3_tz axis=(0 0 1) MultiplierFunction(scale=1, Constant(value=0))
    CustomJoint LAT3pt2: socket_parent_frame=scapula_offset socket_child_frame=LAT3pt2_offset
      Coordinate LAT3pt2_tx: default_value=-1.648855e-6 range=(-99999.9 99999.9) clamped=false
      Coordinate LAT3pt2_ty: default_value=1.018586e-6 range=(-99999.9 99999.9) clamped=false
      Coordinate LAT3pt2_tz: default_value=-5.167607e-7 range=(-99999.9 99999.9) clamped=false
      PhysicalOffsetFrame scapula_offset: socket_parent=/bodyset/scapula translation=(0 0 0)
      PhysicalOffsetFrame LAT3pt2_offset: socket_parent=/bodyset/LAT3pt2 translation=(0 0 0)
      SpatialTransform: axes_held_at_zero=(rotation1 rotation2 rotation3)
        TransformAxis translation1: coordinates=LAT3pt2_tx axis=(1 0 0) MultiplierFunction(scale=1, Constant(value=0))
        TransformAxis translation2: coordinates=LAT3pt2_ty axis=(0 1 0) MultiplierFunction(scale=1, Constant(value=0))
        TransformAxis translation3: coordinates=LAT3pt2_tz axis=(0 0 1) MultiplierFunction(scale=1, Constant(value=0))
    CustomJoint LAT3pt3: socket_parent_frame=scapula_offset socket_child_frame=LAT3pt3_offset
      Coordinate LAT3pt3_tx: default_value=-1.093262e-6 range=(-99999.9 99999.9) clamped=false
      Coordinate LAT3pt3_ty: default_value=2.22237e-6 range=(-99999.9 99999.9) clamped=false
      Coordinate LAT3pt3_tz: default_value=-2.691337e-6 range=(-99999.9 99999.9) clamped=false
      PhysicalOffsetFrame scapula_offset: socket_parent=/bodyset/scapula translation=(0 0 0)
      PhysicalOffsetFrame LAT3pt3_offset: socket_parent=/bodyset/LAT3pt3 translation=(0 0 0)
      SpatialTransform: axes_held_at_zero=(rotation1 rotation2 rotation3)
        TransformAxis translation1: coordinates=LAT3pt3_tx axis=(1 0 0) MultiplierFunction(scale=1, Constant(value=0))
        TransformAxis translation2: coordinates=LAT3pt3_ty axis=(0 1 0) MultiplierFunction(scale=1, Constant(value=0))
        TransformAxis translation3: coordinates=LAT3pt3_tz axis=(0 0 1) MultiplierFunction(scale=1, Constant(value=0))
  ConstraintSet:
    CoordinateCouplerConstraint sternoclavicular_r2_con: independent_coordinate_names=shoulder_elv
        dependent_coordinate_name=sternoclavicular_r2
      coupled_coordinates_function: SimmSpline: x=(0 2.61799) y=(0 -0.633555)
    CoordinateCouplerConstraint sternoclavicular_r3_con: independent_coordinate_names=shoulder_elv
        dependent_coordinate_name=sternoclavicular_r3
      coupled_coordinates_function: SimmSpline: x=(0 3.14159) y=(0 0.322013)
    CoordinateCouplerConstraint unrotscap_r2_con: independent_coordinate_names=shoulder_elv
        dependent_coordinate_name=unrotscap_r2
      coupled_coordinates_function: SimmSpline: x=(0 2.61799) y=(0 0.633555)
    CoordinateCouplerConstraint unrotscap_r3_con: independent_coordinate_names=shoulder_elv
        dependent_coordinate_name=unrotscap_r3
      coupled_coordinates_function: SimmSpline: x=(0 3.14159) y=(0 -0.322013)
    CoordinateCouplerConstraint acromioclavicular_r1_con: independent_coordinate_names=shoulder_elv
        dependent_coordinate_name=acromioclavicular_r1
      coupled_coordinates_function: SimmSpline: x=(0 2.61799) y=(0 0.466003)
    CoordinateCouplerConstraint acromioclavicular_r2_con: independent_coordinate_names=shoulder_elv
        dependent_coordinate_name=acromioclavicular_r2
      coupled_coordinates_function: SimmSpline: x=(0 2.61799) y=(0 -0.128282)
    CoordinateCouplerConstraint acromioclavicular_r3_con: independent_coordinate_names=shoulder_elv
        dependent_coordinate_name=acromioclavicular_r3
      coupled_coordinates_function: SimmSpline: x=(0 2.61799) y=(0 1.03673)
    CoordinateCouplerConstraint unrothum_r1_con: independent_coordinate_names=shoulder_elv
        dependent_coordinate_name=unrothum_r1
      coupled_coordinates_function: SimmSpline: x=(0 2.61799) y=(0 -0.466003)
    CoordinateCouplerConstraint unrothum_r2_con: independent_coordinate_names=shoulder_elv
        dependent_coordinate_name=unrothum_r2
      coupled_coordinates_function: SimmSpline: x=(0 2.61799) y=(0 0.128282)
    CoordinateCouplerConstraint unrothum_r3_con: independent_coordinate_names=shoulder_elv
        dependent_coordinate_name=unrothum_r3
      coupled_coordinates_function: SimmSpline: x=(0 2.61799) y=(0 -1.03673)
    CoordinateCouplerConstraint shoulder1_r2_con: independent_coordinate_names=elv_angle
        dependent_coordinate_name=shoulder1_r2
      coupled_coordinates_function: SimmSpline: x=(-1.5708 3.14159) y=(1.5708 -3.14159)
    CoordinateCouplerConstraint proximal_distal_r1_con: independent_coordinate_names=deviation
        dependent_coordinate_name=proximal_distal_r1
      coupled_coordinates_function: SimmSpline: x=(-0.174533 0 0.436332) y=(-0.261799 0 0.436332)
    CoordinateCouplerConstraint proximal_distal_r3_con: independent_coordinate_names=flexion
        dependent_coordinate_name=proximal_distal_r3
      coupled_coordinates_function: SimmSpline: x=(-1.22173 1.22173) y=(-0.610865 0.610865)
    CoordinateCouplerConstraint bicpt_tx_con: independent_coordinate_names=elbow_flexion
        dependent_coordinate_name=bicpt_tx
      coupled_coordinates_function: SimmSpline: x=(0 2.26893) y=(-0.0001 0.0042)
    CoordinateCouplerConstraint bicpt_ty_con: independent_coordinate_names=elbow_flexion
        dependent_coordinate_name=bicpt_ty
      coupled_coordinates_function: SimmSpline: x=(0 2.26893) y=(-0.0276 -0.0425)
    CoordinateCouplerConstraint bicpt_tz_con: independent_coordinate_names=elbow_flexion
        dependent_coordinate_name=bicpt_tz
      coupled_coordinates_function: SimmSpline: x=(0 2.26893) y=(-0.0043 -0.0067)
    CoordinateCouplerConstraint bicpt2_tx_con: independent_coordinate_names=pro_sup dependent_coordinate_name=bicpt2_tx
      coupled_coordinates_function: SimmSpline: x=(-1.5708 -0.610865 1.57823) y=(-0.003 0.01 0.01376)
    CoordinateCouplerConstraint bicpt2_ty_con: independent_coordinate_names=elbow_flexion
        dependent_coordinate_name=bicpt2_ty
      coupled_coordinates_function: SimmSpline: x=(0 2.27483) y=(-0.0102 -0.045607)
    CoordinateCouplerConstraint bicpt2_tz_con: independent_coordinate_names=pro_sup dependent_coordinate_name=bicpt2_tz
      coupled_coordinates_function: SimmSpline: x=(-1.5708 -0.610865 1.57561) y=(-0.0095 -0.011533 -0.000331)
    CoordinateCouplerConstraint ptpt_tx_con: independent_coordinate_names=pro_sup dependent_coordinate_name=ptpt_tx
      coupled_coordinates_function: SimmSpline: x=(-1.5708 1.5708) y=(0.0142 0.0009)
    CoordinateCouplerConstraint ptpt_ty_con: independent_coordinate_names=pro_sup dependent_coordinate_name=ptpt_ty
      coupled_coordinates_function: SimmSpline: x=(-1.5708 1.5708) y=(-0.0606 -0.0692)
    CoordinateCouplerConstraint ptpt_tz_con: independent_coordinate_names=pro_sup dependent_coordinate_name=ptpt_tz
      coupled_coordinates_function: SimmSpline: x=(-1.5708 1.5708) y=(0.0072 -0.0073)
    CoordinateCouplerConstraint FCUpt_tx_con: independent_coordinate_names=pro_sup dependent_coordinate_name=FCUpt_tx
      coupled_coordinates_function: SimmSpline: x=(-1.5708 0 1.5708) y=(-0.0027 0.004 0.0132)
    CoordinateCouplerConstraint FCUpt_ty_con: independent_coordinate_names=pro_sup dependent_coordinate_name=FCUpt_ty
      coupled_coordinates_function: SimmSpline: x=(-1.5708 0 1.5708) y=(-0.1838 -0.1841 -0.1821)
    CoordinateCouplerConstraint FCUpt_tz_con: independent_coordinate_names=pro_sup dependent_coordinate_name=FCUpt_tz
      coupled_coordinates_function: SimmSpline: x=(-1.5708 0 1.5708) y=(0.0069 0.0005 0.0002)
    CoordinateCouplerConstraint EDCpt_tx_con: independent_coordinate_names=pro_sup dependent_coordinate_name=EDCpt_tx
      coupled_coordinates_function: SimmSpline: x=(-1.5708 0 1.5708) y=(0.0108 0 -0.0108)
    CoordinateCouplerConstraint EDCpt_ty_con: independent_coordinate_names=pro_sup dependent_coordinate_name=EDCpt_ty
      coupled_coordinates_function: SimmSpline: x=(-1.5708 0 1.5708) y=(-0.0013 0 0.0038)
    CoordinateCouplerConstraint EDCpt_tz_con: independent_coordinate_names=pro_sup dependent_coordinate_name=EDCpt_tz
      coupled_coordinates_function: SimmSpline: x=(-1.5708 0 1.5708) y=(-0.0035 0 -0.00089)
    CoordinateCouplerConstraint APLpt_tx_con: independent_coordinate_names=flexion dependent_coordinate_name=APLpt_tx
      coupled_coordinates_function: SimmSpline: x=(-1.22173 0 1.22173) y=(0 0 -0.0025)
    CoordinateCouplerConstraint APLpt_ty_con: independent_coordinate_names=flexion dependent_coordinate_name=APLpt_ty
      coupled_coordinates_function: SimmSpline: x=(-1.22173 0 1.22173) y=(0 0 -0.001)
    CoordinateCouplerConstraint APLpt_tz_con: independent_coordinate_names=flexion dependent_coordinate_name=APLpt_tz
      coupled_coordinates_function: SimmSpline: x=(-1.22173 0 1.22173) y=(0 0 -0.005)
    CoordinateCouplerConstraint FPLpt_tx_con: independent_coordinate_names=flexion dependent_coordinate_name=FPLpt_tx
      coupled_coordinates_function: SimmSpline: x=(-1.22173 0 1.22173) y=(0 0 -0.0032)
    CoordinateCouplerConstraint FPLpt_ty_con: independent_coordinate_names=flexion dependent_coordinate_name=FPLpt_ty
      coupled_coordinates_function: SimmSpline: x=(-1.22173 0 1.22173) y=(0 0 -0.0096)
    CoordinateCouplerConstraint FPLpt_tz_con: independent_coordinate_names=flexion dependent_coordinate_name=FPLpt_tz
      coupled_coordinates_function: SimmSpline: x=(-1.22173 0 1.22173) y=(0 0 -0.0054)
    CoordinateCouplerConstraint FPLpt2_tx_con: independent_coordinate_names=cmc_flexion
        dependent_coordinate_name=FPLpt2_tx
      coupled_coordinates_function: SimmSpline: x=(-0.261799 0 0.0872665 0.183675 0.376492 0.785303)
          y=(-0.0032 0 4e-5 3.2e-5 8e-6 0)
    CoordinateCouplerConstraint FPLpt2_ty_con: independent_coordinate_names=cmc_flexion
        dependent_coordinate_name=FPLpt2_ty
      coupled_coordinates_function: SimmSpline: x=(-0.261799 0 0.785398) y=(0.0005 0 0)
    CoordinateCouplerConstraint FPLpt2_tz_con: independent_coordinate_names=cmc_flexion
        dependent_coordinate_name=FPLpt2_tz
      coupled_coordinates_function: SimmSpline: x=(-0.261799 0 0.785398) y=(0.0006 0 0)
    CoordinateCouplerConstraint PEC1pt2_tx_con: independent_coordinate_names=shoulder_elv
        dependent_coordinate_name=PEC1pt2_tx
      coupled_coordinates_function: SimmSpline: x=(0 3.14159) y=(0 0.0059)
    CoordinateCouplerConstraint PEC1pt2_ty_con: independent_coordinate_names=shoulder_elv
        dependent_coordinate_name=PEC1pt2_ty
      coupled_coordinates_function: SimmSpline: x=(0 3.14159) y=(0 0.0207)
    CoordinateCouplerConstraint PEC1pt2_tz_con: independent_coordinate_names=shoulder_elv
        dependent_coordinate_name=PEC1pt2_tz
      coupled_coordinates_function: SimmSpline: x=(0 3.14159) y=(0 0.0144)
    CoordinateCouplerConstraint PEC1pt3_tx_con: independent_coordinate_names=shoulder_elv
        dependent_coordinate_name=PEC1pt3_tx
      coupled_coordinates_function: SimmSpline: x=(0 3.14159) y=(0 -0.0193)
    CoordinateCouplerConstraint PEC1pt3_ty_con: independent_coordinate_names=shoulder_elv
        dependent_coordinate_name=PEC1pt3_ty
      coupled_coordinates_function: SimmSpline: x=(0 3.14159) y=(0 0.0466)
    CoordinateCouplerConstraint PEC1pt3_tz_con: independent_coordinate_names=shoulder_elv
        dependent_coordinate_name=PEC1pt3_tz
      coupled_coordinates_function: SimmSpline: x=(0 3.14159) y=(0 -0.0442)
    CoordinateCouplerConstraint PEC2pt2_tx_con: independent_coordinate_names=shoulder_elv
        dependent_coordinate_name=PEC2pt2_tx
      coupled_coordinates_function: SimmSpline: x=(0 3.14159) y=(0 0.0059)
    CoordinateCouplerConstraint PEC2pt2_ty_con: independent_coordinate_names=shoulder_elv
        dependent_coordinate_name=PEC2pt2_ty
      coupled_coordinates_function: SimmSpline: x=(0 3.14159) y=(0 0.0207)
    CoordinateCouplerConstraint PEC2pt2_tz_con: independent_coordinate_names=shoulder_elv
        dependent_coordinate_name=PEC2pt2_tz
      coupled_coordinates_function: SimmSpline: x=(0 3.14159) y=(0 0.0144)
    CoordinateCouplerConstraint PEC2pt3_tx_con: independent_coordinate_names=shoulder_elv
        dependent_coordinate_name=PEC2pt3_tx
      coupled_coordinates_function: SimmSpline: x=(0 3.14159) y=(0 0.0013)
    CoordinateCouplerConstraint PEC2pt3_ty_con: independent_coordinate_names=shoulder_elv
        dependent_coordinate_name=PEC2pt3_ty
      coupled_coordinates_function: SimmSpline: x=(0 3.14159) y=(0 0.0432)
    CoordinateCouplerConstraint PEC2pt3_tz_con: independent_coordinate_names=shoulder_elv
        dependent_coordinate_name=PEC2pt3_tz
      coupled_coordinates_function: SimmSpline: x=(0 3.14159) y=(0 -0.0227)
    CoordinateCouplerConstraint PEC3pt2_tx_con: independent_coordinate_names=shoulder_elv
        dependent_coordinate_name=PEC3pt2_tx
      coupled_coordinates_function: SimmSpline: x=(0 0.747517 3.14159) y=(0 0.002482 0.0059)
    CoordinateCouplerConstraint PEC3pt2_ty_con: independent_coordinate_names=shoulder_elv
        dependent_coordinate_name=PEC3pt2_ty
      coupled_coordinates_function: SimmSpline: x=(0 3.13149) y=(0 0.011474)
    CoordinateCouplerConstraint PEC3pt2_tz_con: independent_coordinate_names=shoulder_elv
        dependent_coordinate_name=PEC3pt2_tz
      coupled_coordinates_function: SimmSpline: x=(0 0.623056 2.29124 3.12533) y=(0 0.009968 0.018193 0.017746)
    CoordinateCouplerConstraint PEC3pt3_tx_con: independent_coordinate_names=shoulder_elv
        dependent_coordinate_name=PEC3pt3_tx
      coupled_coordinates_function: SimmSpline: x=(0 3.14159) y=(0 0)
    CoordinateCouplerConstraint PEC3pt3_ty_con: independent_coordinate_names=shoulder_elv
        dependent_coordinate_name=PEC3pt3_ty
      coupled_coordinates_function: SimmSpline: x=(0.0101016 1.59605 3.14159) y=(0.000222 0.011219 0.0441)
    CoordinateCouplerConstraint PEC3pt3_tz_con: independent_coordinate_names=shoulder_elv
        dependent_coordinate_name=PEC3pt3_tz
      coupled_coordinates_function: SimmSpline: x=(0 3.14159) y=(0 0)
    CoordinateCouplerConstraint DELT2pt2a_tx_con: independent_coordinate_names=shoulder_elv
        dependent_coordinate_name=DELT2pt2a_tx
      coupled_coordinates_function: SimmSpline: x=(0 3.14159) y=(0 -0.0169)
    CoordinateCouplerConstraint DELT2pt2a_ty_con: independent_coordinate_names=shoulder_elv
        dependent_coordinate_name=DELT2pt2a_ty
      coupled_coordinates_function: SimmSpline: x=(0 3.14159) y=(0 -0.0781)
    CoordinateCouplerConstraint DELT2pt2a_tz_con: independent_coordinate_names=shoulder_elv
        dependent_coordinate_name=DELT2pt2a_tz
      coupled_coordinates_function: SimmSpline: x=(0 1.22229 3.14159) y=(0 -0.005395 -0.0363)
    CoordinateCouplerConstraint DELT2pt2_tx_con: independent_coordinate_names=shoulder_rot
        dependent_coordinate_name=DELT2pt2_tx
      coupled_coordinates_function: SimmSpline: x=(-1.5708 -0.0101503 0.349046) y=(0.0214 4.9e-5 -0.020005)
    CoordinateCouplerConstraint DELT2pt2_ty_con: independent_coordinate_names=shoulder_rot
        dependent_coordinate_name=DELT2pt2_ty
      coupled_coordinates_function: SimmSpline: x=(-1.5708 -1.18189 -0.169482 0 0.349066)
          y=(-0.0029 -0.002148 -0.000139 0 -0.001644)
    CoordinateCouplerConstraint DELT2pt2_tz_con: independent_coordinate_names=shoulder_rot
        dependent_coordinate_name=DELT2pt2_tz
      coupled_coordinates_function: SimmSpline: x=(-1.5708 -0.496661 0 0.342893) y=(-0.0455 -0.006762 0 -0.00573)
    CoordinateCouplerConstraint LAT1pt2_tx_con: independent_coordinate_names=shoulder_elv
        dependent_coordinate_name=LAT1pt2_tx
      coupled_coordinates_function: SimmSpline: x=(0 3.14159) y=(0 -0.0021)
    CoordinateCouplerConstraint LAT1pt2_ty_con: independent_coordinate_names=shoulder_elv
        dependent_coordinate_name=LAT1pt2_ty
      coupled_coordinates_function: SimmSpline: x=(0 3.14159) y=(0 0.0352)
    CoordinateCouplerConstraint LAT1pt2_tz_con: independent_coordinate_names=shoulder_elv
        dependent_coordinate_name=LAT1pt2_tz
      coupled_coordinates_function: SimmSpline: x=(0 3.14159) y=(0 -0.0144)
    CoordinateCouplerConstraint LAT1pt3_tx_con: independent_coordinate_names=shoulder_elv
        dependent_coordinate_name=LAT1pt3_tx
      coupled_coordinates_function: SimmSpline: x=(0 3.14159) y=(0 0.0058)
    CoordinateCouplerConstraint LAT1pt3_ty_con: independent_coordinate_names=shoulder_elv
        dependent_coordinate_name=LAT1pt3_ty
      coupled_coordinates_function: SimmSpline: x=(0 3.14159) y=(0 0.0508)
    CoordinateCouplerConstraint LAT1pt3_tz_con: independent_coordinate_names=shoulder_elv
        dependent_coordinate_name=LAT1pt3_tz
      coupled_coordinates_function: SimmSpline: x=(0 3.14159) y=(0 -0.042)
    CoordinateCouplerConstraint LAT2pt2_tx_con: independent_coordinate_names=shoulder_elv
        dependent_coordinate_name=LAT2pt2_tx
      coupled_coordinates_function: SimmSpline: x=(0 3.14159) y=(0 -0.0141)
    CoordinateCouplerConstraint LAT2pt2_ty_con: independent_coordinate_names=shoulder_elv
        dependent_coordinate_name=LAT2pt2_ty
      coupled_coordinates_function: SimmSpline: x=(0 3.14159) y=(0 0.0305)
    CoordinateCouplerConstraint LAT2pt2_tz_con: independent_coordinate_names=shoulder_elv
        dependent_coordinate_name=LAT2pt2_tz
      coupled_coordinates_function: SimmSpline: x=(0 3.14159) y=(0 -0.0129)
    CoordinateCouplerConstraint LAT2pt3_tx_con: independent_coordinate_names=shoulder_elv
        dependent_coordinate_name=LAT2pt3_tx
      coupled_coordinates_function: SimmSpline: x=(0 3.14159) y=(0 -0.0294)
    CoordinateCouplerConstraint LAT2pt3_ty_con: independent_coordinate_names=shoulder_elv
        dependent_coordinate_name=LAT2pt3_ty
      coupled_coordinates_function: SimmSpline: x=(0 3.14159) y=(0 0.0644)
    CoordinateCouplerConstraint LAT2pt3_tz_con: independent_coordinate_names=shoulder_elv
        dependent_coordinate_name=LAT2pt3_tz
      coupled_coordinates_function: SimmSpline: x=(0 3.14159) y=(0 -0.0721)
    CoordinateCouplerConstraint LAT3pt2_tx_con: independent_coordinate_names=shoulder_elv
        dependent_coordinate_name=LAT3pt2_tx
      coupled_coordinates_function: SimmSpline: x=(0 3.14159) y=(0 -0.0552)
    CoordinateCouplerConstraint LAT3pt2_ty_con: independent_coordinate_names=shoulder_elv
        dependent_coordinate_name=LAT3pt2_ty
      coupled_coordinates_function: SimmSpline: x=(0 3.14159) y=(0 0.0341)
    CoordinateCouplerConstraint LAT3pt2_tz_con: independent_coordinate_names=shoulder_elv
        dependent_coordinate_name=LAT3pt2_tz
      coupled_coordinates_function: SimmSpline: x=(0 3.14159) y=(0 -0.0173)
    CoordinateCouplerConstraint LAT3pt3_tx_con: independent_coordinate_names=shoulder_elv
        dependent_coordinate_name=LAT3pt3_tx
      coupled_coordinates_function: SimmSpline: x=(0 3.14159) y=(0 -0.0366)
    CoordinateCouplerConstraint LAT3pt3_ty_con: independent_coordinate_names=shoulder_elv
        dependent_coordinate_name=LAT3pt3_ty
      coupled_coordinates_function: SimmSpline: x=(0 3.14159) y=(0 0.0744)
    CoordinateCouplerConstraint LAT3pt3_tz_con: independent_coordinate_names=shoulder_elv
        dependent_coordinate_name=LAT3pt3_tz
      coupled_coordinates_function: SimmSpline: x=(0 3.14159) y=(0 -0.0901)
  ForceSet:
    Schutte1993Muscle_Deprecated DELT1: max_isometric_force=1142.6 optimal_fiber_length=0.0976
        tendon_slack_length=0.093 pennation_angle_at_optimal=0.3839724 [radians]
      PathPoint: humerus (0.00896 -0.11883 0.00585)
      PathPoint pathpoint_0: humerus (0.01623 -0.11033 0.00412)
      PathPoint pathpoint_1: scapula (0.04347 -0.03252 0.00099)
      PathPoint pathpoint_2: clavicle (-0.014 0.01106 0.08021)
      PathWrap: wrap_object=delt2hum
      PathWrap pathwrap_0: wrap_object=DELT1hh method=hybrid range=(2 3)
    Schutte1993Muscle_Deprecated DELT2: max_isometric_force=1142.6 optimal_fiber_length=0.1078
        tendon_slack_length=0.1095 pennation_angle_at_optimal=0.2617994
      PathPoint: humerus (0.00461 -0.13611 0.0056)
      PathPoint pathpoint_0: DELT2pt2 (0.0272 0.00535 0.04807)
      PathPoint pathpoint_1: scapula (5e-5 0.00294 0.02233)
      PathPoint pathpoint_2: scapula (-0.01078 -0.00034 0.0062)
      PathWrap: wrap_object=Deltoid2 method=hybrid
      PathWrap pathwrap_0: wrap_object=delt2hum
      PathWrap pathwrap_1: wrap_object=TMAJ_LAT_PEC_CORBhh
    Schutte1993Muscle_Deprecated DELT3: max_isometric_force=259.88 optimal_fiber_length=0.1367
        tendon_slack_length=0.038 pennation_angle_at_optimal=0.3141593
      PathPoint: scapula (-0.05573 0.00122 -0.02512)
      PathPoint pathpoint_0: scapula (-0.07247 -0.03285 0.01233)
      PathPoint pathpoint_1: humerus (0.00206 -0.07602 0.01045)
      PathWrap: wrap_object=Delt3
      PathWrap pathwrap_0: wrap_object=delt3hum method=hybrid
      PathWrap pathwrap_1: wrap_object=TMAJ_LAT_PEC_CORBhh
    Schutte1993Muscle_Deprecated SUPSP: max_isometric_force=487.82 optimal_fiber_length=0.0682
        tendon_slack_length=0.0395 pennation_angle_at_optimal=0.122173
      PathPoint: humerus (0.00256 0.01063 0.02593)
      PathPoint pathpoint_0: scapula (-0.01918 0.00127 -0.01271)
      PathPoint pathpoint_1: scapula (-0.044 -0.01512 -0.05855)
      PathWrap: wrap_object=SUPSP method=hybrid
    Schutte1993Muscle_Deprecated INFSP: max_isometric_force=1210.84 optimal_fiber_length=0.0755
        tendon_slack_length=0.0308 pennation_angle_at_optimal=0.3228859
      PathPoint: humerus (-0.00887 0.00484 0.02448)
      PathPoint pathpoint_0: scapula (-0.07382 -0.05476 -0.04781)
      PathWrap: wrap_object=INFSP
      PathWrap pathwrap_0: wrap_object=INFSP_and_TMIN_hum_head method=hybrid
    Schutte1993Muscle_Deprecated SUBSC: max_isometric_force=1377.81 optimal_fiber_length=0.0873
        tendon_slack_length=0.033 pennation_angle_at_optimal=0.3490659
      PathPoint: humerus (0.01403 0.0084 -0.01331)
      PathPoint pathpoint_0: scapula (-0.01831 -0.05223 -0.02457)
      PathPoint pathpoint_1: scapula (-0.07246 -0.03943 -0.06475)
      PathWrap: wrap_object=SUBSCAP method=hybrid
    Schutte1993Muscle_Deprecated TMIN: max_isometric_force=354.25 optimal_fiber_length=0.0741
        tendon_slack_length=0.0713 pennation_angle_at_optimal=0.418879
      PathPoint: humerus (-0.0011 -0.01264 0.02156)
      PathPoint pathpoint_0: scapula (-0.09473 -0.07991 -0.04737)
      PathPoint pathpoint_1: scapula (-0.09643 -0.08121 -0.05298)
      PathWrap: wrap_object=TMIN method=hybrid range=(1 2)
      PathWrap pathwrap_0: wrap_object=INFSP_and_TMIN_hum_head method=hybrid range=(1 2)
      PathWrap pathwrap_1: wrap_object=TMINhum range=(1 2)
    Schutte1993Muscle_Deprecated TMAJ: max_isometric_force=425.39 optimal_fiber_length=0.1624 tendon_slack_length=0.02
        pennation_angle_at_optimal=0.2792527
      PathPoint: humerus (0.00998 -0.05419 -0.00568)
      PathPoint pathpoint_0: scapula (-0.10264 -0.10319 -0.05829)
      PathPoint pathpoint_1: scapula (-0.10489 -0.10895 -0.07117)
      PathWrap: wrap_object=TMAJ_LAThum
      PathWrap pathwrap_0: wrap_object=LAT_TMAJhh range=(1 2)
      PathWrap pathwrap_1: wrap_object=LAT_TMAJ2hh
    Schutte1993Muscle_Deprecated PECM1: max_isometric_force=364.41 optimal_fiber_length=0.1442
        tendon_slack_length=0.0028 pennation_angle_at_optimal=0.296706
      PathPoint: humerus (0.01169 -0.04191 0.0078)
      PathPoint pathpoint_0: PEC1pt2 (0.01615 -0.04045 -0.00577)
      PathPoint pathpoint_1: PEC1pt3 (0.00958 -0.01509 0.12664)
      PathPoint pathpoint_2: clavicle (0.00321 -0.00013 0.05113)
      PathWrap: wrap_object=Thorax method=hybrid
      PathWrap pathwrap_0: wrap_object=PEC12hum range=(2 3)
      PathWrap pathwrap_1: wrap_object=PEC1hh method=hybrid
    Schutte1993Muscle_Deprecated PECM2: max_isometric_force=515.41 optimal_fiber_length=0.1385
        tendon_slack_length=0.089 pennation_angle_at_optimal=0.4363323
      PathPoint: humerus (0.01274 -0.04289 0.00785)
      PathPoint pathpoint_0: PEC2pt2 (0.01453 -0.04568 -0.00687)
      PathPoint pathpoint_1: PEC2pt3 (0.02018 -0.04165 0.1269)
      PathPoint pathpoint_2: thorax (0.03091 -0.03922 0.09705)
      PathPoint pathpoint_3: thorax (0.02769 -0.04498 0.02271)
      PathWrap: wrap_object=Thorax method=hybrid
      PathWrap pathwrap_0: wrap_object=PEC12hum range=(2 3)
      PathWrap pathwrap_1: wrap_object=TMAJ_LAT_PEC_CORBhh
      PathWrap pathwrap_2: wrap_object=PEC23hh
    Schutte1993Muscle_Deprecated PECM3: max_isometric_force=390.55 optimal_fiber_length=0.1385
        tendon_slack_length=0.132 pennation_angle_at_optimal=0.4363323
      PathPoint: humerus (0.01269 -0.04375 0.0075)
      PathPoint pathpoint_0: PEC3pt2 (0.01243 -0.05157 -0.01807)
      PathPoint pathpoint_1: PEC3pt3 (0.02984 -0.071 0.1151)
      PathPoint pathpoint_2: thorax (0.0525 -0.08417 0.08935)
      PathPoint pathpoint_3: thorax (0.05724 -0.11654 0.03787)
      PathWrap: wrap_object=Thorax method=hybrid
      PathWrap pathwrap_0: wrap_object=PEC3hum range=(2 3)
      PathWrap pathwrap_1: wrap_object=PEC23hh
    Schutte1993Muscle_Deprecated LAT1: max_isometric_force=389.1 optimal_fiber_length=0.254 tendon_slack_length=0.12
        pennation_angle_at_optimal=0.4363323
      PathPoint: humerus (0.0105 -0.03415 -0.00653)
      PathPoint pathpoint_0: LAT1pt2 (-0.07947 -0.08581 -0.02188)
      PathPoint pathpoint_1: LAT1pt3 (-0.11215 -0.09779 -0.05322)
      PathPoint pathpoint_2: thorax (-0.11828 -0.10118 0.03316)
      PathPoint pathpoint_3: thorax (-0.09578 -0.11724 0.00882)
      PathWrap: wrap_object=TMAJ_LAThum
      PathWrap pathwrap_0: wrap_object=LAT_TMAJhh range=(1 2)
      PathWrap pathwrap_1: wrap_object=LAT_TMAJ2hh
    Schutte1993Muscle_Deprecated LAT2: max_isometric_force=389.1 optimal_fiber_length=0.2324 tendon_slack_length=0.1765
        pennation_angle_at_optimal=0.3316126
      PathPoint: humerus (0.00968 -0.04071 -0.00611)
      PathPoint pathpoint_0: LAT2pt2 (-0.0764 -0.1022 -0.01808)
      PathPoint pathpoint_1: LAT2pt3 (-0.10054 -0.13969 -0.05258)
      PathPoint pathpoint_2: thorax (-0.10992 -0.16908 0.02878)
      PathPoint pathpoint_3: thorax (-0.07186 -0.18818 0.00815)
      PathWrap: wrap_object=TMAJ_LAThum
      PathWrap pathwrap_0: wrap_object=LAT_TMAJhh range=(1 2)
      PathWrap pathwrap_1: wrap_object=LAT_TMAJ2hh
    Schutte1993Muscle_Deprecated LAT3: max_isometric_force=281.66 optimal_fiber_length=0.2789
        tendon_slack_length=0.1403 pennation_angle_at_optimal=0.3665191
      PathPoint: humerus (0.01208 -0.03922 -0.00416)
      PathPoint pathpoint_0: LAT3pt2 (-0.05678 -0.13303 -0.0213)
      PathPoint pathpoint_1: LAT3pt3 (-0.09449 -0.17553 -0.04606)
      PathPoint pathpoint_2: thorax (-0.11157 -0.19387 0.05532)
      PathPoint pathpoint_3: thorax (-0.07117 -0.24858 0.00907)
      PathWrap: wrap_object=TMAJ_LAThum
      PathWrap pathwrap_0: wrap_object=LAT_TMAJhh range=(1 2)
      PathWrap pathwrap_1: wrap_object=LAT_TMAJ2hh
    Schutte1993Muscle_Deprecated CORB: max_isometric_force=242.46 optimal_fiber_length=0.0932 tendon_slack_length=0.097
        pennation_angle_at_optimal=0
      PathPoint: scapula (0.0125 -0.04127 -0.02652)
      PathPoint pathpoint_0: scapula (0.00483 -0.06958 -0.01563)
      PathPoint pathpoint_1: humerus (0.00743 -0.15048 -0.00782)
      PathWrap: wrap_object=CORBhum
      PathWrap pathwrap_0: wrap_object=TMAJ_LAT_PEC_CORBhh
    Schutte1993Muscle_Deprecated TRIlong: max_isometric_force=798.52 optimal_fiber_length=0.134
        tendon_slack_length=0.143 pennation_angle_at_optimal=0.2094395
      PathPoint: scapula (-0.04565 -0.04073 -0.01377)
      PathPoint pathpoint_0: humerus (-0.02714 -0.11441 -0.00664)
      PathPoint pathpoint_1: humerus (-0.03184 -0.22637 -0.01217)
      PathPoint pathpoint_2: humerus (-0.01743 -0.26757 -0.01208)
      PathPoint pathpoint_3: ulna (-0.0219 0.01046 -0.00078)
      PathWrap: wrap_object=TRI
      PathWrap pathwrap_0: wrap_object=TRIlonghh method=hybrid
      PathWrap pathwrap_1: wrap_object=TRIlongglen
    Schutte1993Muscle_Deprecated TRIlat: max_isometric_force=624.3 optimal_fiber_length=0.1138
        tendon_slack_length=0.098 pennation_angle_at_optimal=0.1570796
      PathPoint: humerus (-0.00599 -0.12646 0.00428)
      PathPoint pathpoint_0: humerus (-0.02344 -0.14528 0.00928)
      PathPoint pathpoint_1: humerus (-0.03184 -0.22637 -0.01217)
      PathPoint pathpoint_2: humerus (-0.01743 -0.26757 -0.01208)
      PathPoint pathpoint_3: ulna (-0.0219 0.01046 -0.00078)
      PathWrap: wrap_object=TRI
    Schutte1993Muscle_Deprecated TRImed: max_isometric_force=624.3 optimal_fiber_length=0.1138
        tendon_slack_length=0.0908 pennation_angle_at_optimal=0.1570796
      PathPoint: humerus (-0.00838 -0.13695 -0.00906)
      PathPoint pathpoint_0: humerus (-0.02601 -0.15139 -0.0108)
      PathPoint pathpoint_1: humerus (-0.03184 -0.22637 -0.01217)
      PathPoint pathpoint_2: humerus (-0.01743 -0.26757 -0.01208)
      PathPoint pathpoint_3: ulna (-0.0219 0.01046 -0.00078)
      PathWrap: wrap_object=TRI
    Schutte1993Muscle_Deprecated ANC: max_isometric_force=350 optimal_fiber_length=0.027 tendon_slack_length=0.018
        pennation_angle_at_optimal=0
      PathPoint: humerus (-0.00744 -0.28359 0.00979)
      PathPoint pathpoint_0: ulna (-0.02532 -0.00124 0.006)
      PathWrap: wrap_object=ANC method=hybrid
    Schutte1993Muscle_Deprecated SUP: max_isometric_force=476 optimal_fiber_length=0.033 tendon_slack_length=0.028
        pennation_angle_at_optimal=0
      PathPoint: radius (0.00996 -0.06096 0.00075)
      PathPoint pathpoint_0: radius (0.01201 -0.0517 -0.00107)
      PathPoint pathpoint_1: ulna (-0.0136 -0.03384 0.02013)
      PathWrap: wrap_object=SUP
    Schutte1993Muscle_Deprecated BIClong: max_isometric_force=624.3 optimal_fiber_length=0.1157
        tendon_slack_length=0.2723 pennation_angle_at_optimal=0
      PathPoint: scapula (-0.03123 -0.02353 -0.01305)
      PathPoint pathpoint_0: scapula (-0.02094 -0.01309 -0.00461)
      PathPoint pathpoint_1: humerus (0.02131 0.01793 0.01028)
      PathPoint pathpoint_2: humerus (0.02378 -0.00511 0.01201)
      PathPoint pathpoint_3: humerus (0.01345 -0.02827 0.00136)
      PathPoint pathpoint_4: humerus (0.01068 -0.07736 -0.00165)
      PathPoint pathpoint_5: humerus (0.01703 -0.12125 0.00024)
      PathPoint pathpoint_6: humerus (0.0228 -0.1754 -0.0063)
      PathPoint pathpoint_7: bicpt2 (0 0 0)
      ConditionalPathPoint: bicpt (0 0 0) socket_coordinate=/jointset/radioulnar/pro_sup
          range=(-0.6387905 1.570796) [radians]
      PathPoint pathpoint_8: radius (-0.002 -0.0375 -0.002)
      PathWrap: wrap_object=Elbow_BIC_BRD method=hybrid
      PathWrap pathwrap_0: wrap_object=BIClong method=hybrid range=(2 3)
    Schutte1993Muscle_Deprecated BICshort: max_isometric_force=435.56 optimal_fiber_length=0.1321
        tendon_slack_length=0.1923 pennation_angle_at_optimal=0
      PathPoint: scapula (0.01268 -0.03931 -0.02625)
      PathPoint pathpoint_0: scapula (0.00093 -0.06704 -0.01593)
      PathPoint pathpoint_1: humerus (0.01117 -0.07576 -0.01101)
      PathPoint pathpoint_2: humerus (0.01703 -0.12125 -0.01079)
      PathPoint pathpoint_3: humerus (0.0228 -0.1754 -0.0063)
      PathPoint pathpoint_4: bicpt2 (0 0 0)
      ConditionalPathPoint: bicpt (0 0 0) socket_coordinate=/jointset/radioulnar/pro_sup range=(-0.6387905 1.570796)
      PathPoint pathpoint_5: radius (-0.002 -0.0375 -0.002)
      PathWrap: wrap_object=Elbow_BIC_BRD method=hybrid
    Schutte1993Muscle_Deprecated BRA: max_isometric_force=987.26 optimal_fiber_length=0.0858 tendon_slack_length=0.0535
        pennation_angle_at_optimal=0
      PathPoint: humerus (0.0068 -0.1739 -0.0036)
      ConditionalPathPoint: humerus (0.01894 -0.28559 -0.01105) socket_coordinate=/jointset/elbow/elbow_flexion
          range=(0 0.8131489)
      ConditionalPathPoint conditionalpathpoint_0: ulna (0.00498 -0.01463 0.00128)
          socket_coordinate=/jointset/elbow/elbow_flexion range=(0 0.8131489)
      PathPoint pathpoint_0: ulna (-0.0032 -0.0239 0.0009)
    Schutte1993Muscle_Deprecated BRD: max_isometric_force=261.33 optimal_fiber_length=0.1726 tendon_slack_length=0.133
        pennation_angle_at_optimal=0
      PathPoint: humerus (-0.0098 -0.19963 0.00223)
      PathPoint pathpoint_0: radius (0.03577 -0.12742 0.02315)
      PathPoint pathpoint_1: radius (0.0419 -0.221 0.0224)
      PathWrap: wrap_object=Elbow_BIC_BRD method=hybrid
    Schutte1993Muscle_Deprecated ECRL: max_isometric_force=304.89 optimal_fiber_length=0.081 tendon_slack_length=0.224
        pennation_angle_at_optimal=0
      PathPoint: humerus (-0.0073 -0.2609 0.0091)
      PathPoint pathpoint_0: radius (0.03195 -0.13463 0.02779)
      PathPoint pathpoint_1: radius (0.04243 -0.23684 0.0362)
      PathPoint pathpoint_2: secondmc (0.00249 0.0164 0.0008)
      PathWrap: wrap_object=Elbow_PT_ECRL method=hybrid
      PathWrap pathwrap_0: wrap_object=ECRL
    Schutte1993Muscle_Deprecated ECRB: max_isometric_force=100.52 optimal_fiber_length=0.0585
        tendon_slack_length=0.2223 pennation_angle_at_optimal=0.1553343
      PathPoint: humerus (0.01349 -0.29048 0.01698)
      PathPoint pathpoint_0: radius (0.02905 -0.13086 0.02385)
      PathPoint pathpoint_1: radius (0.03549 -0.22805 0.03937)
      PathPoint pathpoint_2: thirdmc (0.00452 0.02788 0.00112)
      PathWrap: wrap_object=ECRB
    Schutte1993Muscle_Deprecated ECU: max_isometric_force=93.17 optimal_fiber_length=0.0622 tendon_slack_length=0.2285
        pennation_angle_at_optimal=0.06108652
      PathPoint: humerus (0.00083 -0.28955 0.0188)
      PathPoint pathpoint_0: ulna (-0.01391 -0.03201 0.02947)
      PathPoint pathpoint_1: ulna (-0.01705 -0.05428 0.02868)
      PathPoint pathpoint_2: ulna (-0.01793 -0.09573001 0.03343149)
      PathPoint pathpoint_3: radius (-0.01421 -0.22696 0.03481)
      PathPoint pathpoint_4: fifthmc (-0.00061 0.02067 0.00294)
      PathWrap: wrap_object=ECU
    Schutte1993Muscle_Deprecated FCR: max_isometric_force=73.96 optimal_fiber_length=0.0628 tendon_slack_length=0.244
        pennation_angle_at_optimal=0.05410521
      PathPoint: humerus (0.00758 -0.27806 -0.03705)
      PathPoint pathpoint_0: radius (0.0211 -0.21943 0.00127)
      PathPoint pathpoint_1: secondmc (-0.00345 0.01918 -0.00921)
      PathWrap: wrap_object=Elbow_PT_ECRL method=hybrid
      PathWrap pathwrap_0: wrap_object=FCR
    Schutte1993Muscle_Deprecated FCU: max_isometric_force=128.93 optimal_fiber_length=0.0509 tendon_slack_length=0.265
        pennation_angle_at_optimal=0.2111848
      PathPoint: humerus (0.00219 -0.2774 -0.0388)
      PathPoint pathpoint_0: FCUpt (0.00549 0 0)
      PathPoint pathpoint_1: radius (0.01082 -0.22327 0.00969)
      PathPoint pathpoint_2: fifthmc (0.00154 0.01703 -0.0033)
      PathWrap: wrap_object=FCU
      PathWrap pathwrap_0: wrap_object=Elbow_PT_ECRL method=hybrid
    Schutte1993Muscle_Deprecated PL: max_isometric_force=26.72 optimal_fiber_length=0.0638 tendon_slack_length=0.2694
        pennation_angle_at_optimal=0.06981317
      PathPoint: humerus (0.00457 -0.27519 -0.03865)
      PathPoint pathpoint_0: radius (0.02531 -0.23915 -0.00276)
      PathPoint pathpoint_1: capitate (0.00917 -0.01898 -0.01754)
      PathPoint pathpoint_2: thirdmc (0.00179 0.00828 -0.00245)
      PathWrap: wrap_object=PL method=hybrid
      PathWrap pathwrap_0: wrap_object=Elbow_PT_ECRL method=hybrid
    Schutte1993Muscle_Deprecated PT: max_isometric_force=566.22 optimal_fiber_length=0.0492 tendon_slack_length=0.098
        pennation_angle_at_optimal=0.1745329
      PathPoint: humerus (0.0036 -0.2759 -0.0365)
      PathPoint pathpoint_0: ulna (0.00846 -0.03373 -0.01432)
      PathPoint pathpoint_1: ptpt (0.00464 -0.00026 -0.00214)
      ConditionalPathPoint: radius (0.0236 -0.0934 0.0094) socket_coordinate=/jointset/radioulnar/pro_sup
          range=(-1.570796 0.5096361)
      PathPoint pathpoint_2: radius (0.0254 -0.1088 0.0198)
      PathWrap: wrap_object=Elbow_PT_ECRL method=hybrid
    Schutte1993Muscle_Deprecated PQ: max_isometric_force=75.48 optimal_fiber_length=0.0282 tendon_slack_length=0.005
        pennation_angle_at_optimal=0.1745329
      PathPoint: radius (0.03245 -0.19998 0.01962)
      PathPoint pathpoint_0: ulna (0.00193 -0.20972 0.03632)
      PathWrap: wrap_object=PQ2
      PathWrap pathwrap_0: wrap_object=PQ1
    Schutte1993Muscle_Deprecated FDSL: appliesForce=false max_isometric_force=16.55 optimal_fiber_length=0.0515
        tendon_slack_length=0.3383 pennation_angle_at_optimal=0.08726646
      PathPoint: humerus (0.00421 -0.27598 -0.03864)
      PathPoint pathpoint_0: radius (0.01377 -0.18718 0.00205)
      PathPoint pathpoint_1: capitate (-0.00235 -0.01393 -0.01376)
      PathPoint pathpoint_2: fourthmc (-0.00294 0.00846 -0.01213)
      PathPoint pathpoint_3: fifthmc (-0.00032 -0.01968 -0.00757)
      PathPoint pathpoint_4: 5proxph (-0.00323 -0.03568 -0.00417)
      PathPoint pathpoint_5: 5midph (-0.0026 -0.01983 -0.0035)
      PathWrap: wrap_object=FDS method=hybrid
      PathWrap pathwrap_0: wrap_object=Elbow_PT_ECRL method=hybrid
    Schutte1993Muscle_Deprecated FDSR: appliesForce=false max_isometric_force=57.9 optimal_fiber_length=0.0736
        tendon_slack_length=0.328 pennation_angle_at_optimal=0.06981317
      PathPoint: humerus (0.00479 -0.2788 -0.03731)
      PathPoint pathpoint_0: radius (0.01571 -0.18666 0.00267)
      PathPoint pathpoint_1: capitate (-0.00082 -0.01344 -0.01359)
      PathPoint pathpoint_2: thirdmc (-0.00914 0.00544 -0.01085)
      PathPoint pathpoint_3: fourthmc (-0.0029 -0.02334 -0.00767)
      PathPoint pathpoint_4: 4proxph (-0.00172 -0.03947 -0.00102)
      PathPoint pathpoint_5: 4midph (-2e-5 -0.02501 0.00029)
      PathWrap: wrap_object=FDS method=hybrid
      PathWrap pathwrap_0: wrap_object=Elbow_PT_ECRL method=hybrid
    Schutte1993Muscle_Deprecated FDSM: appliesForce=false max_isometric_force=91.03 optimal_fiber_length=0.0749
        tendon_slack_length=0.295 pennation_angle_at_optimal=0.122173
      PathPoint: ulna (-0.00669 -0.02713 -0.00191)
      PathPoint pathpoint_0: radius (0.01899 -0.18706 0.00424)
      PathPoint pathpoint_1: capitate (0.0068 -0.01377 -0.01399)
      PathPoint pathpoint_2: thirdmc (0.00128 0.00639 -0.00952)
      PathPoint pathpoint_3: thirdmc (0.00263 -0.02478 -0.00183)
      PathPoint pathpoint_4: 3proxph (0.00252 -0.04307 0.00417)
      PathPoint pathpoint_5: 3midph (0.00155 -0.02773 0.00067)
      PathWrap: wrap_object=FDS method=hybrid
    Schutte1993Muscle_Deprecated FDSI: appliesForce=false max_isometric_force=61.24 optimal_fiber_length=0.0835
        tendon_slack_length=0.275 pennation_angle_at_optimal=0.1047198
      PathPoint: ulna (-0.00676 -0.02819 -0.00137)
      PathPoint pathpoint_0: radius (0.02145 -0.18623 0.00552)
      PathPoint pathpoint_1: capitate (0.00889 -0.01366 -0.01387)
      PathPoint pathpoint_2: secondmc (-0.00407 -0.00025 -0.00479)
      PathPoint pathpoint_3: secondmc (0.00304 -0.02206 -0.00579)
      PathPoint pathpoint_4: 2proxph (0.00427 -0.03367 0.00444)
      PathPoint pathpoint_5: 2midph (0.00228 -0.02088 -0.00029)
      PathWrap: wrap_object=FDS method=hybrid
      PathWrap pathwrap_0: wrap_object=2ndmcp method=hybrid
    Schutte1993Muscle_Deprecated FDPL: appliesForce=false max_isometric_force=79.65 optimal_fiber_length=0.0749
        tendon_slack_length=0.2819 pennation_angle_at_optimal=0.1396263
      PathPoint: ulna (-0.00628 -0.03214 0.00254)
      PathPoint pathpoint_0: radius (0.01409 -0.18516 0.00861)
      PathPoint pathpoint_1: capitate (-0.00088 -0.01027 -0.01188)
      PathPoint pathpoint_2: fourthmc (-0.00686 0.0089 -0.00619)
      PathPoint pathpoint_3: fifthmc (-0.00185 -0.01878 -0.00706)
      PathPoint pathpoint_4: 5proxph (-0.0049 -0.03465 -0.00598)
      PathPoint pathpoint_5: 5distph (-0.00032 -0.00433 -0.00165)
      PathWrap: wrap_object=FDP method=hybrid
    Schutte1993Muscle_Deprecated FDPR: appliesForce=false max_isometric_force=64.08 optimal_fiber_length=0.0798
        tendon_slack_length=0.282 pennation_angle_at_optimal=0.122173
      PathPoint: ulna (-0.00502 -0.03374 0.00273)
      PathPoint pathpoint_0: radius (0.0158 -0.18629 0.00803)
      PathPoint pathpoint_1: capitate (0.00106 -0.01177 -0.01184)
      PathPoint pathpoint_2: thirdmc (-0.0104 0.00473 -0.00804)
      PathPoint pathpoint_3: fourthmc (-0.00289 -0.02297 -0.00609)
      PathPoint pathpoint_4: 4proxph (-0.00304 -0.04002 -0.00075)
      PathPoint pathpoint_5: 4distph (0.0001 -0.0066 -0.00066)
      PathWrap: wrap_object=FDP method=hybrid
    Schutte1993Muscle_Deprecated FDPM: appliesForce=false max_isometric_force=81.65 optimal_fiber_length=0.0835
        tendon_slack_length=0.293 pennation_angle_at_optimal=0.1047198
      PathPoint: ulna (-0.00522 -0.03327 0.0021)
      PathPoint pathpoint_0: radius (0.01906 -0.18644 0.00785)
      PathPoint pathpoint_1: capitate (0.00335 -0.0128 -0.01144)
      PathPoint pathpoint_2: thirdmc (-0.00128 0.00609 -0.00838)
      PathPoint pathpoint_3: thirdmc (0.00034 -0.02347 -0.00303)
      PathPoint pathpoint_4: 3proxph (0.00102 -0.04333 0.00294)
      PathPoint pathpoint_5: 3distph (0.00023 -0.00505 -0.00226)
      PathWrap: wrap_object=FDP method=hybrid
    Schutte1993Muscle_Deprecated FDPI: appliesForce=false max_isometric_force=68.27 optimal_fiber_length=0.0749
        tendon_slack_length=0.2935 pennation_angle_at_optimal=0.122173
      PathPoint: ulna (-0.00647 -0.03176 0.0028)
      PathPoint pathpoint_0: radius (0.0208 -0.1856 0.00915)
      PathPoint pathpoint_1: capitate (0.00896 -0.01168 -0.01212)
      PathPoint pathpoint_2: secondmc (-0.00432 0.00663 -0.00248)
      PathPoint pathpoint_3: secondmc (0.0042 -0.02262 -0.00499)
      PathPoint pathpoint_4: 2proxph (0.00581 -0.03555 0.00306)
      PathPoint pathpoint_5: 2distph (0.00046 -0.0046 -0.00301)
      PathWrap: wrap_object=FDP method=hybrid
      PathWrap pathwrap_0: wrap_object=2ndmcp method=hybrid
    Schutte1993Muscle_Deprecated EDCL: appliesForce=false max_isometric_force=13.11 optimal_fiber_length=0.065
        tendon_slack_length=0.2965 pennation_angle_at_optimal=0.03490659
      PathPoint: humerus (-0.0004 -0.28831 0.0187)
      PathPoint pathpoint_0: EDCpt (0.0013 -0.03888 0.01405)
      PathPoint pathpoint_1: radius (0.00993 -0.22304 0.03618)
      PathPoint pathpoint_2: fifthmc (-0.00478 -0.01915 0.00447)
      PathPoint pathpoint_3: 5proxph (-0.00716 -0.03302 -0.00089)
      PathPoint pathpoint_4: 5distph (-0.00142 0.00068 0.00115)
      PathWrap: wrap_object=EDCL range=(3 4)
    Schutte1993Muscle_Deprecated EDCR: appliesForce=false max_isometric_force=34.04 optimal_fiber_length=0.0626
        tendon_slack_length=0.327 pennation_angle_at_optimal=0.05235988
      PathPoint: humerus (-0.00156 -0.28936 0.01782)
      PathPoint pathpoint_0: EDCpt (0.0026 -0.03991 0.01552)
      PathPoint pathpoint_1: radius (0.00882 -0.22366 0.04284)
      PathPoint pathpoint_2: fourthmc (-0.00338 -0.0233 0.00513)
      PathPoint pathpoint_3: 4proxph (-0.00546 -0.03868 0.00413)
      PathPoint pathpoint_4: 4distph (-0.00171 -0.00375 0.00241)
      PathWrap: wrap_object=EDCR
    Schutte1993Muscle_Deprecated EDCM: appliesForce=false max_isometric_force=35.32 optimal_fiber_length=0.0724
        tendon_slack_length=0.335 pennation_angle_at_optimal=0.05235988
      PathPoint: humerus (0.00051 -0.28984 0.01949)
      PathPoint pathpoint_0: EDCpt (0.00316 -0.03948 0.01528)
      PathPoint pathpoint_1: radius (0.0144 -0.22323 0.04223)
      PathPoint pathpoint_2: thirdmc (0.00131 -0.02342 0.00764)
      PathPoint pathpoint_3: 3proxph (0.00179 -0.04239 0.01003)
      PathPoint pathpoint_4: 3distph (0.00077 -0.01111 0.00201)
      PathWrap: wrap_object=EDCM
    Schutte1993Muscle_Deprecated EDCI: appliesForce=false max_isometric_force=18.26 optimal_fiber_length=0.07
        tendon_slack_length=0.322 pennation_angle_at_optimal=0.05235988
      PathPoint: humerus (0.00065 -0.28898 0.01869)
      PathPoint pathpoint_0: EDCpt (0.00228 -0.03918 0.01483)
      PathPoint pathpoint_1: radius (0.01533 -0.22314 0.04196)
      PathPoint pathpoint_2: secondmc (0.00474 -0.02656 0.01293)
      PathPoint pathpoint_3: 2proxph (0.00192 -0.01101 0.01021)
      PathPoint pathpoint_4: 2proxph (0.00771 -0.04191 0.01399)
      PathPoint pathpoint_5: 2midph (0.00123 -0.00941 0.00581)
      PathPoint pathpoint_6: 2midph (0.0026 -0.01959 0.00363)
      PathPoint pathpoint_7: 2distph (0.00025 -0.0037 0.00228)
      PathWrap: wrap_object=EDCI range=(3 4)
      PathWrap pathwrap_0: wrap_object=Secondpm range=(6 7)
      PathWrap pathwrap_1: wrap_object=Secondmd range=(8 9)
    Schutte1993Muscle_Deprecated EDM: appliesForce=false max_isometric_force=25.25 optimal_fiber_length=0.0675
        tendon_slack_length=0.322 pennation_angle_at_optimal=0.05235988
      PathPoint: humerus (0.00089 -0.28919 0.01847)
      PathPoint pathpoint_0: ulna (-0.00977 -0.03907 0.03085)
      PathPoint pathpoint_1: ulna (-0.00755 -0.08267 0.03646)
      PathPoint pathpoint_2: radius (0.00454 -0.22641 0.03678)
      PathPoint pathpoint_3: fifthmc (0.00131 0.02436 0.00794)
      PathPoint pathpoint_4: fifthmc (-0.00537 -0.01848 0.00316)
      PathPoint pathpoint_5: 5proxph (-0.0054 -0.03237 0.00015)
      PathPoint pathpoint_6: 5distph (-0.00226 -0.00334 0.00062)
      PathWrap: wrap_object=EDM method=hybrid range=(4 5)
    Schutte1993Muscle_Deprecated EIP: max_isometric_force=21.7 optimal_fiber_length=0.0589 tendon_slack_length=0.186
        pennation_angle_at_optimal=0.1047198
      PathPoint: ulna (-0.00394 -0.16652 0.03682)
      PathPoint pathpoint_0: ulna (0.00171 -0.17469 0.04049)
      PathPoint pathpoint_1: radius (0.01076 -0.22783 0.03664)
      PathPoint pathpoint_2: secondmc (-0.01081 0.01528 0.00681)
      PathPoint pathpoint_3: secondmc (0.00441 -0.02602 0.01285)
      PathPoint pathpoint_4: 2proxph (0.00171 -0.01033 0.00947)
      PathPoint pathpoint_5: 2proxph (0.00714 -0.04133 0.01413)
      PathPoint pathpoint_6: 2midph (0.00115 -0.00899 0.00597)
      PathPoint pathpoint_7: 2midph (0.00294 -0.02043 0.00377)
      PathPoint pathpoint_8: 2distph (0.00264 -0.01233 0.00266)
      PathWrap: wrap_object=Extensor_ellipse method=hybrid
      PathWrap pathwrap_0: wrap_object=Secondpm range=(7 8)
      PathWrap pathwrap_1: wrap_object=Secondmd range=(9 10)
    Schutte1993Muscle_Deprecated EPL: appliesForce=false max_isometric_force=39.46 optimal_fiber_length=0.054
        tendon_slack_length=0.2205 pennation_angle_at_optimal=0.1047198
      PathPoint: ulna (-0.01412 -0.09706 0.02952)
      PathPoint pathpoint_0: radius (0.00124 -0.13668 0.0227)
      PathPoint pathpoint_1: radius (0.02702 -0.21872 0.03828)
      PathPoint pathpoint_2: radius (0.03382 -0.22754 0.04607)
      PathPoint pathpoint_3: radius (0.04234 -0.23771 0.04173)
      PathPoint pathpoint_4: capitate (0.02428 0.00014 0.00608)
      PathPoint pathpoint_5: trapezium (0.00809 -0.0046 0.00992)
      PathPoint pathpoint_6: firstmc (0.00656 -0.0043 0.00792)
      PathPoint pathpoint_7: firstmc (0.02165 -0.0242 -0.00533)
      PathPoint pathpoint_8: proximal_thumb (0.01147 -0.00362 0.00156)
      PathPoint pathpoint_9: proximal_thumb (0.01921 -0.0265 -0.01038)
      PathPoint pathpoint_10: distal_thumb (0.00543 -0.00714 -0.00464)
      PathWrap: wrap_object=MPthumb
    Schutte1993Muscle_Deprecated EPB: max_isometric_force=14.2 optimal_fiber_length=0.0675 tendon_slack_length=0.1155
        pennation_angle_at_optimal=0.1256637
      PathPoint: radius (0.01924 -0.14695 0.02114)
      PathPoint pathpoint_0: radius (0.02276 -0.15857 0.02665)
      PathPoint pathpoint_1: radius (0.03831 -0.19722 0.03834)
      PathPoint pathpoint_2: radius (0.05235 -0.23611 0.02699)
      PathPoint pathpoint_3: capitate (0.03123 0.00256 -0.00327)
      PathPoint pathpoint_4: firstmc1 (0.01443 -0.00337 -0.00405)
      PathPoint pathpoint_5: firstmc (0.02173 -0.02303 -0.01141)
      PathPoint pathpoint_6: proximal_thumb (0.00927 -0.00618 -0.00557)
      PathWrap: wrap_object=MPthumb
    Schutte1993Muscle_Deprecated FPL: appliesForce=false max_isometric_force=77.2 optimal_fiber_length=0.0552
        tendon_slack_length=0.1938 pennation_angle_at_optimal=0.122173
      PathPoint: radius (0.00971 -0.09458 0.01769)
      PathPoint pathpoint_0: radius (0.01658 -0.13525 0.01915)
      PathPoint pathpoint_1: radius (0.01869 -0.17932 0.01988)
      PathPoint pathpoint_2: radius (0.038 -0.23171 0.0158)
      PathPoint pathpoint_3: FPLpt (0.01869 0.00882 -0.01547)
      PathPoint pathpoint_4: FPLpt2 (0.01244 -0.02207 -0.02089)
      PathPoint pathpoint_5: firstmc (-0.00608 -0.01624 -0.0094)
      PathPoint pathpoint_6: firstmc (0.002051812 -0.02307458 -0.0117827)
      PathPoint pathpoint_7: proximal_thumb (-0.0045 -0.01842 -0.00508)
      PathPoint pathpoint_8: proximal_thumb (0.0059 -0.02602 -0.01114)
      PathPoint pathpoint_9: distal_thumb (0.00242 -0.01127 -0.00412)
      PathWrap: wrap_object=FPL method=hybrid
      PathWrap pathwrap_0: wrap_object=IPthumb
      PathWrap pathwrap_1: wrap_object=MPthumb
    Schutte1993Muscle_Deprecated APL: appliesForce=false max_isometric_force=59.53 optimal_fiber_length=0.0713
        tendon_slack_length=0.1295 pennation_angle_at_optimal=0.1308997
      PathPoint: radius (0.01154 -0.09477 0.01681)
      PathPoint pathpoint_0: radius (0.0303 -0.1397001 0.04079264)
      PathPoint pathpoint_1: radius (0.03993 -0.16072 0.034)
      PathPoint pathpoint_2: radius (0.04397 -0.17845 0.03134)
      PathPoint pathpoint_3: radius (0.05505 -0.23084 0.02368)
      PathPoint pathpoint_4: APLpt (0.03385 0.00634 -0.00745)
      PathPoint pathpoint_5: firstmc1 (0.01058 0.00662 -0.00619)
      PathPoint pathpoint_6: firstmc (0.00629 0.00323 -0.00589)
      PathPoint pathpoint_7: firstmc (0.00827 -0.00586 -0.00604)
      PathWrap: wrap_object=APL range=(5 6)
    ObjectGroup shoulder: members=(CORB DELT1 DELT2 DELT3 INFSP LAT1 LAT2 LAT3 PECM1 PECM2 PECM3 SUBSC SUPSP TMAJ TMIN)
    ObjectGroup elbow: members=(ANC BIClong BICshort BRA BRD ECRL PT TRIlat TRIlong TRImed)
    ObjectGroup forearm: members=(APL ECRB ECU EDCI EDCL EDCM EDCR EDM EIP EPB EPL FCR FCU FDPI FDPL FDPM FDPR FDSI FDSL FDSM FDSR FPL PL PQ PT SUP)
    ObjectGroup extensor: members=(ECRB ECU EDCI EDCL EDCM EDCR EDM EIP EPL)
    ObjectGroup radial: members=(APL ECRB EDCI EDCM EIP EPB EPL FCR FDPI FDSI FDSM FPL PL)
    ObjectGroup wrist: members=(ECRB ECU FCR FCU)
    ObjectGroup ulnar: members=(ECU EDCL EDCR EDM FCU FDPL FDPM FDPR FDSL FDSR)
    ObjectGroup flexor: members=(APL EPB FCR FCU FDPI FDPL FDPM FDPR FDSI FDSL FDSM FDSR FPL PL)
    ObjectGroup hand: members=(APL EDCI EDCL EDCM EDCR EDM EIP EPB EPL FDPI FDPL FDPM FDPR FDSI FDSL FDSM FDSR FPL PL)
    ObjectGroup thumb: members=(APL EPB EPL FPL)
  MarkerSet:
    Marker Marker_30: fourthmc (-0.005350847 0.01717484 0.01374722) fixed=true
    Marker Marker_32: thirdmc (0.004562116 0.01549636 0.01811985) fixed=true
    Marker Marker_28: fourthmc (-0.007462842 -0.004447802 0.01677336) fixed=true
    Marker Marker_31: thirdmc (0.005823194 -0.00801654 0.01634874) fixed=true
    Marker Marker_44: secondmc (0.004997476 -0.02414242 0.01571623) fixed=true
    Marker Marker_43: 2proxph (0.005917362 -0.02682876 0.01662423) fixed=true
    Marker Marker_42: 2midph (0.002619603 -0.009322923 0.007777674) fixed=true
    Marker Marker_41: 2distph (0.002546143 -0.008265426 0.006176977) fixed=true
    Marker Marker_33: firstmc1 (0.01140538 0.00986368 0.00558834) fixed=true
    Marker Marker_34: firstmc (0.02091569 -0.01554455 -0.001977676) fixed=true
    Marker Marker_29: proximal_thumb (0.0183507 -0.01474185 -0.001916091) fixed=true
    Marker Marker_35: distal_thumb (0.008384954 -0.01011392 -0.002263044) fixed=true
    Marker Marker_21: ulna (-0.009000436 -0.1103429 0.06163133)
    Marker Marker_23: radius (0.009686687 -0.09055916 0.0335787)
    Marker Marker_16: ulna (-0.009882957 -0.1634482 0.05969204)
    Marker Marker_20: radius (0.01116824 -0.1399242 0.03713337)
    Marker Marker_17: ulna (-0.002131868 -0.217828 0.06286258)
    Marker Marker_18: radius (0.02337916 -0.198245 0.04582157)
    Marker Marker_10: humerus (-0.02320121 -0.1455462 0.03259328)
    Marker Marker_8: humerus (-0.06769835 -0.1483636 0.02405132)
    Marker Marker_5: humerus (-0.02974947 -0.09067662 0.03310393)
    Marker Marker_6: humerus (-0.07292717 -0.09309987 0.02538203)
    Marker Marker_19: humerus (-0.01869584 -0.1990013 0.03101291)
    Marker Marker_22: humerus (-0.06210706 -0.2020627 0.02354271)
    Marker Marker_9: thorax (0.1334217 -0.1726498 -0.002039592) fixed=true
    Marker Marker_4: thorax (0.09130818 -0.1454899 -0.002023933) fixed=true
    Marker Marker_11: thorax (0.08785988 -0.1533685 0.01753464) fixed=true
    Marker Marker_7: thorax (0.1005127 -0.1393223 -0.02346834) fixed=true
